// SBML level 2 version 2

model iCH360_PB()

  // Compartments:
  compartment compartment;

  // Species:
  species M_dhap_c in compartment = NaN;
  species M_prbatp_c in compartment = NaN;
  species M_10fthf_c in compartment = NaN;
  species M_co2_e in compartment = NaN;
  species M_akg_e in compartment = NaN;
  species M_2pg_c in compartment = NaN;
  species M_13dpg_c in compartment = NaN;
  species M_prbamp_c in compartment = NaN;
  species M_fpram_c in compartment = NaN;
  species M_thr__L_c in compartment = NaN;
  species M_fum_p in compartment = NaN;
  species M_flxr_c in compartment = NaN;
  species M_gln__L_e in compartment = NaN;
  species M_3ohexACP_c in compartment = NaN;
  species M_3ocddec5eACP_c in compartment = NaN;
  species M_r5p_c in compartment = NaN;
  species M_akg_c in compartment = NaN;
  species M_ac_c in compartment = NaN;
  species M_dca_c in compartment = NaN;
  species M_citr__L_c in compartment = NaN;
  species M_34hpp_c in compartment = NaN;
  species M_pep_c in compartment = NaN;
  species M_h_c in compartment = NaN;
  species M_rib__D_c in compartment = NaN;
  species M_gthrd_c in compartment = NaN;
  species M_actACP_c in compartment = NaN;
  species M_hdcea_c in compartment = NaN;
  species M_actp_c in compartment = NaN;
  species M_pyr_p in compartment = NaN;
  species M_cyst__L_c in compartment = NaN;
  species M_dutp_c in compartment = NaN;
  species M_octa_c in compartment = NaN;
  species M_h2o_p in compartment = NaN;
  species M_glyc3p_c in compartment = NaN;
  species M_2ahbut_c in compartment = NaN;
  species M_ser__L_c in compartment = NaN;
  species M_toct2eACP_c in compartment = NaN;
  species M_ump_c in compartment = NaN;
  species M_hdceap_c in compartment = NaN;
  species M_3pg_c in compartment = NaN;
  species M_ctp_c in compartment = NaN;
  species M_dadp_c in compartment = NaN;
  species M_xu5p__D_c in compartment = NaN;
  species M_aspsa_c in compartment = NaN;
  species M_the2eACP_c in compartment = NaN;
  species M_t3c9palmeACP_c in compartment = NaN;
  species M_accoa_c in compartment = NaN;
  species M_arg__L_c in compartment = NaN;
  species M_26dap_LL_c in compartment = NaN;
  species M_asp__L_c in compartment = NaN;
  species M_acg5sa_c in compartment = NaN;
  species M_hexACP_c in compartment = NaN;
  species M_skm_c in compartment = NaN;
  species M_imp_c in compartment = NaN;
  species M_o2_c in compartment = NaN;
  species M_ocdcea_c in compartment = NaN;
  species M_h_p in compartment = NaN;
  species M_succ_p in compartment = NaN;
  species M_phpyr_c in compartment = NaN;
  species M_fru_e in compartment = NaN;
  species M_pyr_e in compartment = NaN;
  species M_5mthf_c in compartment = NaN;
  species M_nad_c in compartment = NaN;
  species M_tdeACP_c in compartment = NaN;
  species M_3ocvac11eACP_c in compartment = NaN;
  species M_3hoctaACP_c in compartment = NaN;
  species M_ocdca_c in compartment = NaN;
  species M_adp_c in compartment = NaN;
  species M_mal__L_c in compartment = NaN;
  species M_g3p_c in compartment = NaN;
  species M_etoh_c in compartment = NaN;
  species M_so3_c in compartment = NaN;
  species M_met__L_c in compartment = NaN;
  species M_aicar_c in compartment = NaN;
  species M_5aizc_c in compartment = NaN;
  species M_ac_e in compartment = NaN;
  species M_glx_c in compartment = NaN;
  species M_etoh_e in compartment = NaN;
  species M_glcn_p in compartment = NaN;
  species M_air_c in compartment = NaN;
  species M_6pgc_c in compartment = NaN;
  species M_nh4_c in compartment = NaN;
  species M_tdec2eACP_c in compartment = NaN;
  species M_hdeACP_c in compartment = NaN;
  species M_pi_c in compartment = NaN;
  species M_argsuc_c in compartment = NaN;
  species M_nh4_p in compartment = NaN;
  species M_chor_c in compartment = NaN;
  species M_hom__L_c in compartment = NaN;
  species M_dgdp_c in compartment = NaN;
  species M_q8h2_c in compartment = NaN;
  species M_3odecACP_c in compartment = NaN;
  species M_tyr__L_c in compartment = NaN;
  species M_cys__L_c in compartment = NaN;
  species M_xylu__D_c in compartment = NaN;
  species M_h2s_c in compartment = NaN;
  species M_e4p_c in compartment = NaN;
  species M_trp__L_c in compartment = NaN;
  species M_acser_c in compartment = NaN;
  species M_lys__L_c in compartment = NaN;
  species M_dudp_c in compartment = NaN;
  species M_atp_c in compartment = NaN;
  species M_indole_c in compartment = NaN;
  species M_eig3p_c in compartment = NaN;
  species M_26dap__M_c in compartment = NaN;
  species M_thf_c in compartment = NaN;
  species M_orot5p_c in compartment = NaN;
  species M_h_e in compartment = NaN;
  species M_gln__L_p in compartment = NaN;
  species M_glyc_p in compartment = NaN;
  species M_5caiz_c in compartment = NaN;
  species M_mal__L_p in compartment = NaN;
  species M_3hcpalm9eACP_c in compartment = NaN;
  species M_3ocpalm9eACP_c in compartment = NaN;
  species M_butACP_c in compartment = NaN;
  species M_dttp_c in compartment = NaN;
  species M_ttdca_c in compartment = NaN;
  species M_lac__D_e in compartment = NaN;
  species M_trdox_c in compartment = NaN;
  species M_3ig3p_c in compartment = NaN;
  species M_sl26da_c in compartment = NaN;
  species M_3hoctACP_c in compartment = NaN;
  species M_dctp_c in compartment = NaN;
  species M_toctd2eACP_c in compartment = NaN;
  species M_grxrd_c in compartment = NaN;
  species M_ru5p__D_c in compartment = NaN;
  species M_23dhmb_c in compartment = NaN;
  species M_pran_c in compartment = NaN;
  species M_glcn_c in compartment = NaN;
  species M_paps_c in compartment = NaN;
  species M_utp_c in compartment = NaN;
  species M_dhor__S_c in compartment = NaN;
  species M_glyc_e in compartment = NaN;
  species M_4mop_c in compartment = NaN;
  species M_fdp_c in compartment = NaN;
  species M_dtmp_c in compartment = NaN;
  species M_gdp_c in compartment = NaN;
  species M_o2_p in compartment = NaN;
  species M_datp_c in compartment = NaN;
  species M_ppi_c in compartment = NaN;
  species M_nadp_c in compartment = NaN;
  species M_glu__L_c in compartment = NaN;
  species M_fum_c in compartment = NaN;
  species M_akg_p in compartment = NaN;
  species M_acorn_c in compartment = NaN;
  species M_glu5sa_c in compartment = NaN;
  species M_ile__L_c in compartment = NaN;
  species M_ocACP_c in compartment = NaN;
  species M_3dhq_c in compartment = NaN;
  species M_hisp_c in compartment = NaN;
  species M_so4_e in compartment = NaN;
  species M_glu__L_e in compartment = NaN;
  species M_cbp_c in compartment = NaN;
  species M_3mob_c in compartment = NaN;
  species M_suchms_c in compartment = NaN;
  species M_tpalm2eACP_c in compartment = NaN;
  species M_3hpalmACP_c in compartment = NaN;
  species M_gln__L_c in compartment = NaN;
  species M_3c3hmp_c in compartment = NaN;
  species M_anth_c in compartment = NaN;
  species M_pap_c in compartment = NaN;
  species M_xmp_c in compartment = NaN;
  species M_2cpr5p_c in compartment = NaN;
  species M_rib__D_p in compartment = NaN;
  species M_xyl__D_p in compartment = NaN;
  species M_octeACP_c in compartment = NaN;
  species M_3hhexACP_c in compartment = NaN;
  species M_t3c5ddeceACP_c in compartment = NaN;
  species M_co2_p in compartment = NaN;
  species M_ala__L_c in compartment = NaN;
  species M_hco3_c in compartment = NaN;
  species M_phe__L_c in compartment = NaN;
  species M_mlthf_c in compartment = NaN;
  species M_t3c7mrseACP_c in compartment = NaN;
  species M_t3c11vaceACP_c in compartment = NaN;
  species M_1pyr5c_c in compartment = NaN;
  species M_acald_p in compartment = NaN;
  species M_2ippm_c in compartment = NaN;
  species M_3psme_c in compartment = NaN;
  species M_imacp_c in compartment = NaN;
  species M_3c2hmp_c in compartment = NaN;
  species M_pser__L_c in compartment = NaN;
  species M_ocdcaACP_c in compartment = NaN;
  species M_gmp_c in compartment = NaN;
  species M_3dhsk_c in compartment = NaN;
  species M_acACP_c in compartment = NaN;
  species M_h2o_c in compartment = NaN;
  species M_alac__S_c in compartment = NaN;
  species M_dcdp_c in compartment = NaN;
  species M_gly_c in compartment = NaN;
  species M_flxso_c in compartment = NaN;
  species M_malcoa_c in compartment = NaN;
  species M_fru_p in compartment = NaN;
  species M_xyl__D_e in compartment = NaN;
  species M_phom_c in compartment = NaN;
  species M_glc__D_e in compartment = NaN;
  species M_nh4_e in compartment = NaN;
  species M_f6p_c in compartment = NaN;
  species M_pphn_c in compartment = NaN;
  species M_prlp_c in compartment = NaN;
  species M_s7p_c in compartment = NaN;
  species M_prfp_c in compartment = NaN;
  species M_tmrs2eACP_c in compartment = NaN;
  species M_o2_e in compartment = NaN;
  species M_succ_e in compartment = NaN;
  species M_mql8_c in compartment = NaN;
  species M_glyc__R_c in compartment = NaN;
  species M_g6p_c in compartment = NaN;
  species M_trdrd_c in compartment = NaN;
  species M_methf_c in compartment = NaN;
  species M_ddcaACP_c in compartment = NaN;
  species M_prpp_c in compartment = NaN;
  species M_histd_c in compartment = NaN;
  species M_for_p in compartment = NaN;
  species M_orot_c in compartment = NaN;
  species M_glc__D_p in compartment = NaN;
  species M_q8_c in compartment = NaN;
  species M_orn_c in compartment = NaN;
  species M_dcaACP_c in compartment = NaN;
  species M_3hcddec5eACP_c in compartment = NaN;
  species M_tddec2eACP_c in compartment = NaN;
  species M_hdca_c in compartment = NaN;
  species M_fgam_c in compartment = NaN;
  species M_cit_c in compartment = NaN;
  species M_skm5p_c in compartment = NaN;
  species M_oaa_c in compartment = NaN;
  species M_23dhmp_c in compartment = NaN;
  species M_fprica_c in compartment = NaN;
  species M_glcn_e in compartment = NaN;
  species M_ac_p in compartment = NaN;
  species M_his__L_c in compartment = NaN;
  species M_so4_c in compartment = NaN;
  species M_6pgl_c in compartment = NaN;
  species M_2dda7p_c in compartment = NaN;
  species M_sl2a6o_c in compartment = NaN;
  species M_gtp_c in compartment = NaN;
  species M_so4_p in compartment = NaN;
  species M_succ_c in compartment = NaN;
  species M_aps_c in compartment = NaN;
  species M_thdp_c in compartment = NaN;
  species M_cdp_c in compartment = NaN;
  species M_glyc__R_e in compartment = NaN;
  species M_nadph_c in compartment = NaN;
  species M_acglu_c in compartment = NaN;
  species M_3hddecACP_c in compartment = NaN;
  species M_2obut_c in compartment = NaN;
  species M_cddec5eACP_c in compartment = NaN;
  species M_glyc_c in compartment = NaN;
  species M_val__L_c in compartment = NaN;
  species M_pro__L_c in compartment = NaN;
  species M_cbasp_c in compartment = NaN;
  species M_mqn8_c in compartment = NaN;
  species M_lac__D_p in compartment = NaN;
  species M_malACP_c in compartment = NaN;
  species M_3hdecACP_c in compartment = NaN;
  species M_cdec3eACP_c in compartment = NaN;
  species M_3hcmrs7eACP_c in compartment = NaN;
  species M_glu__L_p in compartment = NaN;
  species M_3oddecACP_c in compartment = NaN;
  species M_glyc__R_p in compartment = NaN;
  species M_3ooctdACP_c in compartment = NaN;
  species M_but2eACP_c in compartment = NaN;
  species M_ddca_c in compartment = NaN;
  species M_pyr_c in compartment = NaN;
  species M_dump_c in compartment = NaN;
  species M_acon_C_c in compartment = NaN;
  species M_ocdcap_c in compartment = NaN;
  species M_grxox_c in compartment = NaN;
  species M_icit_c in compartment = NaN;
  species M_lac__D_c in compartment = NaN;
  species M_nadh_c in compartment = NaN;
  species M_amp_c in compartment = NaN;
  species M_3php_c in compartment = NaN;
  species M_dtdp_c in compartment = NaN;
  species M_dhf_c in compartment = NaN;
  species M_for_c in compartment = NaN;
  species M_pi_e in compartment = NaN;
  species M_3opalmACP_c in compartment = NaN;
  species M_3hcvac11eACP_c in compartment = NaN;
  species M_coa_c in compartment = NaN;
  species M_asn__L_c in compartment = NaN;
  species M_udp_c in compartment = NaN;
  species M_leu__L_c in compartment = NaN;
  species M_25aics_c in compartment = NaN;
  species M_3omrsACP_c in compartment = NaN;
  species M_acald_c in compartment = NaN;
  species M_3hmrsACP_c in compartment = NaN;
  species M_pram_c in compartment = NaN;
  species M_ocdceap_c in compartment = NaN;
  species M_3c4mop_c in compartment = NaN;
  species M_hcys__L_c in compartment = NaN;
  species M_mal__L_e in compartment = NaN;
  species M_co2_c in compartment = NaN;
  species M_pi_p in compartment = NaN;
  species M_fum_e in compartment = NaN;
  species M_acald_e in compartment = NaN;
  species M_etoh_p in compartment = NaN;
  species M_gthox_c in compartment = NaN;
  species M_gar_c in compartment = NaN;
  species M_3haACP_c in compartment = NaN;
  species M_3ooctACP_c in compartment = NaN;
  species M_3ocmrs7eACP_c in compartment = NaN;
  species M_acg5p_c in compartment = NaN;
  species M_4pasp_c in compartment = NaN;
  species M_glu5p_c in compartment = NaN;
  species M_h2o_e in compartment = NaN;
  species M_23dhdp_c in compartment = NaN;
  species M_3mop_c in compartment = NaN;
  species M_dgtp_c in compartment = NaN;
  species M_rib__D_e in compartment = NaN;
  species M_dcamp_c in compartment = NaN;
  species M_myrsACP_c in compartment = NaN;
  species M_ACP_c in compartment = NaN;
  species M_palmACP_c in compartment = NaN;
  species M_succoa_c in compartment = NaN;
  species M_xyl__D_c in compartment = NaN;
  species M_for_e in compartment = NaN;

  // Reactions:
  R_NDPK5: M_dgdp_c + M_atp_c -> M_adp_c + M_dgtp_c; u_R1*(kC_R1*sqrt(kEQ_R1*kM_R1_M_dgdp_c*kM_R1_M_atp_c/kM_R1_M_adp_c/kM_R1_M_dgtp_c)*(M_dgdp_c/kM_R1_M_dgdp_c)*(M_atp_c/kM_R1_M_atp_c) - kC_R1/sqrt(kEQ_R1*kM_R1_M_dgdp_c*kM_R1_M_atp_c/kM_R1_M_adp_c/kM_R1_M_dgtp_c)*(M_adp_c/kM_R1_M_adp_c)*(M_dgtp_c/kM_R1_M_dgtp_c))/((1 + M_dgdp_c/kM_R1_M_dgdp_c)*(1 + M_atp_c/kM_R1_M_atp_c) + (1 + M_adp_c/kM_R1_M_adp_c)*(1 + M_dgtp_c/kM_R1_M_dgtp_c) - 1);
    u_R1 = NaN; kC_R1 = 1.968; kEQ_R1 = 0.3188; kM_R1_M_adp_c = 0.085; kM_R1_M_dgdp_c = 0.1176; kM_R1_M_atp_c = 0.1176; kM_R1_M_dgtp_c = 0.085;
  R_SHK3Dr: M_h_c + M_3dhsk_c + M_nadph_c -> M_skm_c + M_nadp_c; u_R2*(kC_R2*sqrt(kEQ_R2*kM_R2_M_h_c*kM_R2_M_3dhsk_c*kM_R2_M_nadph_c/kM_R2_M_skm_c/kM_R2_M_nadp_c)*(M_h_c/kM_R2_M_h_c)*(M_3dhsk_c/kM_R2_M_3dhsk_c)*(M_nadph_c/kM_R2_M_nadph_c) - kC_R2/sqrt(kEQ_R2*kM_R2_M_h_c*kM_R2_M_3dhsk_c*kM_R2_M_nadph_c/kM_R2_M_skm_c/kM_R2_M_nadp_c)*(M_skm_c/kM_R2_M_skm_c)*(M_nadp_c/kM_R2_M_nadp_c))/((1 + M_h_c/kM_R2_M_h_c)*(1 + M_3dhsk_c/kM_R2_M_3dhsk_c)*(1 + M_nadph_c/kM_R2_M_nadph_c) + (1 + M_skm_c/kM_R2_M_skm_c)*(1 + M_nadp_c/kM_R2_M_nadp_c) - 1);
    u_R2 = NaN; kC_R2 = 3.935; kEQ_R2 = 12.01; kM_R2_M_h_c = 0.06293; kM_R2_M_skm_c = 0.1589; kM_R2_M_nadp_c = 0.1589; kM_R2_M_3dhsk_c = 0.06293; kM_R2_M_nadph_c = 0.06293;
  R_NDPK6: M_dudp_c + M_atp_c -> M_dutp_c + M_adp_c; u_R3*(kC_R3*sqrt(kEQ_R3*kM_R3_M_dudp_c*kM_R3_M_atp_c/kM_R3_M_dutp_c/kM_R3_M_adp_c)*(M_dudp_c/kM_R3_M_dudp_c)*(M_atp_c/kM_R3_M_atp_c) - kC_R3/sqrt(kEQ_R3*kM_R3_M_dudp_c*kM_R3_M_atp_c/kM_R3_M_dutp_c/kM_R3_M_adp_c)*(M_dutp_c/kM_R3_M_dutp_c)*(M_adp_c/kM_R3_M_adp_c))/((1 + M_dudp_c/kM_R3_M_dudp_c)*(1 + M_atp_c/kM_R3_M_atp_c) + (1 + M_dutp_c/kM_R3_M_dutp_c)*(1 + M_adp_c/kM_R3_M_adp_c) - 1);
    u_R3 = NaN; kC_R3 = 0.1769; kEQ_R3 = 1.668; kM_R3_M_dutp_c = 0.02996; kM_R3_M_adp_c = 0.02996; kM_R3_M_dudp_c = 0.3338; kM_R3_M_atp_c = 0.3338;
  R_NDPK8: M_dadp_c + M_atp_c -> M_adp_c + M_datp_c; u_R4*(kC_R4*sqrt(kEQ_R4*kM_R4_M_dadp_c*kM_R4_M_atp_c/kM_R4_M_adp_c/kM_R4_M_datp_c)*(M_dadp_c/kM_R4_M_dadp_c)*(M_atp_c/kM_R4_M_atp_c) - kC_R4/sqrt(kEQ_R4*kM_R4_M_dadp_c*kM_R4_M_atp_c/kM_R4_M_adp_c/kM_R4_M_datp_c)*(M_adp_c/kM_R4_M_adp_c)*(M_datp_c/kM_R4_M_datp_c))/((1 + M_dadp_c/kM_R4_M_dadp_c)*(1 + M_atp_c/kM_R4_M_atp_c) + (1 + M_adp_c/kM_R4_M_adp_c)*(1 + M_datp_c/kM_R4_M_datp_c) - 1);
    u_R4 = NaN; kC_R4 = 1.18; kEQ_R4 = 0.3055; kM_R4_M_dadp_c = 0.1108; kM_R4_M_adp_c = 0.09026; kM_R4_M_atp_c = 0.1108; kM_R4_M_datp_c = 0.09026;
  R_DHORTS: M_dhor__S_c + M_h2o_c -> M_h_c + M_cbasp_c; u_R5*(kC_R5*sqrt(kEQ_R5*kM_R5_M_dhor__S_c*kM_R5_M_h2o_c/kM_R5_M_h_c/kM_R5_M_cbasp_c)*(M_dhor__S_c/kM_R5_M_dhor__S_c)*(M_h2o_c/kM_R5_M_h2o_c) - kC_R5/sqrt(kEQ_R5*kM_R5_M_dhor__S_c*kM_R5_M_h2o_c/kM_R5_M_h_c/kM_R5_M_cbasp_c)*(M_h_c/kM_R5_M_h_c)*(M_cbasp_c/kM_R5_M_cbasp_c))/((1 + M_dhor__S_c/kM_R5_M_dhor__S_c)*(1 + M_h2o_c/kM_R5_M_h2o_c) + (1 + M_h_c/kM_R5_M_h_c)*(1 + M_cbasp_c/kM_R5_M_cbasp_c) - 1);
    u_R5 = NaN; kC_R5 = 5.647; kEQ_R5 = 15.06; kM_R5_M_h_c = 0.04581; kM_R5_M_dhor__S_c = 0.2183; kM_R5_M_h2o_c = 0.2183; kM_R5_M_cbasp_c = 3.69;
  R_OMPDC: M_h_c + M_orot5p_c => M_ump_c + M_co2_c; u_R6*(kC_R6*sqrt(kEQ_R6*kM_R6_M_h_c*kM_R6_M_orot5p_c/kM_R6_M_ump_c/kM_R6_M_co2_c)*(M_h_c/kM_R6_M_h_c)*(M_orot5p_c/kM_R6_M_orot5p_c) - kC_R6/sqrt(kEQ_R6*kM_R6_M_h_c*kM_R6_M_orot5p_c/kM_R6_M_ump_c/kM_R6_M_co2_c)*(M_ump_c/kM_R6_M_ump_c)*(M_co2_c/kM_R6_M_co2_c))/((1 + M_h_c/kM_R6_M_h_c)*(1 + M_orot5p_c/kM_R6_M_orot5p_c) + (1 + M_ump_c/kM_R6_M_ump_c)*(1 + M_co2_c/kM_R6_M_co2_c) - 1);
    u_R6 = NaN; kC_R6 = 27.59; kEQ_R6 = 1043; kM_R6_M_h_c = 0.04354; kM_R6_M_ump_c = 0.2297; kM_R6_M_orot5p_c = 0.0002629; kM_R6_M_co2_c = 0.2297;
  R_G5SD: M_h_c + M_nadph_c + M_glu5p_c => M_pi_c + M_nadp_c + M_glu5sa_c; u_R7*(kC_R7*sqrt(kEQ_R7*kM_R7_M_h_c*kM_R7_M_nadph_c*kM_R7_M_glu5p_c/kM_R7_M_pi_c/kM_R7_M_nadp_c/kM_R7_M_glu5sa_c)*(M_h_c/kM_R7_M_h_c)*(M_nadph_c/kM_R7_M_nadph_c)*(M_glu5p_c/kM_R7_M_glu5p_c) - kC_R7/sqrt(kEQ_R7*kM_R7_M_h_c*kM_R7_M_nadph_c*kM_R7_M_glu5p_c/kM_R7_M_pi_c/kM_R7_M_nadp_c/kM_R7_M_glu5sa_c)*(M_pi_c/kM_R7_M_pi_c)*(M_nadp_c/kM_R7_M_nadp_c)*(M_glu5sa_c/kM_R7_M_glu5sa_c))/((1 + M_h_c/kM_R7_M_h_c)*(1 + M_nadph_c/kM_R7_M_nadph_c)*(1 + M_glu5p_c/kM_R7_M_glu5p_c) + (1 + M_pi_c/kM_R7_M_pi_c)*(1 + M_nadp_c/kM_R7_M_nadp_c)*(1 + M_glu5sa_c/kM_R7_M_glu5sa_c) - 1);
    u_R7 = NaN; kC_R7 = 8.89; kEQ_R7 = 17.28; kM_R7_M_h_c = 0.09883; kM_R7_M_pi_c = 5.565; kM_R7_M_nadp_c = 0.01727; kM_R7_M_glu5sa_c = 0.1012; kM_R7_M_nadph_c = 0.09883; kM_R7_M_glu5p_c = 0.09883;
  R_CS: M_accoa_c + M_h2o_c + M_oaa_c => M_h_c + M_cit_c + M_coa_c; u_R8*(kC_R8*sqrt(kEQ_R8*kM_R8_M_accoa_c*kM_R8_M_h2o_c*kM_R8_M_oaa_c/kM_R8_M_h_c/kM_R8_M_cit_c/kM_R8_M_coa_c)*(M_accoa_c/kM_R8_M_accoa_c)*(M_h2o_c/kM_R8_M_h2o_c)*(M_oaa_c/kM_R8_M_oaa_c) - kC_R8/sqrt(kEQ_R8*kM_R8_M_accoa_c*kM_R8_M_h2o_c*kM_R8_M_oaa_c/kM_R8_M_h_c/kM_R8_M_cit_c/kM_R8_M_coa_c)*(M_h_c/kM_R8_M_h_c)*(M_cit_c/kM_R8_M_cit_c)*(M_coa_c/kM_R8_M_coa_c))/((1 + M_accoa_c/kM_R8_M_accoa_c)*(1 + M_h2o_c/kM_R8_M_h2o_c)*(1 + M_oaa_c/kM_R8_M_oaa_c) + (1 + M_h_c/kM_R8_M_h_c)*(1 + M_cit_c/kM_R8_M_cit_c)*(1 + M_coa_c/kM_R8_M_coa_c) - 1);
    u_R8 = NaN; kC_R8 = 45.31; kEQ_R8 = 5855000; kM_R8_M_h_c = 0.849; kM_R8_M_accoa_c = 0.02737; kM_R8_M_h2o_c = 0.01178; kM_R8_M_cit_c = 0.849; kM_R8_M_oaa_c = 0.0007584; kM_R8_M_coa_c = 0.849;
  R_ICDHyr: M_nadp_c + M_icit_c -> M_akg_c + M_nadph_c + M_co2_c; u_R9*(kC_R9*sqrt(kEQ_R9*kM_R9_M_nadp_c*kM_R9_M_icit_c/kM_R9_M_akg_c/kM_R9_M_nadph_c/kM_R9_M_co2_c)*(M_nadp_c/kM_R9_M_nadp_c)*(M_icit_c/kM_R9_M_icit_c) - kC_R9/sqrt(kEQ_R9*kM_R9_M_nadp_c*kM_R9_M_icit_c/kM_R9_M_akg_c/kM_R9_M_nadph_c/kM_R9_M_co2_c)*(M_akg_c/kM_R9_M_akg_c)*(M_nadph_c/kM_R9_M_nadph_c)*(M_co2_c/kM_R9_M_co2_c))/((1 + M_nadp_c/kM_R9_M_nadp_c)*(1 + M_icit_c/kM_R9_M_icit_c) + (1 + M_akg_c/kM_R9_M_akg_c)*(1 + M_nadph_c/kM_R9_M_nadph_c)*(1 + M_co2_c/kM_R9_M_co2_c) - 1);
    u_R9 = NaN; kC_R9 = 3.193; kEQ_R9 = 0.04985; kM_R9_M_akg_c = 0.01742; kM_R9_M_nadp_c = 0.004664; kM_R9_M_nadph_c = 0.01742; kM_R9_M_icit_c = 0.00397; kM_R9_M_co2_c = 0.01742;
  R_ACALD: M_nad_c + M_coa_c + M_acald_c -> M_h_c + M_accoa_c + M_nadh_c; u_R10*(kC_R10*sqrt(kEQ_R10*kM_R10_M_nad_c*kM_R10_M_coa_c*kM_R10_M_acald_c/kM_R10_M_h_c/kM_R10_M_accoa_c/kM_R10_M_nadh_c)*(M_nad_c/kM_R10_M_nad_c)*(M_coa_c/kM_R10_M_coa_c)*(M_acald_c/kM_R10_M_acald_c) - kC_R10/sqrt(kEQ_R10*kM_R10_M_nad_c*kM_R10_M_coa_c*kM_R10_M_acald_c/kM_R10_M_h_c/kM_R10_M_accoa_c/kM_R10_M_nadh_c)*(M_h_c/kM_R10_M_h_c)*(M_accoa_c/kM_R10_M_accoa_c)*(M_nadh_c/kM_R10_M_nadh_c))/((1 + M_nad_c/kM_R10_M_nad_c)*(1 + M_coa_c/kM_R10_M_coa_c)*(1 + M_acald_c/kM_R10_M_acald_c) + (1 + M_h_c/kM_R10_M_h_c)*(1 + M_accoa_c/kM_R10_M_accoa_c)*(1 + M_nadh_c/kM_R10_M_nadh_c) - 1);
    u_R10 = NaN; kC_R10 = 8.965; kEQ_R10 = 3618; kM_R10_M_h_c = 7.444; kM_R10_M_accoa_c = 0.001598; kM_R10_M_nad_c = 0.01158; kM_R10_M_nadh_c = 0.01357; kM_R10_M_coa_c = 0.001304; kM_R10_M_acald_c = 0.001343;
  R_PPA: M_ppi_c + M_h2o_c => M_h_c + 2 M_pi_c; u_R11*(kC_R11*sqrt(kEQ_R11*kM_R11_M_ppi_c*kM_R11_M_h2o_c/kM_R11_M_h_c/kM_R11_M_pi_c^2)*(M_ppi_c/kM_R11_M_ppi_c)*(M_h2o_c/kM_R11_M_h2o_c) - kC_R11/sqrt(kEQ_R11*kM_R11_M_ppi_c*kM_R11_M_h2o_c/kM_R11_M_h_c/kM_R11_M_pi_c^2)*(M_h_c/kM_R11_M_h_c)*(M_pi_c/kM_R11_M_pi_c)^2)/((1 + M_ppi_c/kM_R11_M_ppi_c)*(1 + M_h2o_c/kM_R11_M_h2o_c) + (1 + M_h_c/kM_R11_M_h_c)*(1 + M_pi_c/kM_R11_M_pi_c)^2 - 1);
    u_R11 = NaN; kC_R11 = 29.1; kEQ_R11 = 773.4; kM_R11_M_h_c = 0.4013; kM_R11_M_pi_c = 1.611; kM_R11_M_ppi_c = 0.065; kM_R11_M_h2o_c = 0.02492;
  R_PPCK: M_atp_c + M_oaa_c => M_pep_c + M_adp_c + M_co2_c; u_R12*(kC_R12*sqrt(kEQ_R12*kM_R12_M_atp_c*kM_R12_M_oaa_c/kM_R12_M_pep_c/kM_R12_M_adp_c/kM_R12_M_co2_c)*(M_atp_c/kM_R12_M_atp_c)*(M_oaa_c/kM_R12_M_oaa_c) - kC_R12/sqrt(kEQ_R12*kM_R12_M_atp_c*kM_R12_M_oaa_c/kM_R12_M_pep_c/kM_R12_M_adp_c/kM_R12_M_co2_c)*(M_pep_c/kM_R12_M_pep_c)*(M_adp_c/kM_R12_M_adp_c)*(M_co2_c/kM_R12_M_co2_c))/((1 + M_atp_c/kM_R12_M_atp_c)*(1 + M_oaa_c/kM_R12_M_oaa_c) + (1 + M_pep_c/kM_R12_M_pep_c)*(1 + M_adp_c/kM_R12_M_adp_c)*(1 + M_co2_c/kM_R12_M_co2_c) - 1);
    u_R12 = NaN; kC_R12 = 10.9; kEQ_R12 = 0.01907; kM_R12_M_pep_c = 1.91; kM_R12_M_adp_c = 0.004326; kM_R12_M_atp_c = 0.006885; kM_R12_M_oaa_c = 0.3619; kM_R12_M_co2_c = 0.05677;
  R_ME1: M_nad_c + M_mal__L_c => M_pyr_c + M_nadh_c + M_co2_c; u_R13*(kC_R13*sqrt(kEQ_R13*kM_R13_M_nad_c*kM_R13_M_mal__L_c/kM_R13_M_pyr_c/kM_R13_M_nadh_c/kM_R13_M_co2_c)*(M_nad_c/kM_R13_M_nad_c)*(M_mal__L_c/kM_R13_M_mal__L_c) - kC_R13/sqrt(kEQ_R13*kM_R13_M_nad_c*kM_R13_M_mal__L_c/kM_R13_M_pyr_c/kM_R13_M_nadh_c/kM_R13_M_co2_c)*(M_pyr_c/kM_R13_M_pyr_c)*(M_nadh_c/kM_R13_M_nadh_c)*(M_co2_c/kM_R13_M_co2_c))/((1 + M_nad_c/kM_R13_M_nad_c)*(1 + M_mal__L_c/kM_R13_M_mal__L_c) + (1 + M_pyr_c/kM_R13_M_pyr_c)*(1 + M_nadh_c/kM_R13_M_nadh_c)*(1 + M_co2_c/kM_R13_M_co2_c) - 1);
    u_R13 = NaN; kC_R13 = 30.72; kEQ_R13 = 0.009167; kM_R13_M_nad_c = 0.006171; kM_R13_M_mal__L_c = 0.2839; kM_R13_M_pyr_c = 0.2295; kM_R13_M_nadh_c = 0.002136; kM_R13_M_co2_c = 0.2295;
  R_ALATA_L: M_akg_c + M_ala__L_c -> M_glu__L_c + M_pyr_c; u_R14*(kC_R14*sqrt(kEQ_R14*kM_R14_M_akg_c*kM_R14_M_ala__L_c/kM_R14_M_glu__L_c/kM_R14_M_pyr_c)*(M_akg_c/kM_R14_M_akg_c)*(M_ala__L_c/kM_R14_M_ala__L_c) - kC_R14/sqrt(kEQ_R14*kM_R14_M_akg_c*kM_R14_M_ala__L_c/kM_R14_M_glu__L_c/kM_R14_M_pyr_c)*(M_glu__L_c/kM_R14_M_glu__L_c)*(M_pyr_c/kM_R14_M_pyr_c))/((1 + M_akg_c/kM_R14_M_akg_c)*(1 + M_ala__L_c/kM_R14_M_ala__L_c) + (1 + M_glu__L_c/kM_R14_M_glu__L_c)*(1 + M_pyr_c/kM_R14_M_pyr_c) - 1);
    u_R14 = NaN; kC_R14 = 17.14; kEQ_R14 = 0.8987; kM_R14_M_akg_c = 0.07617; kM_R14_M_glu__L_c = 0.1313; kM_R14_M_ala__L_c = 0.07617; kM_R14_M_pyr_c = 0.1313;
  R_XYLK: M_xylu__D_c + M_atp_c => M_h_c + M_xu5p__D_c + M_adp_c; u_R15*(kC_R15*sqrt(kEQ_R15*kM_R15_M_xylu__D_c*kM_R15_M_atp_c/kM_R15_M_h_c/kM_R15_M_xu5p__D_c/kM_R15_M_adp_c)*(M_xylu__D_c/kM_R15_M_xylu__D_c)*(M_atp_c/kM_R15_M_atp_c) - kC_R15/sqrt(kEQ_R15*kM_R15_M_xylu__D_c*kM_R15_M_atp_c/kM_R15_M_h_c/kM_R15_M_xu5p__D_c/kM_R15_M_adp_c)*(M_h_c/kM_R15_M_h_c)*(M_xu5p__D_c/kM_R15_M_xu5p__D_c)*(M_adp_c/kM_R15_M_adp_c))/((1 + M_xylu__D_c/kM_R15_M_xylu__D_c)*(1 + M_atp_c/kM_R15_M_atp_c) + (1 + M_h_c/kM_R15_M_h_c)*(1 + M_xu5p__D_c/kM_R15_M_xu5p__D_c)*(1 + M_adp_c/kM_R15_M_adp_c) - 1);
    u_R15 = NaN; kC_R15 = 18.3; kEQ_R15 = 10760; kM_R15_M_h_c = 1.705; kM_R15_M_xu5p__D_c = 1.705; kM_R15_M_adp_c = 1.705; kM_R15_M_xylu__D_c = 0.06704; kM_R15_M_atp_c = 8.109;
  R_RBK: M_rib__D_c + M_atp_c => M_r5p_c + M_h_c + M_adp_c; u_R16*(kC_R16*sqrt(kEQ_R16*kM_R16_M_rib__D_c*kM_R16_M_atp_c/kM_R16_M_r5p_c/kM_R16_M_h_c/kM_R16_M_adp_c)*(M_rib__D_c/kM_R16_M_rib__D_c)*(M_atp_c/kM_R16_M_atp_c) - kC_R16/sqrt(kEQ_R16*kM_R16_M_rib__D_c*kM_R16_M_atp_c/kM_R16_M_r5p_c/kM_R16_M_h_c/kM_R16_M_adp_c)*(M_r5p_c/kM_R16_M_r5p_c)*(M_h_c/kM_R16_M_h_c)*(M_adp_c/kM_R16_M_adp_c))/((1 + M_rib__D_c/kM_R16_M_rib__D_c)*(1 + M_atp_c/kM_R16_M_atp_c) + (1 + M_r5p_c/kM_R16_M_r5p_c)*(1 + M_h_c/kM_R16_M_h_c)*(1 + M_adp_c/kM_R16_M_adp_c) - 1);
    u_R16 = NaN; kC_R16 = 17.07; kEQ_R16 = 0.003357; kM_R16_M_r5p_c = 0.04758; kM_R16_M_h_c = 0.04758; kM_R16_M_rib__D_c = 0.2102; kM_R16_M_adp_c = 0.005892; kM_R16_M_atp_c = 0.02025;
  R_GLYK: M_atp_c + M_glyc_c => M_h_c + M_glyc3p_c + M_adp_c; u_R17*(kC_R17*sqrt(kEQ_R17*kM_R17_M_atp_c*kM_R17_M_glyc_c/kM_R17_M_h_c/kM_R17_M_glyc3p_c/kM_R17_M_adp_c)*(M_atp_c/kM_R17_M_atp_c)*(M_glyc_c/kM_R17_M_glyc_c) - kC_R17/sqrt(kEQ_R17*kM_R17_M_atp_c*kM_R17_M_glyc_c/kM_R17_M_h_c/kM_R17_M_glyc3p_c/kM_R17_M_adp_c)*(M_h_c/kM_R17_M_h_c)*(M_glyc3p_c/kM_R17_M_glyc3p_c)*(M_adp_c/kM_R17_M_adp_c))/((1 + M_atp_c/kM_R17_M_atp_c)*(1 + M_glyc_c/kM_R17_M_glyc_c) + (1 + M_h_c/kM_R17_M_h_c)*(1 + M_glyc3p_c/kM_R17_M_glyc3p_c)*(1 + M_adp_c/kM_R17_M_adp_c) - 1);
    u_R17 = NaN; kC_R17 = 3.876; kEQ_R17 = 712.9; kM_R17_M_h_c = 0.1438; kM_R17_M_glyc3p_c = 0.1438; kM_R17_M_adp_c = 0.1438; kM_R17_M_atp_c = 0.01157; kM_R17_M_glyc_c = 0.06955;
  R_ASPTA: M_akg_c + M_asp__L_c -> M_glu__L_c + M_oaa_c; u_R18*(kC_R18*sqrt(kEQ_R18*kM_R18_M_akg_c*kM_R18_M_asp__L_c/kM_R18_M_glu__L_c/kM_R18_M_oaa_c)*(M_akg_c/kM_R18_M_akg_c)*(M_asp__L_c/kM_R18_M_asp__L_c) - kC_R18/sqrt(kEQ_R18*kM_R18_M_akg_c*kM_R18_M_asp__L_c/kM_R18_M_glu__L_c/kM_R18_M_oaa_c)*(M_glu__L_c/kM_R18_M_glu__L_c)*(M_oaa_c/kM_R18_M_oaa_c))/((1 + M_akg_c/kM_R18_M_akg_c)*(1 + M_asp__L_c/kM_R18_M_asp__L_c) + (1 + M_glu__L_c/kM_R18_M_glu__L_c)*(1 + M_oaa_c/kM_R18_M_oaa_c) - 1);
    u_R18 = NaN; kC_R18 = 5.67; kEQ_R18 = 0.3104; kM_R18_M_akg_c = 2.698; kM_R18_M_asp__L_c = 7.211; kM_R18_M_glu__L_c = 19.02; kM_R18_M_oaa_c = 0.02786;
  R_FBP: M_fdp_c + M_h2o_c => M_pi_c + M_f6p_c; u_R19*(kC_R19*sqrt(kEQ_R19*kM_R19_M_fdp_c*kM_R19_M_h2o_c/kM_R19_M_pi_c/kM_R19_M_f6p_c)*(M_fdp_c/kM_R19_M_fdp_c)*(M_h2o_c/kM_R19_M_h2o_c) - kC_R19/sqrt(kEQ_R19*kM_R19_M_fdp_c*kM_R19_M_h2o_c/kM_R19_M_pi_c/kM_R19_M_f6p_c)*(M_pi_c/kM_R19_M_pi_c)*(M_f6p_c/kM_R19_M_f6p_c))/((1 + M_fdp_c/kM_R19_M_fdp_c)*(1 + M_h2o_c/kM_R19_M_h2o_c) + (1 + M_pi_c/kM_R19_M_pi_c)*(1 + M_f6p_c/kM_R19_M_f6p_c) - 1);
    u_R19 = NaN; kC_R19 = 10; kEQ_R19 = 98940; kM_R19_M_pi_c = 0.4732; kM_R19_M_fdp_c = 0.02113; kM_R19_M_h2o_c = 0.02113; kM_R19_M_f6p_c = 0.4732;
  R_EX_pi_e: M_pi_e -> ; u_R20*(kC_R20*sqrt(kEQ_R20*kM_R20_M_pi_e)*(M_pi_e/kM_R20_M_pi_e) - kC_R20/sqrt(kEQ_R20*kM_R20_M_pi_e))/(1 + M_pi_e/kM_R20_M_pi_e + (-1));
    u_R20 = NaN; kC_R20 = 10; kEQ_R20 = 0.01038; kM_R20_M_pi_e = 0.4767;
  R_PYK: M_pep_c + M_h_c + M_adp_c => M_atp_c + M_pyr_c; u_R21*(kC_R21*sqrt(kEQ_R21*kM_R21_M_pep_c*kM_R21_M_h_c*kM_R21_M_adp_c/kM_R21_M_atp_c/kM_R21_M_pyr_c)*(M_pep_c/kM_R21_M_pep_c)*(M_h_c/kM_R21_M_h_c)*(M_adp_c/kM_R21_M_adp_c) - kC_R21/sqrt(kEQ_R21*kM_R21_M_pep_c*kM_R21_M_h_c*kM_R21_M_adp_c/kM_R21_M_atp_c/kM_R21_M_pyr_c)*(M_atp_c/kM_R21_M_atp_c)*(M_pyr_c/kM_R21_M_pyr_c))/((1 + M_pep_c/kM_R21_M_pep_c)*(1 + M_h_c/kM_R21_M_h_c)*(1 + M_adp_c/kM_R21_M_adp_c) + (1 + M_atp_c/kM_R21_M_atp_c)*(1 + M_pyr_c/kM_R21_M_pyr_c) - 1);
    u_R21 = NaN; kC_R21 = 43.73; kEQ_R21 = 21210; kM_R21_M_pep_c = 0.01904; kM_R21_M_h_c = 0.01904; kM_R21_M_adp_c = 0.01904; kM_R21_M_atp_c = 0.5251; kM_R21_M_pyr_c = 0.5251;
  R_EX_co2_e: M_co2_e -> ; u_R22*(kC_R22*sqrt(kEQ_R22*kM_R22_M_co2_e)*(M_co2_e/kM_R22_M_co2_e) - kC_R22/sqrt(kEQ_R22*kM_R22_M_co2_e))/(1 + M_co2_e/kM_R22_M_co2_e + (-1));
    u_R22 = NaN; kC_R22 = 10; kEQ_R22 = 0.01105; kM_R22_M_co2_e = 0.4699;
  R_GTHOr: M_h_c + M_nadph_c + M_gthox_c -> 2 M_gthrd_c + M_nadp_c; u_R23*(kC_R23*sqrt(kEQ_R23*kM_R23_M_h_c*kM_R23_M_nadph_c*kM_R23_M_gthox_c/kM_R23_M_gthrd_c^2/kM_R23_M_nadp_c)*(M_h_c/kM_R23_M_h_c)*(M_nadph_c/kM_R23_M_nadph_c)*(M_gthox_c/kM_R23_M_gthox_c) - kC_R23/sqrt(kEQ_R23*kM_R23_M_h_c*kM_R23_M_nadph_c*kM_R23_M_gthox_c/kM_R23_M_gthrd_c^2/kM_R23_M_nadp_c)*(M_gthrd_c/kM_R23_M_gthrd_c)^2*(M_nadp_c/kM_R23_M_nadp_c))/((1 + M_h_c/kM_R23_M_h_c)*(1 + M_nadph_c/kM_R23_M_nadph_c)*(1 + M_gthox_c/kM_R23_M_gthox_c) + (1 + M_gthrd_c/kM_R23_M_gthrd_c)^2*(1 + M_nadp_c/kM_R23_M_nadp_c) - 1);
    u_R23 = NaN; kC_R23 = 0.9862; kEQ_R23 = 156.5; kM_R23_M_h_c = 0.1139; kM_R23_M_gthrd_c = 0.07714; kM_R23_M_nadp_c = 0.08783; kM_R23_M_nadph_c = 0.001416; kM_R23_M_gthox_c = 0.01045;
  R_ILETA: M_akg_c + M_ile__L_c -> M_glu__L_c + M_3mop_c; u_R24*(kC_R24*sqrt(kEQ_R24*kM_R24_M_akg_c*kM_R24_M_ile__L_c/kM_R24_M_glu__L_c/kM_R24_M_3mop_c)*(M_akg_c/kM_R24_M_akg_c)*(M_ile__L_c/kM_R24_M_ile__L_c) - kC_R24/sqrt(kEQ_R24*kM_R24_M_akg_c*kM_R24_M_ile__L_c/kM_R24_M_glu__L_c/kM_R24_M_3mop_c)*(M_glu__L_c/kM_R24_M_glu__L_c)*(M_3mop_c/kM_R24_M_3mop_c))/((1 + M_akg_c/kM_R24_M_akg_c)*(1 + M_ile__L_c/kM_R24_M_ile__L_c) + (1 + M_glu__L_c/kM_R24_M_glu__L_c)*(1 + M_3mop_c/kM_R24_M_3mop_c) - 1);
    u_R24 = NaN; kC_R24 = 4.793; kEQ_R24 = 5.652; kM_R24_M_akg_c = 0.07051; kM_R24_M_glu__L_c = 0.1418; kM_R24_M_ile__L_c = 0.07051; kM_R24_M_3mop_c = 0.1418;
  R_DHORD5: M_dhor__S_c + M_mqn8_c => M_mql8_c + M_orot_c; u_R25*(kC_R25*sqrt(kEQ_R25*kM_R25_M_dhor__S_c*kM_R25_M_mqn8_c/kM_R25_M_mql8_c/kM_R25_M_orot_c)*(M_dhor__S_c/kM_R25_M_dhor__S_c)*(M_mqn8_c/kM_R25_M_mqn8_c) - kC_R25/sqrt(kEQ_R25*kM_R25_M_dhor__S_c*kM_R25_M_mqn8_c/kM_R25_M_mql8_c/kM_R25_M_orot_c)*(M_mql8_c/kM_R25_M_mql8_c)*(M_orot_c/kM_R25_M_orot_c))/((1 + M_dhor__S_c/kM_R25_M_dhor__S_c)*(1 + M_mqn8_c/kM_R25_M_mqn8_c) + (1 + M_mql8_c/kM_R25_M_mql8_c)*(1 + M_orot_c/kM_R25_M_orot_c) - 1);
    u_R25 = NaN; kC_R25 = 10; kEQ_R25 = 1.055; kM_R25_M_dhor__S_c = 0.09927; kM_R25_M_mql8_c = 0.1007; kM_R25_M_orot_c = 0.1007; kM_R25_M_mqn8_c = 0.09927;
  R_VALTA: M_akg_c + M_val__L_c -> M_glu__L_c + M_3mob_c; u_R26*(kC_R26*sqrt(kEQ_R26*kM_R26_M_akg_c*kM_R26_M_val__L_c/kM_R26_M_glu__L_c/kM_R26_M_3mob_c)*(M_akg_c/kM_R26_M_akg_c)*(M_val__L_c/kM_R26_M_val__L_c) - kC_R26/sqrt(kEQ_R26*kM_R26_M_akg_c*kM_R26_M_val__L_c/kM_R26_M_glu__L_c/kM_R26_M_3mob_c)*(M_glu__L_c/kM_R26_M_glu__L_c)*(M_3mob_c/kM_R26_M_3mob_c))/((1 + M_akg_c/kM_R26_M_akg_c)*(1 + M_val__L_c/kM_R26_M_val__L_c) + (1 + M_glu__L_c/kM_R26_M_glu__L_c)*(1 + M_3mob_c/kM_R26_M_3mob_c) - 1);
    u_R26 = NaN; kC_R26 = 4.889; kEQ_R26 = 0.5131; kM_R26_M_akg_c = 0.5537; kM_R26_M_glu__L_c = 0.01806; kM_R26_M_3mob_c = 0.7514; kM_R26_M_val__L_c = 0.5537;
  R_IPPMIb: M_2ippm_c + M_h2o_c -> M_3c3hmp_c; u_R27*(kC_R27*sqrt(kEQ_R27*kM_R27_M_2ippm_c*kM_R27_M_h2o_c/kM_R27_M_3c3hmp_c)*(M_2ippm_c/kM_R27_M_2ippm_c)*(M_h2o_c/kM_R27_M_h2o_c) - kC_R27/sqrt(kEQ_R27*kM_R27_M_2ippm_c*kM_R27_M_h2o_c/kM_R27_M_3c3hmp_c)*(M_3c3hmp_c/kM_R27_M_3c3hmp_c))/((1 + M_2ippm_c/kM_R27_M_2ippm_c)*(1 + M_h2o_c/kM_R27_M_h2o_c) + 1 + M_3c3hmp_c/kM_R27_M_3c3hmp_c - 1);
    u_R27 = NaN; kC_R27 = 2.963; kEQ_R27 = 0.9466; kM_R27_M_3c3hmp_c = 0.0301; kM_R27_M_2ippm_c = 0.3322; kM_R27_M_h2o_c = 0.3322;
  R_ORPT: M_orot5p_c + M_ppi_c -> M_prpp_c + M_orot_c; u_R28*(kC_R28*sqrt(kEQ_R28*kM_R28_M_orot5p_c*kM_R28_M_ppi_c/kM_R28_M_prpp_c/kM_R28_M_orot_c)*(M_orot5p_c/kM_R28_M_orot5p_c)*(M_ppi_c/kM_R28_M_ppi_c) - kC_R28/sqrt(kEQ_R28*kM_R28_M_orot5p_c*kM_R28_M_ppi_c/kM_R28_M_prpp_c/kM_R28_M_orot_c)*(M_prpp_c/kM_R28_M_prpp_c)*(M_orot_c/kM_R28_M_orot_c))/((1 + M_orot5p_c/kM_R28_M_orot5p_c)*(1 + M_ppi_c/kM_R28_M_ppi_c) + (1 + M_prpp_c/kM_R28_M_prpp_c)*(1 + M_orot_c/kM_R28_M_orot_c) - 1);
    u_R28 = NaN; kC_R28 = 19.6; kEQ_R28 = 4.301; kM_R28_M_orot5p_c = 0.013; kM_R28_M_ppi_c = 0.07794; kM_R28_M_prpp_c = 0.01337; kM_R28_M_orot_c = 0.01971;
  R_ACHBS: M_h_c + M_2obut_c + M_pyr_c => M_2ahbut_c + M_co2_c; u_R29*(kC_R29*sqrt(kEQ_R29*kM_R29_M_h_c*kM_R29_M_2obut_c*kM_R29_M_pyr_c/kM_R29_M_2ahbut_c/kM_R29_M_co2_c)*(M_h_c/kM_R29_M_h_c)*(M_2obut_c/kM_R29_M_2obut_c)*(M_pyr_c/kM_R29_M_pyr_c) - kC_R29/sqrt(kEQ_R29*kM_R29_M_h_c*kM_R29_M_2obut_c*kM_R29_M_pyr_c/kM_R29_M_2ahbut_c/kM_R29_M_co2_c)*(M_2ahbut_c/kM_R29_M_2ahbut_c)*(M_co2_c/kM_R29_M_co2_c))/((1 + M_h_c/kM_R29_M_h_c)*(1 + M_2obut_c/kM_R29_M_2obut_c)*(1 + M_pyr_c/kM_R29_M_pyr_c) + (1 + M_2ahbut_c/kM_R29_M_2ahbut_c)*(1 + M_co2_c/kM_R29_M_co2_c) - 1);
    u_R29 = NaN; kC_R29 = 20.12; kEQ_R29 = 415.6; kM_R29_M_h_c = 0.01642; kM_R29_M_2ahbut_c = 0.6089; kM_R29_M_2obut_c = 78.76; kM_R29_M_pyr_c = 0.01642; kM_R29_M_co2_c = 0.6089;
  R_DHAD2: M_23dhmp_c => M_h2o_c + M_3mop_c; u_R30*(kC_R30*sqrt(kEQ_R30*kM_R30_M_23dhmp_c/kM_R30_M_h2o_c/kM_R30_M_3mop_c)*(M_23dhmp_c/kM_R30_M_23dhmp_c) - kC_R30/sqrt(kEQ_R30*kM_R30_M_23dhmp_c/kM_R30_M_h2o_c/kM_R30_M_3mop_c)*(M_h2o_c/kM_R30_M_h2o_c)*(M_3mop_c/kM_R30_M_3mop_c))/(1 + M_23dhmp_c/kM_R30_M_23dhmp_c + (1 + M_h2o_c/kM_R30_M_h2o_c)*(1 + M_3mop_c/kM_R30_M_3mop_c) - 1);
    u_R30 = NaN; kC_R30 = 89.83; kEQ_R30 = 2042000; kM_R30_M_h2o_c = 5.962; kM_R30_M_23dhmp_c = 0.001677; kM_R30_M_3mop_c = 5.962;
  R_ACLS: M_h_c + 2 M_pyr_c => M_alac__S_c + M_co2_c; u_R31*(kC_R31*sqrt(kEQ_R31*kM_R31_M_h_c*kM_R31_M_pyr_c^2/kM_R31_M_alac__S_c/kM_R31_M_co2_c)*(M_h_c/kM_R31_M_h_c)*(M_pyr_c/kM_R31_M_pyr_c)^2 - kC_R31/sqrt(kEQ_R31*kM_R31_M_h_c*kM_R31_M_pyr_c^2/kM_R31_M_alac__S_c/kM_R31_M_co2_c)*(M_alac__S_c/kM_R31_M_alac__S_c)*(M_co2_c/kM_R31_M_co2_c))/((1 + M_h_c/kM_R31_M_h_c)*(1 + M_pyr_c/kM_R31_M_pyr_c)^2 + (1 + M_alac__S_c/kM_R31_M_alac__S_c)*(1 + M_co2_c/kM_R31_M_co2_c) - 1);
    u_R31 = NaN; kC_R31 = 25.17; kEQ_R31 = 16800; kM_R31_M_h_c = 0.03358; kM_R31_M_alac__S_c = 0.2978; kM_R31_M_pyr_c = 0.01127; kM_R31_M_co2_c = 0.2978;
  R_TRPS2: M_ser__L_c + M_indole_c => M_trp__L_c + M_h2o_c; u_R32*(kC_R32*sqrt(kEQ_R32*kM_R32_M_ser__L_c*kM_R32_M_indole_c/kM_R32_M_trp__L_c/kM_R32_M_h2o_c)*(M_ser__L_c/kM_R32_M_ser__L_c)*(M_indole_c/kM_R32_M_indole_c) - kC_R32/sqrt(kEQ_R32*kM_R32_M_ser__L_c*kM_R32_M_indole_c/kM_R32_M_trp__L_c/kM_R32_M_h2o_c)*(M_trp__L_c/kM_R32_M_trp__L_c)*(M_h2o_c/kM_R32_M_h2o_c))/((1 + M_ser__L_c/kM_R32_M_ser__L_c)*(1 + M_indole_c/kM_R32_M_indole_c) + (1 + M_trp__L_c/kM_R32_M_trp__L_c)*(1 + M_h2o_c/kM_R32_M_h2o_c) - 1);
    u_R32 = NaN; kC_R32 = 5.248; kEQ_R32 = 1.486; kM_R32_M_ser__L_c = 0.1373; kM_R32_M_trp__L_c = 0.07285; kM_R32_M_indole_c = 0.1373; kM_R32_M_h2o_c = 0.07285;
  R_PSCVT: M_pep_c + M_skm5p_c -> M_pi_c + M_3psme_c; u_R33*(kC_R33*sqrt(kEQ_R33*kM_R33_M_pep_c*kM_R33_M_skm5p_c/kM_R33_M_pi_c/kM_R33_M_3psme_c)*(M_pep_c/kM_R33_M_pep_c)*(M_skm5p_c/kM_R33_M_skm5p_c) - kC_R33/sqrt(kEQ_R33*kM_R33_M_pep_c*kM_R33_M_skm5p_c/kM_R33_M_pi_c/kM_R33_M_3psme_c)*(M_pi_c/kM_R33_M_pi_c)*(M_3psme_c/kM_R33_M_3psme_c))/((1 + M_pep_c/kM_R33_M_pep_c)*(1 + M_skm5p_c/kM_R33_M_skm5p_c) + (1 + M_pi_c/kM_R33_M_pi_c)*(1 + M_3psme_c/kM_R33_M_3psme_c) - 1);
    u_R33 = NaN; kC_R33 = 4.581; kEQ_R33 = 300.4; kM_R33_M_pep_c = 0.6154; kM_R33_M_pi_c = 2.822; kM_R33_M_3psme_c = 0.1087; kM_R33_M_skm5p_c = 0.00377;
  R_PFL: M_pyr_c + M_coa_c => M_accoa_c + M_for_c; u_R34*(kC_R34*sqrt(kEQ_R34*kM_R34_M_pyr_c*kM_R34_M_coa_c/kM_R34_M_accoa_c/kM_R34_M_for_c)*(M_pyr_c/kM_R34_M_pyr_c)*(M_coa_c/kM_R34_M_coa_c) - kC_R34/sqrt(kEQ_R34*kM_R34_M_pyr_c*kM_R34_M_coa_c/kM_R34_M_accoa_c/kM_R34_M_for_c)*(M_accoa_c/kM_R34_M_accoa_c)*(M_for_c/kM_R34_M_for_c))/((1 + M_pyr_c/kM_R34_M_pyr_c)*(1 + M_coa_c/kM_R34_M_coa_c) + (1 + M_accoa_c/kM_R34_M_accoa_c)*(1 + M_for_c/kM_R34_M_for_c) - 1);
    u_R34 = NaN; kC_R34 = 21.35; kEQ_R34 = 2257; kM_R34_M_accoa_c = 0.006309; kM_R34_M_pyr_c = 0.02416; kM_R34_M_for_c = 0.414; kM_R34_M_coa_c = 0.0002388;
  R_ANS: M_chor_c + M_gln__L_c => M_h_c + M_glu__L_c + M_anth_c + M_pyr_c; u_R35*(kC_R35*sqrt(kEQ_R35*kM_R35_M_chor_c*kM_R35_M_gln__L_c/kM_R35_M_h_c/kM_R35_M_glu__L_c/kM_R35_M_anth_c/kM_R35_M_pyr_c)*(M_chor_c/kM_R35_M_chor_c)*(M_gln__L_c/kM_R35_M_gln__L_c) - kC_R35/sqrt(kEQ_R35*kM_R35_M_chor_c*kM_R35_M_gln__L_c/kM_R35_M_h_c/kM_R35_M_glu__L_c/kM_R35_M_anth_c/kM_R35_M_pyr_c)*(M_h_c/kM_R35_M_h_c)*(M_glu__L_c/kM_R35_M_glu__L_c)*(M_anth_c/kM_R35_M_anth_c)*(M_pyr_c/kM_R35_M_pyr_c))/((1 + M_chor_c/kM_R35_M_chor_c)*(1 + M_gln__L_c/kM_R35_M_gln__L_c) + (1 + M_h_c/kM_R35_M_h_c)*(1 + M_glu__L_c/kM_R35_M_glu__L_c)*(1 + M_anth_c/kM_R35_M_anth_c)*(1 + M_pyr_c/kM_R35_M_pyr_c) - 1);
    u_R35 = NaN; kC_R35 = 4.501; kEQ_R35 = 1.772; kM_R35_M_h_c = 0.07146; kM_R35_M_chor_c = 0.0009982; kM_R35_M_glu__L_c = 0.07146; kM_R35_M_gln__L_c = 0.1399; kM_R35_M_anth_c = 0.07146; kM_R35_M_pyr_c = 0.07146;
  R_FRD2: M_fum_c + M_mql8_c => M_succ_c + M_mqn8_c; u_R36*(kC_R36*sqrt(kEQ_R36*kM_R36_M_fum_c*kM_R36_M_mql8_c/kM_R36_M_succ_c/kM_R36_M_mqn8_c)*(M_fum_c/kM_R36_M_fum_c)*(M_mql8_c/kM_R36_M_mql8_c) - kC_R36/sqrt(kEQ_R36*kM_R36_M_fum_c*kM_R36_M_mql8_c/kM_R36_M_succ_c/kM_R36_M_mqn8_c)*(M_succ_c/kM_R36_M_succ_c)*(M_mqn8_c/kM_R36_M_mqn8_c))/((1 + M_fum_c/kM_R36_M_fum_c)*(1 + M_mql8_c/kM_R36_M_mql8_c) + (1 + M_succ_c/kM_R36_M_succ_c)*(1 + M_mqn8_c/kM_R36_M_mqn8_c) - 1);
    u_R36 = NaN; kC_R36 = 10; kEQ_R36 = 0.9083; kM_R36_M_fum_c = 0.1013; kM_R36_M_mql8_c = 0.1013; kM_R36_M_succ_c = 0.09871; kM_R36_M_mqn8_c = 0.09871;
  R_ANPRT: M_anth_c + M_prpp_c => M_pran_c + M_ppi_c; u_R37*(kC_R37*sqrt(kEQ_R37*kM_R37_M_anth_c*kM_R37_M_prpp_c/kM_R37_M_pran_c/kM_R37_M_ppi_c)*(M_anth_c/kM_R37_M_anth_c)*(M_prpp_c/kM_R37_M_prpp_c) - kC_R37/sqrt(kEQ_R37*kM_R37_M_anth_c*kM_R37_M_prpp_c/kM_R37_M_pran_c/kM_R37_M_ppi_c)*(M_pran_c/kM_R37_M_pran_c)*(M_ppi_c/kM_R37_M_ppi_c))/((1 + M_anth_c/kM_R37_M_anth_c)*(1 + M_prpp_c/kM_R37_M_prpp_c) + (1 + M_pran_c/kM_R37_M_pran_c)*(1 + M_ppi_c/kM_R37_M_ppi_c) - 1);
    u_R37 = NaN; kC_R37 = 3.322; kEQ_R37 = 2.425; kM_R37_M_pran_c = 0.04559; kM_R37_M_ppi_c = 0.04559; kM_R37_M_anth_c = 0.2194; kM_R37_M_prpp_c = 0.02926;
  R_CHORM: M_chor_c => M_pphn_c; u_R38*(kC_R38*sqrt(kEQ_R38*kM_R38_M_chor_c/kM_R38_M_pphn_c)*(M_chor_c/kM_R38_M_chor_c) - kC_R38/sqrt(kEQ_R38*kM_R38_M_chor_c/kM_R38_M_pphn_c)*(M_pphn_c/kM_R38_M_pphn_c))/(1 + M_chor_c/kM_R38_M_chor_c + 1 + M_pphn_c/kM_R38_M_pphn_c - 1);
    u_R38 = NaN; kC_R38 = 9.879; kEQ_R38 = 1.383; kM_R38_M_chor_c = 0.1462; kM_R38_M_pphn_c = 0.2207;
  R_PTAr: M_accoa_c + M_pi_c -> M_actp_c + M_coa_c; u_R39*(kC_R39*sqrt(kEQ_R39*kM_R39_M_accoa_c*kM_R39_M_pi_c/kM_R39_M_actp_c/kM_R39_M_coa_c)*(M_accoa_c/kM_R39_M_accoa_c)*(M_pi_c/kM_R39_M_pi_c) - kC_R39/sqrt(kEQ_R39*kM_R39_M_accoa_c*kM_R39_M_pi_c/kM_R39_M_actp_c/kM_R39_M_coa_c)*(M_actp_c/kM_R39_M_actp_c)*(M_coa_c/kM_R39_M_coa_c))/((1 + M_accoa_c/kM_R39_M_accoa_c)*(1 + M_pi_c/kM_R39_M_pi_c) + (1 + M_actp_c/kM_R39_M_actp_c)*(1 + M_coa_c/kM_R39_M_coa_c) - 1);
    u_R39 = NaN; kC_R39 = 33.79; kEQ_R39 = 0.02985; kM_R39_M_actp_c = 0.8578; kM_R39_M_accoa_c = 0.01275; kM_R39_M_pi_c = 1.987; kM_R39_M_coa_c = 0.001622;
  R_CHORS: M_3psme_c => M_pi_c + M_chor_c; u_R40*(kC_R40*sqrt(kEQ_R40*kM_R40_M_3psme_c/kM_R40_M_pi_c/kM_R40_M_chor_c)*(M_3psme_c/kM_R40_M_3psme_c) - kC_R40/sqrt(kEQ_R40*kM_R40_M_3psme_c/kM_R40_M_pi_c/kM_R40_M_chor_c)*(M_pi_c/kM_R40_M_pi_c)*(M_chor_c/kM_R40_M_chor_c))/(1 + M_3psme_c/kM_R40_M_3psme_c + (1 + M_pi_c/kM_R40_M_pi_c)*(1 + M_chor_c/kM_R40_M_chor_c) - 1);
    u_R40 = NaN; kC_R40 = 114.7; kEQ_R40 = 17520000; kM_R40_M_pi_c = 4.591; kM_R40_M_chor_c = 4.591; kM_R40_M_3psme_c = 1.688e-5;
  R_IGPS: M_h_c + M_2cpr5p_c => M_3ig3p_c + M_h2o_c + M_co2_c; u_R41*(kC_R41*sqrt(kEQ_R41*kM_R41_M_h_c*kM_R41_M_2cpr5p_c/kM_R41_M_3ig3p_c/kM_R41_M_h2o_c/kM_R41_M_co2_c)*(M_h_c/kM_R41_M_h_c)*(M_2cpr5p_c/kM_R41_M_2cpr5p_c) - kC_R41/sqrt(kEQ_R41*kM_R41_M_h_c*kM_R41_M_2cpr5p_c/kM_R41_M_3ig3p_c/kM_R41_M_h2o_c/kM_R41_M_co2_c)*(M_3ig3p_c/kM_R41_M_3ig3p_c)*(M_h2o_c/kM_R41_M_h2o_c)*(M_co2_c/kM_R41_M_co2_c))/((1 + M_h_c/kM_R41_M_h_c)*(1 + M_2cpr5p_c/kM_R41_M_2cpr5p_c) + (1 + M_3ig3p_c/kM_R41_M_3ig3p_c)*(1 + M_h2o_c/kM_R41_M_h2o_c)*(1 + M_co2_c/kM_R41_M_co2_c) - 1);
    u_R41 = NaN; kC_R41 = 3.964; kEQ_R41 = 1.824; kM_R41_M_h_c = 0.1653; kM_R41_M_3ig3p_c = 0.06048; kM_R41_M_2cpr5p_c = 0.006777; kM_R41_M_h2o_c = 0.06048; kM_R41_M_co2_c = 0.06048;
  R_ACKr: M_ac_c + M_atp_c -> M_actp_c + M_adp_c; u_R42*(kC_R42*sqrt(kEQ_R42*kM_R42_M_ac_c*kM_R42_M_atp_c/kM_R42_M_actp_c/kM_R42_M_adp_c)*(M_ac_c/kM_R42_M_ac_c)*(M_atp_c/kM_R42_M_atp_c) - kC_R42/sqrt(kEQ_R42*kM_R42_M_ac_c*kM_R42_M_atp_c/kM_R42_M_actp_c/kM_R42_M_adp_c)*(M_actp_c/kM_R42_M_actp_c)*(M_adp_c/kM_R42_M_adp_c))/((1 + M_ac_c/kM_R42_M_ac_c)*(1 + M_atp_c/kM_R42_M_atp_c) + (1 + M_actp_c/kM_R42_M_actp_c)*(1 + M_adp_c/kM_R42_M_adp_c) - 1);
    u_R42 = NaN; kC_R42 = 88.91; kEQ_R42 = 0.003541; kM_R42_M_ac_c = 0.5131; kM_R42_M_actp_c = 0.01949; kM_R42_M_adp_c = 0.01949; kM_R42_M_atp_c = 0.5131;
  R_LEUTAi: M_4mop_c + M_glu__L_c => M_akg_c + M_leu__L_c; u_R43*(kC_R43*sqrt(kEQ_R43*kM_R43_M_4mop_c*kM_R43_M_glu__L_c/kM_R43_M_akg_c/kM_R43_M_leu__L_c)*(M_4mop_c/kM_R43_M_4mop_c)*(M_glu__L_c/kM_R43_M_glu__L_c) - kC_R43/sqrt(kEQ_R43*kM_R43_M_4mop_c*kM_R43_M_glu__L_c/kM_R43_M_akg_c/kM_R43_M_leu__L_c)*(M_akg_c/kM_R43_M_akg_c)*(M_leu__L_c/kM_R43_M_leu__L_c))/((1 + M_4mop_c/kM_R43_M_4mop_c)*(1 + M_glu__L_c/kM_R43_M_glu__L_c) + (1 + M_akg_c/kM_R43_M_akg_c)*(1 + M_leu__L_c/kM_R43_M_leu__L_c) - 1);
    u_R43 = NaN; kC_R43 = 12.73; kEQ_R43 = 0.9585; kM_R43_M_akg_c = 0.1303; kM_R43_M_4mop_c = 0.2036; kM_R43_M_glu__L_c = 0.07672; kM_R43_M_leu__L_c = 0.1303;
  R_EX_glcn_e: M_glcn_e => ; u_R44*(kC_R44*sqrt(kEQ_R44*kM_R44_M_glcn_e)*(M_glcn_e/kM_R44_M_glcn_e) - kC_R44/sqrt(kEQ_R44*kM_R44_M_glcn_e))/(1 + M_glcn_e/kM_R44_M_glcn_e + (-1));
    u_R44 = NaN; kC_R44 = 10; kEQ_R44 = 78.5; kM_R44_M_glcn_e = 0.0626;
  R_EX_h_e: M_h_e -> ; u_R45*(kC_R45*sqrt(kEQ_R45*kM_R45_M_h_e)*(M_h_e/kM_R45_M_h_e) - kC_R45/sqrt(kEQ_R45*kM_R45_M_h_e))/(1 + M_h_e/kM_R45_M_h_e + (-1));
    u_R45 = NaN; kC_R45 = 10; kEQ_R45 = 0.001291; kM_R45_M_h_e = 0.7655;
  R_EX_gln__L_e: M_gln__L_e => ; u_R46*(kC_R46*sqrt(kEQ_R46*kM_R46_M_gln__L_e)*(M_gln__L_e/kM_R46_M_gln__L_e) - kC_R46/sqrt(kEQ_R46*kM_R46_M_gln__L_e))/(1 + M_gln__L_e/kM_R46_M_gln__L_e + (-1));
    u_R46 = NaN; kC_R46 = 10; kEQ_R46 = 0.008285; kM_R46_M_gln__L_e = 0.5017;
  R_EX_glyc_e: M_glyc_e => ; u_R47*(kC_R47*sqrt(kEQ_R47*kM_R47_M_glyc_e)*(M_glyc_e/kM_R47_M_glyc_e) - kC_R47/sqrt(kEQ_R47*kM_R47_M_glyc_e))/(1 + M_glyc_e/kM_R47_M_glyc_e + (-1));
    u_R47 = NaN; kC_R47 = 10; kEQ_R47 = 7.465; kM_R47_M_glyc_e = 0.1069;
  R_EX_ac_e: M_ac_e => ; u_R48*(kC_R48*sqrt(kEQ_R48*kM_R48_M_ac_e)*(M_ac_e/kM_R48_M_ac_e) - kC_R48/sqrt(kEQ_R48*kM_R48_M_ac_e))/(1 + M_ac_e/kM_R48_M_ac_e + (-1));
    u_R48 = NaN; kC_R48 = 10; kEQ_R48 = 0.09442; kM_R48_M_ac_e = 0.2886;
  R_EX_akg_e: M_akg_e => ; u_R49*(kC_R49*sqrt(kEQ_R49*kM_R49_M_akg_e)*(M_akg_e/kM_R49_M_akg_e) - kC_R49/sqrt(kEQ_R49*kM_R49_M_akg_e))/(1 + M_akg_e/kM_R49_M_akg_e + (-1));
    u_R49 = NaN; kC_R49 = 10; kEQ_R49 = 3.948; kM_R49_M_akg_e = 0.1235;
  R_EX_pyr_e: M_pyr_e => ; u_R50*(kC_R50*sqrt(kEQ_R50*kM_R50_M_pyr_e)*(M_pyr_e/kM_R50_M_pyr_e) - kC_R50/sqrt(kEQ_R50*kM_R50_M_pyr_e))/(1 + M_pyr_e/kM_R50_M_pyr_e + (-1));
    u_R50 = NaN; kC_R50 = 10; kEQ_R50 = 0.785; kM_R50_M_pyr_e = 0.1783;
  R_EX_succ_e: M_succ_e => ; u_R51*(kC_R51*sqrt(kEQ_R51*kM_R51_M_succ_e)*(M_succ_e/kM_R51_M_succ_e) - kC_R51/sqrt(kEQ_R51*kM_R51_M_succ_e))/(1 + M_succ_e/kM_R51_M_succ_e + (-1));
    u_R51 = NaN; kC_R51 = 10; kEQ_R51 = 2.196; kM_R51_M_succ_e = 0.1411;
  R_EX_rib__D_e: M_rib__D_e => ; u_R52*(kC_R52*sqrt(kEQ_R52*kM_R52_M_rib__D_e)*(M_rib__D_e/kM_R52_M_rib__D_e) - kC_R52/sqrt(kEQ_R52*kM_R52_M_rib__D_e))/(1 + M_rib__D_e/kM_R52_M_rib__D_e + (-1));
    u_R52 = NaN; kC_R52 = 10; kEQ_R52 = 0.3285; kM_R52_M_rib__D_e = 0.2174;
  R_EX_fum_e: M_fum_e => ; u_R53*(kC_R53*sqrt(kEQ_R53*kM_R53_M_fum_e)*(M_fum_e/kM_R53_M_fum_e) - kC_R53/sqrt(kEQ_R53*kM_R53_M_fum_e))/(1 + M_fum_e/kM_R53_M_fum_e + (-1));
    u_R53 = NaN; kC_R53 = 10; kEQ_R53 = 0.05015; kM_R53_M_fum_e = 0.3332;
  R_EX_glu__L_e: M_glu__L_e => ; u_R54*(kC_R54*sqrt(kEQ_R54*kM_R54_M_glu__L_e)*(M_glu__L_e/kM_R54_M_glu__L_e) - kC_R54/sqrt(kEQ_R54*kM_R54_M_glu__L_e))/(1 + M_glu__L_e/kM_R54_M_glu__L_e + (-1));
    u_R54 = NaN; kC_R54 = 10; kEQ_R54 = 0.04012; kM_R54_M_glu__L_e = 0.3505;
  R_ENO: M_2pg_c -> M_pep_c + M_h2o_c; u_R55*(kC_R55*sqrt(kEQ_R55*kM_R55_M_2pg_c/kM_R55_M_pep_c/kM_R55_M_h2o_c)*(M_2pg_c/kM_R55_M_2pg_c) - kC_R55/sqrt(kEQ_R55*kM_R55_M_2pg_c/kM_R55_M_pep_c/kM_R55_M_h2o_c)*(M_pep_c/kM_R55_M_pep_c)*(M_h2o_c/kM_R55_M_h2o_c))/(1 + M_2pg_c/kM_R55_M_2pg_c + (1 + M_pep_c/kM_R55_M_pep_c)*(1 + M_h2o_c/kM_R55_M_h2o_c) - 1);
    u_R55 = NaN; kC_R55 = 54.96; kEQ_R55 = 4.491; kM_R55_M_2pg_c = 0.02741; kM_R55_M_pep_c = 0.3648; kM_R55_M_h2o_c = 0.3648;
  R_FBA: M_fdp_c -> M_dhap_c + M_g3p_c; u_R56*(kC_R56*sqrt(kEQ_R56*kM_R56_M_fdp_c/kM_R56_M_dhap_c/kM_R56_M_g3p_c)*(M_fdp_c/kM_R56_M_fdp_c) - kC_R56/sqrt(kEQ_R56*kM_R56_M_fdp_c/kM_R56_M_dhap_c/kM_R56_M_g3p_c)*(M_dhap_c/kM_R56_M_dhap_c)*(M_g3p_c/kM_R56_M_g3p_c))/(1 + M_fdp_c/kM_R56_M_fdp_c + (1 + M_dhap_c/kM_R56_M_dhap_c)*(1 + M_g3p_c/kM_R56_M_g3p_c) - 1);
    u_R56 = NaN; kC_R56 = 50.45; kEQ_R56 = 8.555e-5; kM_R56_M_dhap_c = 0.006295; kM_R56_M_g3p_c = 0.006295; kM_R56_M_fdp_c = 0.3001;
  R_HCO3E: M_h2o_c + M_co2_c -> M_h_c + M_hco3_c; u_R57*(kC_R57*sqrt(kEQ_R57*kM_R57_M_h2o_c*kM_R57_M_co2_c/kM_R57_M_h_c/kM_R57_M_hco3_c)*(M_h2o_c/kM_R57_M_h2o_c)*(M_co2_c/kM_R57_M_co2_c) - kC_R57/sqrt(kEQ_R57*kM_R57_M_h2o_c*kM_R57_M_co2_c/kM_R57_M_h_c/kM_R57_M_hco3_c)*(M_h_c/kM_R57_M_h_c)*(M_hco3_c/kM_R57_M_hco3_c))/((1 + M_h2o_c/kM_R57_M_h2o_c)*(1 + M_co2_c/kM_R57_M_co2_c) + (1 + M_h_c/kM_R57_M_h_c)*(1 + M_hco3_c/kM_R57_M_hco3_c) - 1);
    u_R57 = NaN; kC_R57 = 14.51; kEQ_R57 = 14.09; kM_R57_M_h_c = 0.3975; kM_R57_M_hco3_c = 0.3975; kM_R57_M_h2o_c = 0.02516; kM_R57_M_co2_c = 0.02516;
  R_IMPC: M_imp_c + M_h2o_c -> M_fprica_c; u_R58*(kC_R58*sqrt(kEQ_R58*kM_R58_M_imp_c*kM_R58_M_h2o_c/kM_R58_M_fprica_c)*(M_imp_c/kM_R58_M_imp_c)*(M_h2o_c/kM_R58_M_h2o_c) - kC_R58/sqrt(kEQ_R58*kM_R58_M_imp_c*kM_R58_M_h2o_c/kM_R58_M_fprica_c)*(M_fprica_c/kM_R58_M_fprica_c))/((1 + M_imp_c/kM_R58_M_imp_c)*(1 + M_h2o_c/kM_R58_M_h2o_c) + 1 + M_fprica_c/kM_R58_M_fprica_c - 1);
    u_R58 = NaN; kC_R58 = 4.514; kEQ_R58 = 0.0003202; kM_R58_M_imp_c = 4.819; kM_R58_M_h2o_c = 4.819; kM_R58_M_fprica_c = 0.002075;
  R_IMPD: M_imp_c + M_nad_c + M_h2o_c => M_h_c + M_xmp_c + M_nadh_c; u_R59*(kC_R59*sqrt(kEQ_R59*kM_R59_M_imp_c*kM_R59_M_nad_c*kM_R59_M_h2o_c/kM_R59_M_h_c/kM_R59_M_xmp_c/kM_R59_M_nadh_c)*(M_imp_c/kM_R59_M_imp_c)*(M_nad_c/kM_R59_M_nad_c)*(M_h2o_c/kM_R59_M_h2o_c) - kC_R59/sqrt(kEQ_R59*kM_R59_M_imp_c*kM_R59_M_nad_c*kM_R59_M_h2o_c/kM_R59_M_h_c/kM_R59_M_xmp_c/kM_R59_M_nadh_c)*(M_h_c/kM_R59_M_h_c)*(M_xmp_c/kM_R59_M_xmp_c)*(M_nadh_c/kM_R59_M_nadh_c))/((1 + M_imp_c/kM_R59_M_imp_c)*(1 + M_nad_c/kM_R59_M_nad_c)*(1 + M_h2o_c/kM_R59_M_h2o_c) + (1 + M_h_c/kM_R59_M_h_c)*(1 + M_xmp_c/kM_R59_M_xmp_c)*(1 + M_nadh_c/kM_R59_M_nadh_c) - 1);
    u_R59 = NaN; kC_R59 = 0.9923; kEQ_R59 = 0.001196; kM_R59_M_h_c = 0.009013; kM_R59_M_imp_c = 0.003533; kM_R59_M_nad_c = 0.8035; kM_R59_M_xmp_c = 0.009013; kM_R59_M_h2o_c = 1.11; kM_R59_M_nadh_c = 0.009013;
  R_PPS: M_atp_c + M_h2o_c + M_pyr_c => M_pep_c + 2 M_h_c + M_pi_c + M_amp_c; u_R60*(kC_R60*sqrt(kEQ_R60*kM_R60_M_atp_c*kM_R60_M_h2o_c*kM_R60_M_pyr_c/kM_R60_M_pep_c/kM_R60_M_h_c^2/kM_R60_M_pi_c/kM_R60_M_amp_c)*(M_atp_c/kM_R60_M_atp_c)*(M_h2o_c/kM_R60_M_h2o_c)*(M_pyr_c/kM_R60_M_pyr_c) - kC_R60/sqrt(kEQ_R60*kM_R60_M_atp_c*kM_R60_M_h2o_c*kM_R60_M_pyr_c/kM_R60_M_pep_c/kM_R60_M_h_c^2/kM_R60_M_pi_c/kM_R60_M_amp_c)*(M_pep_c/kM_R60_M_pep_c)*(M_h_c/kM_R60_M_h_c)^2*(M_pi_c/kM_R60_M_pi_c)*(M_amp_c/kM_R60_M_amp_c))/((1 + M_atp_c/kM_R60_M_atp_c)*(1 + M_h2o_c/kM_R60_M_h2o_c)*(1 + M_pyr_c/kM_R60_M_pyr_c) + (1 + M_pep_c/kM_R60_M_pep_c)*(1 + M_h_c/kM_R60_M_h_c)^2*(1 + M_pi_c/kM_R60_M_pi_c)*(1 + M_amp_c/kM_R60_M_amp_c) - 1);
    u_R60 = NaN; kC_R60 = 15.48; kEQ_R60 = 6.738; kM_R60_M_pep_c = 0.09877; kM_R60_M_h_c = 0.09756; kM_R60_M_pi_c = 10.44; kM_R60_M_atp_c = 0.002103; kM_R60_M_h2o_c = 0.1012; kM_R60_M_pyr_c = 0.1012; kM_R60_M_amp_c = 0.09877;
  R_PGI: M_g6p_c -> M_f6p_c; u_R61*(kC_R61*sqrt(kEQ_R61*kM_R61_M_g6p_c/kM_R61_M_f6p_c)*(M_g6p_c/kM_R61_M_g6p_c) - kC_R61/sqrt(kEQ_R61*kM_R61_M_g6p_c/kM_R61_M_f6p_c)*(M_f6p_c/kM_R61_M_f6p_c))/(1 + M_g6p_c/kM_R61_M_g6p_c + 1 + M_f6p_c/kM_R61_M_f6p_c - 1);
    u_R61 = NaN; kC_R61 = 10; kEQ_R61 = 8.598e-5; kM_R61_M_f6p_c = 0.01766; kM_R61_M_g6p_c = 0.5662;
  R_PGK: M_3pg_c + M_atp_c -> M_13dpg_c + M_adp_c; u_R62*(kC_R62*sqrt(kEQ_R62*kM_R62_M_3pg_c*kM_R62_M_atp_c/kM_R62_M_13dpg_c/kM_R62_M_adp_c)*(M_3pg_c/kM_R62_M_3pg_c)*(M_atp_c/kM_R62_M_atp_c) - kC_R62/sqrt(kEQ_R62*kM_R62_M_3pg_c*kM_R62_M_atp_c/kM_R62_M_13dpg_c/kM_R62_M_adp_c)*(M_13dpg_c/kM_R62_M_13dpg_c)*(M_adp_c/kM_R62_M_adp_c))/((1 + M_3pg_c/kM_R62_M_3pg_c)*(1 + M_atp_c/kM_R62_M_atp_c) + (1 + M_13dpg_c/kM_R62_M_13dpg_c)*(1 + M_adp_c/kM_R62_M_adp_c) - 1);
    u_R62 = NaN; kC_R62 = 45.14; kEQ_R62 = 0.0003906; kM_R62_M_13dpg_c = 0.008846; kM_R62_M_3pg_c = 1.13; kM_R62_M_adp_c = 0.008846; kM_R62_M_atp_c = 1.13;
  R_PGL: M_h2o_c + M_6pgl_c => M_h_c + M_6pgc_c; u_R63*(kC_R63*sqrt(kEQ_R63*kM_R63_M_h2o_c*kM_R63_M_6pgl_c/kM_R63_M_h_c/kM_R63_M_6pgc_c)*(M_h2o_c/kM_R63_M_h2o_c)*(M_6pgl_c/kM_R63_M_6pgl_c) - kC_R63/sqrt(kEQ_R63*kM_R63_M_h2o_c*kM_R63_M_6pgl_c/kM_R63_M_h_c/kM_R63_M_6pgc_c)*(M_h_c/kM_R63_M_h_c)*(M_6pgc_c/kM_R63_M_6pgc_c))/((1 + M_h2o_c/kM_R63_M_h2o_c)*(1 + M_6pgl_c/kM_R63_M_6pgl_c) + (1 + M_h_c/kM_R63_M_h_c)*(1 + M_6pgc_c/kM_R63_M_6pgc_c) - 1);
    u_R63 = NaN; kC_R63 = 195.6; kEQ_R63 = 23660; kM_R63_M_h_c = 2.152; kM_R63_M_6pgc_c = 2.152; kM_R63_M_h2o_c = 0.004648; kM_R63_M_6pgl_c = 0.004648;
  R_RPE: M_ru5p__D_c -> M_xu5p__D_c; u_R64*(kC_R64*sqrt(kEQ_R64*kM_R64_M_ru5p__D_c/kM_R64_M_xu5p__D_c)*(M_ru5p__D_c/kM_R64_M_ru5p__D_c) - kC_R64/sqrt(kEQ_R64*kM_R64_M_ru5p__D_c/kM_R64_M_xu5p__D_c)*(M_xu5p__D_c/kM_R64_M_xu5p__D_c))/(1 + M_ru5p__D_c/kM_R64_M_ru5p__D_c + 1 + M_xu5p__D_c/kM_R64_M_xu5p__D_c - 1);
    u_R64 = NaN; kC_R64 = 12.74; kEQ_R64 = 3.689; kM_R64_M_xu5p__D_c = 1.043; kM_R64_M_ru5p__D_c = 0.009591;
  R_DHQTi: M_3dhq_c => M_3dhsk_c + M_h2o_c; u_R65*(kC_R65*sqrt(kEQ_R65*kM_R65_M_3dhq_c/kM_R65_M_3dhsk_c/kM_R65_M_h2o_c)*(M_3dhq_c/kM_R65_M_3dhq_c) - kC_R65/sqrt(kEQ_R65*kM_R65_M_3dhq_c/kM_R65_M_3dhsk_c/kM_R65_M_h2o_c)*(M_3dhsk_c/kM_R65_M_3dhsk_c)*(M_h2o_c/kM_R65_M_h2o_c))/(1 + M_3dhq_c/kM_R65_M_3dhq_c + (1 + M_3dhsk_c/kM_R65_M_3dhsk_c)*(1 + M_h2o_c/kM_R65_M_h2o_c) - 1);
    u_R65 = NaN; kC_R65 = 34.42; kEQ_R65 = 6.133; kM_R65_M_3dhq_c = 0.02436; kM_R65_M_3dhsk_c = 0.4365; kM_R65_M_h2o_c = 0.4365;
  R_IPMD: M_nad_c + M_3c2hmp_c => M_h_c + M_nadh_c + M_3c4mop_c; u_R66*(kC_R66*sqrt(kEQ_R66*kM_R66_M_nad_c*kM_R66_M_3c2hmp_c/kM_R66_M_h_c/kM_R66_M_nadh_c/kM_R66_M_3c4mop_c)*(M_nad_c/kM_R66_M_nad_c)*(M_3c2hmp_c/kM_R66_M_3c2hmp_c) - kC_R66/sqrt(kEQ_R66*kM_R66_M_nad_c*kM_R66_M_3c2hmp_c/kM_R66_M_h_c/kM_R66_M_nadh_c/kM_R66_M_3c4mop_c)*(M_h_c/kM_R66_M_h_c)*(M_nadh_c/kM_R66_M_nadh_c)*(M_3c4mop_c/kM_R66_M_3c4mop_c))/((1 + M_nad_c/kM_R66_M_nad_c)*(1 + M_3c2hmp_c/kM_R66_M_3c2hmp_c) + (1 + M_h_c/kM_R66_M_h_c)*(1 + M_nadh_c/kM_R66_M_nadh_c)*(1 + M_3c4mop_c/kM_R66_M_3c4mop_c) - 1);
    u_R66 = NaN; kC_R66 = 5.522; kEQ_R66 = 0.001782; kM_R66_M_h_c = 0.04154; kM_R66_M_nad_c = 0.1052; kM_R66_M_3c2hmp_c = 0.2407; kM_R66_M_nadh_c = 0.04154; kM_R66_M_3c4mop_c = 0.04154;
  R_AIRC3: M_5aizc_c -> M_5caiz_c; u_R67*(kC_R67*sqrt(kEQ_R67*kM_R67_M_5aizc_c/kM_R67_M_5caiz_c)*(M_5aizc_c/kM_R67_M_5aizc_c) - kC_R67/sqrt(kEQ_R67*kM_R67_M_5aizc_c/kM_R67_M_5caiz_c)*(M_5caiz_c/kM_R67_M_5caiz_c))/(1 + M_5aizc_c/kM_R67_M_5aizc_c + 1 + M_5caiz_c/kM_R67_M_5caiz_c - 1);
    u_R67 = NaN; kC_R67 = 10.73; kEQ_R67 = 23090; kM_R67_M_5aizc_c = 0.001777; kM_R67_M_5caiz_c = 5.627;
  R_TALA: M_g3p_c + M_s7p_c -> M_e4p_c + M_f6p_c; u_R68*(kC_R68*sqrt(kEQ_R68*kM_R68_M_g3p_c*kM_R68_M_s7p_c/kM_R68_M_e4p_c/kM_R68_M_f6p_c)*(M_g3p_c/kM_R68_M_g3p_c)*(M_s7p_c/kM_R68_M_s7p_c) - kC_R68/sqrt(kEQ_R68*kM_R68_M_g3p_c*kM_R68_M_s7p_c/kM_R68_M_e4p_c/kM_R68_M_f6p_c)*(M_e4p_c/kM_R68_M_e4p_c)*(M_f6p_c/kM_R68_M_f6p_c))/((1 + M_g3p_c/kM_R68_M_g3p_c)*(1 + M_s7p_c/kM_R68_M_s7p_c) + (1 + M_e4p_c/kM_R68_M_e4p_c)*(1 + M_f6p_c/kM_R68_M_f6p_c) - 1);
    u_R68 = NaN; kC_R68 = 8.191; kEQ_R68 = 1.203; kM_R68_M_g3p_c = 1.069; kM_R68_M_e4p_c = 0.07435; kM_R68_M_f6p_c = 19.2; kM_R68_M_s7p_c = 0.05117;
  R_ADSL2r: M_25aics_c -> M_aicar_c + M_fum_c; u_R69*(kC_R69*sqrt(kEQ_R69*kM_R69_M_25aics_c/kM_R69_M_aicar_c/kM_R69_M_fum_c)*(M_25aics_c/kM_R69_M_25aics_c) - kC_R69/sqrt(kEQ_R69*kM_R69_M_25aics_c/kM_R69_M_aicar_c/kM_R69_M_fum_c)*(M_aicar_c/kM_R69_M_aicar_c)*(M_fum_c/kM_R69_M_fum_c))/(1 + M_25aics_c/kM_R69_M_25aics_c + (1 + M_aicar_c/kM_R69_M_aicar_c)*(1 + M_fum_c/kM_R69_M_fum_c) - 1);
    u_R69 = NaN; kC_R69 = 2.81; kEQ_R69 = 7.175e-5; kM_R69_M_aicar_c = 0.01771; kM_R69_M_fum_c = 0.01771; kM_R69_M_25aics_c = 0.5647;
  R_TKT1: M_r5p_c + M_xu5p__D_c -> M_g3p_c + M_s7p_c; u_R70*(kC_R70*sqrt(kEQ_R70*kM_R70_M_r5p_c*kM_R70_M_xu5p__D_c/kM_R70_M_g3p_c/kM_R70_M_s7p_c)*(M_r5p_c/kM_R70_M_r5p_c)*(M_xu5p__D_c/kM_R70_M_xu5p__D_c) - kC_R70/sqrt(kEQ_R70*kM_R70_M_r5p_c*kM_R70_M_xu5p__D_c/kM_R70_M_g3p_c/kM_R70_M_s7p_c)*(M_g3p_c/kM_R70_M_g3p_c)*(M_s7p_c/kM_R70_M_s7p_c))/((1 + M_r5p_c/kM_R70_M_r5p_c)*(1 + M_xu5p__D_c/kM_R70_M_xu5p__D_c) + (1 + M_g3p_c/kM_R70_M_g3p_c)*(1 + M_s7p_c/kM_R70_M_s7p_c) - 1);
    u_R70 = NaN; kC_R70 = 10; kEQ_R70 = 1.046; kM_R70_M_r5p_c = 0.0994; kM_R70_M_xu5p__D_c = 0.0994; kM_R70_M_g3p_c = 0.1006; kM_R70_M_s7p_c = 0.1006;
  R_RNDR1: M_adp_c + M_trdrd_c => M_dadp_c + M_trdox_c + M_h2o_c; u_R71*(kC_R71*sqrt(kEQ_R71*kM_R71_M_adp_c*kM_R71_M_trdrd_c/kM_R71_M_dadp_c/kM_R71_M_trdox_c/kM_R71_M_h2o_c)*(M_adp_c/kM_R71_M_adp_c)*(M_trdrd_c/kM_R71_M_trdrd_c) - kC_R71/sqrt(kEQ_R71*kM_R71_M_adp_c*kM_R71_M_trdrd_c/kM_R71_M_dadp_c/kM_R71_M_trdox_c/kM_R71_M_h2o_c)*(M_dadp_c/kM_R71_M_dadp_c)*(M_trdox_c/kM_R71_M_trdox_c)*(M_h2o_c/kM_R71_M_h2o_c))/((1 + M_adp_c/kM_R71_M_adp_c)*(1 + M_trdrd_c/kM_R71_M_trdrd_c) + (1 + M_dadp_c/kM_R71_M_dadp_c)*(1 + M_trdox_c/kM_R71_M_trdox_c)*(1 + M_h2o_c/kM_R71_M_h2o_c) - 1);
    u_R71 = NaN; kC_R71 = 6.286; kEQ_R71 = 3584000; kM_R71_M_dadp_c = 0.6271; kM_R71_M_adp_c = 0.01595; kM_R71_M_trdox_c = 0.6271; kM_R71_M_h2o_c = 0.6271; kM_R71_M_trdrd_c = 0.01595;
  R_ALCD2x: M_nad_c + M_etoh_c -> M_h_c + M_nadh_c + M_acald_c; u_R72*(kC_R72*sqrt(kEQ_R72*kM_R72_M_nad_c*kM_R72_M_etoh_c/kM_R72_M_h_c/kM_R72_M_nadh_c/kM_R72_M_acald_c)*(M_nad_c/kM_R72_M_nad_c)*(M_etoh_c/kM_R72_M_etoh_c) - kC_R72/sqrt(kEQ_R72*kM_R72_M_nad_c*kM_R72_M_etoh_c/kM_R72_M_h_c/kM_R72_M_nadh_c/kM_R72_M_acald_c)*(M_h_c/kM_R72_M_h_c)*(M_nadh_c/kM_R72_M_nadh_c)*(M_acald_c/kM_R72_M_acald_c))/((1 + M_nad_c/kM_R72_M_nad_c)*(1 + M_etoh_c/kM_R72_M_etoh_c) + (1 + M_h_c/kM_R72_M_h_c)*(1 + M_nadh_c/kM_R72_M_nadh_c)*(1 + M_acald_c/kM_R72_M_acald_c) - 1);
    u_R72 = NaN; kC_R72 = 1.214; kEQ_R72 = 0.0006871; kM_R72_M_h_c = 0.03511; kM_R72_M_nad_c = 0.2848; kM_R72_M_etoh_c = 0.2848; kM_R72_M_nadh_c = 0.03511; kM_R72_M_acald_c = 0.03511;
  R_RNDR3: M_trdrd_c + M_cdp_c => M_trdox_c + M_h2o_c + M_dcdp_c; u_R73*(kC_R73*sqrt(kEQ_R73*kM_R73_M_trdrd_c*kM_R73_M_cdp_c/kM_R73_M_trdox_c/kM_R73_M_h2o_c/kM_R73_M_dcdp_c)*(M_trdrd_c/kM_R73_M_trdrd_c)*(M_cdp_c/kM_R73_M_cdp_c) - kC_R73/sqrt(kEQ_R73*kM_R73_M_trdrd_c*kM_R73_M_cdp_c/kM_R73_M_trdox_c/kM_R73_M_h2o_c/kM_R73_M_dcdp_c)*(M_trdox_c/kM_R73_M_trdox_c)*(M_h2o_c/kM_R73_M_h2o_c)*(M_dcdp_c/kM_R73_M_dcdp_c))/((1 + M_trdrd_c/kM_R73_M_trdrd_c)*(1 + M_cdp_c/kM_R73_M_cdp_c) + (1 + M_trdox_c/kM_R73_M_trdox_c)*(1 + M_h2o_c/kM_R73_M_h2o_c)*(1 + M_dcdp_c/kM_R73_M_dcdp_c) - 1);
    u_R73 = NaN; kC_R73 = 8.74; kEQ_R73 = 2904000; kM_R73_M_trdox_c = 0.7226; kM_R73_M_h2o_c = 0.7226; kM_R73_M_dcdp_c = 0.7226; kM_R73_M_trdrd_c = 0.01384; kM_R73_M_cdp_c = 0.01384;
  R_RNDR4: M_trdrd_c + M_udp_c => M_dudp_c + M_trdox_c + M_h2o_c; u_R74*(kC_R74*sqrt(kEQ_R74*kM_R74_M_trdrd_c*kM_R74_M_udp_c/kM_R74_M_dudp_c/kM_R74_M_trdox_c/kM_R74_M_h2o_c)*(M_trdrd_c/kM_R74_M_trdrd_c)*(M_udp_c/kM_R74_M_udp_c) - kC_R74/sqrt(kEQ_R74*kM_R74_M_trdrd_c*kM_R74_M_udp_c/kM_R74_M_dudp_c/kM_R74_M_trdox_c/kM_R74_M_h2o_c)*(M_dudp_c/kM_R74_M_dudp_c)*(M_trdox_c/kM_R74_M_trdox_c)*(M_h2o_c/kM_R74_M_h2o_c))/((1 + M_trdrd_c/kM_R74_M_trdrd_c)*(1 + M_udp_c/kM_R74_M_udp_c) + (1 + M_dudp_c/kM_R74_M_dudp_c)*(1 + M_trdox_c/kM_R74_M_trdox_c)*(1 + M_h2o_c/kM_R74_M_h2o_c) - 1);
    u_R74 = NaN; kC_R74 = 0.5375; kEQ_R74 = 8631000; kM_R74_M_dudp_c = 0.1994; kM_R74_M_trdox_c = 0.1994; kM_R74_M_h2o_c = 0.1994; kM_R74_M_trdrd_c = 0.05016; kM_R74_M_udp_c = 0.04755;
  R_TMDS: M_mlthf_c + M_dump_c => M_dtmp_c + M_dhf_c; u_R75*(kC_R75*sqrt(kEQ_R75*kM_R75_M_mlthf_c*kM_R75_M_dump_c/kM_R75_M_dtmp_c/kM_R75_M_dhf_c)*(M_mlthf_c/kM_R75_M_mlthf_c)*(M_dump_c/kM_R75_M_dump_c) - kC_R75/sqrt(kEQ_R75*kM_R75_M_mlthf_c*kM_R75_M_dump_c/kM_R75_M_dtmp_c/kM_R75_M_dhf_c)*(M_dtmp_c/kM_R75_M_dtmp_c)*(M_dhf_c/kM_R75_M_dhf_c))/((1 + M_mlthf_c/kM_R75_M_mlthf_c)*(1 + M_dump_c/kM_R75_M_dump_c) + (1 + M_dtmp_c/kM_R75_M_dtmp_c)*(1 + M_dhf_c/kM_R75_M_dhf_c) - 1);
    u_R75 = NaN; kC_R75 = 19.93; kEQ_R75 = 25400000; kM_R75_M_dtmp_c = 0.989; kM_R75_M_mlthf_c = 0.01011; kM_R75_M_dump_c = 0.0004907; kM_R75_M_dhf_c = 0.989;
  R_EX_glc__D_e: M_glc__D_e -> ; u_R76*(kC_R76*sqrt(kEQ_R76*kM_R76_M_glc__D_e)*(M_glc__D_e/kM_R76_M_glc__D_e) - kC_R76/sqrt(kEQ_R76*kM_R76_M_glc__D_e))/(1 + M_glc__D_e/kM_R76_M_glc__D_e + (-1));
    u_R76 = NaN; kC_R76 = 10; kEQ_R76 = 0.1301; kM_R76_M_glc__D_e = 0.2683;
  R_DHAD1: M_23dhmb_c => M_3mob_c + M_h2o_c; u_R77*(kC_R77*sqrt(kEQ_R77*kM_R77_M_23dhmb_c/kM_R77_M_3mob_c/kM_R77_M_h2o_c)*(M_23dhmb_c/kM_R77_M_23dhmb_c) - kC_R77/sqrt(kEQ_R77*kM_R77_M_23dhmb_c/kM_R77_M_3mob_c/kM_R77_M_h2o_c)*(M_3mob_c/kM_R77_M_3mob_c)*(M_h2o_c/kM_R77_M_h2o_c))/(1 + M_23dhmb_c/kM_R77_M_23dhmb_c + (1 + M_3mob_c/kM_R77_M_3mob_c)*(1 + M_h2o_c/kM_R77_M_h2o_c) - 1);
    u_R77 = NaN; kC_R77 = 179.7; kEQ_R77 = 2036000; kM_R77_M_23dhmb_c = 0.001059; kM_R77_M_3mob_c = 9.445; kM_R77_M_h2o_c = 9.445;
  R_IPPMIa: M_3c2hmp_c -> M_2ippm_c + M_h2o_c; u_R78*(kC_R78*sqrt(kEQ_R78*kM_R78_M_3c2hmp_c/kM_R78_M_2ippm_c/kM_R78_M_h2o_c)*(M_3c2hmp_c/kM_R78_M_3c2hmp_c) - kC_R78/sqrt(kEQ_R78*kM_R78_M_3c2hmp_c/kM_R78_M_2ippm_c/kM_R78_M_h2o_c)*(M_2ippm_c/kM_R78_M_2ippm_c)*(M_h2o_c/kM_R78_M_h2o_c))/(1 + M_3c2hmp_c/kM_R78_M_3c2hmp_c + (1 + M_2ippm_c/kM_R78_M_2ippm_c)*(1 + M_h2o_c/kM_R78_M_h2o_c) - 1);
    u_R78 = NaN; kC_R78 = 2.576; kEQ_R78 = 3.398; kM_R78_M_2ippm_c = 0.1939; kM_R78_M_3c2hmp_c = 0.05158; kM_R78_M_h2o_c = 0.1939;
  R_MDH: M_nad_c + M_mal__L_c -> M_h_c + M_oaa_c + M_nadh_c; u_R79*(kC_R79*sqrt(kEQ_R79*kM_R79_M_nad_c*kM_R79_M_mal__L_c/kM_R79_M_h_c/kM_R79_M_oaa_c/kM_R79_M_nadh_c)*(M_nad_c/kM_R79_M_nad_c)*(M_mal__L_c/kM_R79_M_mal__L_c) - kC_R79/sqrt(kEQ_R79*kM_R79_M_nad_c*kM_R79_M_mal__L_c/kM_R79_M_h_c/kM_R79_M_oaa_c/kM_R79_M_nadh_c)*(M_h_c/kM_R79_M_h_c)*(M_oaa_c/kM_R79_M_oaa_c)*(M_nadh_c/kM_R79_M_nadh_c))/((1 + M_nad_c/kM_R79_M_nad_c)*(1 + M_mal__L_c/kM_R79_M_mal__L_c) + (1 + M_h_c/kM_R79_M_h_c)*(1 + M_oaa_c/kM_R79_M_oaa_c)*(1 + M_nadh_c/kM_R79_M_nadh_c) - 1);
    u_R79 = NaN; kC_R79 = 15.17; kEQ_R79 = 2.266e-5; kM_R79_M_h_c = 0.3122; kM_R79_M_nad_c = 0.1223; kM_R79_M_mal__L_c = 4.766; kM_R79_M_oaa_c = 0.1992; kM_R79_M_nadh_c = 0.008319;
  R_FUM: M_fum_c + M_h2o_c -> M_mal__L_c; u_R80*(kC_R80*sqrt(kEQ_R80*kM_R80_M_fum_c*kM_R80_M_h2o_c/kM_R80_M_mal__L_c)*(M_fum_c/kM_R80_M_fum_c)*(M_h2o_c/kM_R80_M_h2o_c) - kC_R80/sqrt(kEQ_R80*kM_R80_M_fum_c*kM_R80_M_h2o_c/kM_R80_M_mal__L_c)*(M_mal__L_c/kM_R80_M_mal__L_c))/((1 + M_fum_c/kM_R80_M_fum_c)*(1 + M_h2o_c/kM_R80_M_h2o_c) + 1 + M_mal__L_c/kM_R80_M_mal__L_c - 1);
    u_R80 = NaN; kC_R80 = 13.54; kEQ_R80 = 3.961; kM_R80_M_mal__L_c = 0.4921; kM_R80_M_fum_c = 0.05204; kM_R80_M_h2o_c = 0.05204;
  R_EX_fru_e: M_fru_e => ; u_R81*(kC_R81*sqrt(kEQ_R81*kM_R81_M_fru_e)*(M_fru_e/kM_R81_M_fru_e) - kC_R81/sqrt(kEQ_R81*kM_R81_M_fru_e))/(1 + M_fru_e/kM_R81_M_fru_e + (-1));
    u_R81 = NaN; kC_R81 = 10; kEQ_R81 = 2.683; kM_R81_M_fru_e = 0.1349;
  R_EX_xyl__D_e: M_xyl__D_e => ; u_R82*(kC_R82*sqrt(kEQ_R82*kM_R82_M_xyl__D_e)*(M_xyl__D_e/kM_R82_M_xyl__D_e) - kC_R82/sqrt(kEQ_R82*kM_R82_M_xyl__D_e))/(1 + M_xyl__D_e/kM_R82_M_xyl__D_e + (-1));
    u_R82 = NaN; kC_R82 = 10; kEQ_R82 = 868; kM_R82_M_xyl__D_e = 0.03626;
  R_KARA1: M_23dhmb_c + M_nadp_c -> M_h_c + M_alac__S_c + M_nadph_c; u_R83*(kC_R83*sqrt(kEQ_R83*kM_R83_M_23dhmb_c*kM_R83_M_nadp_c/kM_R83_M_h_c/kM_R83_M_alac__S_c/kM_R83_M_nadph_c)*(M_23dhmb_c/kM_R83_M_23dhmb_c)*(M_nadp_c/kM_R83_M_nadp_c) - kC_R83/sqrt(kEQ_R83*kM_R83_M_23dhmb_c*kM_R83_M_nadp_c/kM_R83_M_h_c/kM_R83_M_alac__S_c/kM_R83_M_nadph_c)*(M_h_c/kM_R83_M_h_c)*(M_alac__S_c/kM_R83_M_alac__S_c)*(M_nadph_c/kM_R83_M_nadph_c))/((1 + M_23dhmb_c/kM_R83_M_23dhmb_c)*(1 + M_nadp_c/kM_R83_M_nadp_c) + (1 + M_h_c/kM_R83_M_h_c)*(1 + M_alac__S_c/kM_R83_M_alac__S_c)*(1 + M_nadph_c/kM_R83_M_nadph_c) - 1);
    u_R83 = NaN; kC_R83 = 2.367; kEQ_R83 = 0.001787; kM_R83_M_h_c = 0.03288; kM_R83_M_23dhmb_c = 0.3041; kM_R83_M_nadp_c = 0.002917; kM_R83_M_alac__S_c = 0.03288; kM_R83_M_nadph_c = 0.00395;
  R_KARA2: M_h_c + M_2ahbut_c + M_nadph_c -> M_nadp_c + M_23dhmp_c; u_R84*(kC_R84*sqrt(kEQ_R84*kM_R84_M_h_c*kM_R84_M_2ahbut_c*kM_R84_M_nadph_c/kM_R84_M_nadp_c/kM_R84_M_23dhmp_c)*(M_h_c/kM_R84_M_h_c)*(M_2ahbut_c/kM_R84_M_2ahbut_c)*(M_nadph_c/kM_R84_M_nadph_c) - kC_R84/sqrt(kEQ_R84*kM_R84_M_h_c*kM_R84_M_2ahbut_c*kM_R84_M_nadph_c/kM_R84_M_nadp_c/kM_R84_M_23dhmp_c)*(M_nadp_c/kM_R84_M_nadp_c)*(M_23dhmp_c/kM_R84_M_23dhmp_c))/((1 + M_h_c/kM_R84_M_h_c)*(1 + M_2ahbut_c/kM_R84_M_2ahbut_c)*(1 + M_nadph_c/kM_R84_M_nadph_c) + (1 + M_nadp_c/kM_R84_M_nadp_c)*(1 + M_23dhmp_c/kM_R84_M_23dhmp_c) - 1);
    u_R84 = NaN; kC_R84 = 10; kEQ_R84 = 1.24; kM_R84_M_h_c = 0.1282; kM_R84_M_2ahbut_c = 0.1282; kM_R84_M_nadp_c = 0.078; kM_R84_M_23dhmp_c = 0.078; kM_R84_M_nadph_c = 0.1282;
  R_EX_for_e: M_for_e => ; u_R85*(kC_R85*sqrt(kEQ_R85*kM_R85_M_for_e)*(M_for_e/kM_R85_M_for_e) - kC_R85/sqrt(kEQ_R85*kM_R85_M_for_e))/(1 + M_for_e/kM_R85_M_for_e + (-1));
    u_R85 = NaN; kC_R85 = 10; kEQ_R85 = 3.316; kM_R85_M_for_e = 0.1285;
  R_ACCOAC: M_accoa_c + M_atp_c + M_hco3_c => M_h_c + M_adp_c + M_pi_c + M_malcoa_c; u_R86*(kC_R86*sqrt(kEQ_R86*kM_R86_M_accoa_c*kM_R86_M_atp_c*kM_R86_M_hco3_c/kM_R86_M_h_c/kM_R86_M_adp_c/kM_R86_M_pi_c/kM_R86_M_malcoa_c)*(M_accoa_c/kM_R86_M_accoa_c)*(M_atp_c/kM_R86_M_atp_c)*(M_hco3_c/kM_R86_M_hco3_c) - kC_R86/sqrt(kEQ_R86*kM_R86_M_accoa_c*kM_R86_M_atp_c*kM_R86_M_hco3_c/kM_R86_M_h_c/kM_R86_M_adp_c/kM_R86_M_pi_c/kM_R86_M_malcoa_c)*(M_h_c/kM_R86_M_h_c)*(M_adp_c/kM_R86_M_adp_c)*(M_pi_c/kM_R86_M_pi_c)*(M_malcoa_c/kM_R86_M_malcoa_c))/((1 + M_accoa_c/kM_R86_M_accoa_c)*(1 + M_atp_c/kM_R86_M_atp_c)*(1 + M_hco3_c/kM_R86_M_hco3_c) + (1 + M_h_c/kM_R86_M_h_c)*(1 + M_adp_c/kM_R86_M_adp_c)*(1 + M_pi_c/kM_R86_M_pi_c)*(1 + M_malcoa_c/kM_R86_M_malcoa_c) - 1);
    u_R86 = NaN; kC_R86 = 5.685; kEQ_R86 = 0.2154; kM_R86_M_h_c = 0.1037; kM_R86_M_accoa_c = 0.09641; kM_R86_M_adp_c = 0.1037; kM_R86_M_pi_c = 0.1037; kM_R86_M_atp_c = 0.09641; kM_R86_M_hco3_c = 0.09641; kM_R86_M_malcoa_c = 0.01385;
  R_KAS14: M_h_c + M_acACP_c + M_malACP_c => M_actACP_c + M_co2_c + M_ACP_c; u_R87*(kC_R87*sqrt(kEQ_R87*kM_R87_M_h_c*kM_R87_M_acACP_c*kM_R87_M_malACP_c/kM_R87_M_actACP_c/kM_R87_M_co2_c/kM_R87_M_ACP_c)*(M_h_c/kM_R87_M_h_c)*(M_acACP_c/kM_R87_M_acACP_c)*(M_malACP_c/kM_R87_M_malACP_c) - kC_R87/sqrt(kEQ_R87*kM_R87_M_h_c*kM_R87_M_acACP_c*kM_R87_M_malACP_c/kM_R87_M_actACP_c/kM_R87_M_co2_c/kM_R87_M_ACP_c)*(M_actACP_c/kM_R87_M_actACP_c)*(M_co2_c/kM_R87_M_co2_c)*(M_ACP_c/kM_R87_M_ACP_c))/((1 + M_h_c/kM_R87_M_h_c)*(1 + M_acACP_c/kM_R87_M_acACP_c)*(1 + M_malACP_c/kM_R87_M_malACP_c) + (1 + M_actACP_c/kM_R87_M_actACP_c)*(1 + M_co2_c/kM_R87_M_co2_c)*(1 + M_ACP_c/kM_R87_M_ACP_c) - 1);
    u_R87 = NaN; kC_R87 = 3.553; kEQ_R87 = 1.057; kM_R87_M_h_c = 0.1587; kM_R87_M_actACP_c = 0.06301; kM_R87_M_acACP_c = 0.1587; kM_R87_M_malACP_c = 0.1587; kM_R87_M_co2_c = 0.06301; kM_R87_M_ACP_c = 0.06301;
  R_ARGSS: M_citr__L_c + M_asp__L_c + M_atp_c => M_h_c + M_argsuc_c + M_ppi_c + M_amp_c; u_R88*(kC_R88*sqrt(kEQ_R88*kM_R88_M_citr__L_c*kM_R88_M_asp__L_c*kM_R88_M_atp_c/kM_R88_M_h_c/kM_R88_M_argsuc_c/kM_R88_M_ppi_c/kM_R88_M_amp_c)*(M_citr__L_c/kM_R88_M_citr__L_c)*(M_asp__L_c/kM_R88_M_asp__L_c)*(M_atp_c/kM_R88_M_atp_c) - kC_R88/sqrt(kEQ_R88*kM_R88_M_citr__L_c*kM_R88_M_asp__L_c*kM_R88_M_atp_c/kM_R88_M_h_c/kM_R88_M_argsuc_c/kM_R88_M_ppi_c/kM_R88_M_amp_c)*(M_h_c/kM_R88_M_h_c)*(M_argsuc_c/kM_R88_M_argsuc_c)*(M_ppi_c/kM_R88_M_ppi_c)*(M_amp_c/kM_R88_M_amp_c))/((1 + M_citr__L_c/kM_R88_M_citr__L_c)*(1 + M_asp__L_c/kM_R88_M_asp__L_c)*(1 + M_atp_c/kM_R88_M_atp_c) + (1 + M_h_c/kM_R88_M_h_c)*(1 + M_argsuc_c/kM_R88_M_argsuc_c)*(1 + M_ppi_c/kM_R88_M_ppi_c)*(1 + M_amp_c/kM_R88_M_amp_c) - 1);
    u_R88 = NaN; kC_R88 = 2.114; kEQ_R88 = 0.0009193; kM_R88_M_citr__L_c = 0.2962; kM_R88_M_h_c = 0.03376; kM_R88_M_asp__L_c = 0.2962; kM_R88_M_argsuc_c = 0.03376; kM_R88_M_atp_c = 0.2962; kM_R88_M_ppi_c = 0.03376; kM_R88_M_amp_c = 0.03376;
  R_AGPR: M_acg5sa_c + M_pi_c + M_nadp_c -> M_h_c + M_nadph_c + M_acg5p_c; u_R89*(kC_R89*sqrt(kEQ_R89*kM_R89_M_acg5sa_c*kM_R89_M_pi_c*kM_R89_M_nadp_c/kM_R89_M_h_c/kM_R89_M_nadph_c/kM_R89_M_acg5p_c)*(M_acg5sa_c/kM_R89_M_acg5sa_c)*(M_pi_c/kM_R89_M_pi_c)*(M_nadp_c/kM_R89_M_nadp_c) - kC_R89/sqrt(kEQ_R89*kM_R89_M_acg5sa_c*kM_R89_M_pi_c*kM_R89_M_nadp_c/kM_R89_M_h_c/kM_R89_M_nadph_c/kM_R89_M_acg5p_c)*(M_h_c/kM_R89_M_h_c)*(M_nadph_c/kM_R89_M_nadph_c)*(M_acg5p_c/kM_R89_M_acg5p_c))/((1 + M_acg5sa_c/kM_R89_M_acg5sa_c)*(1 + M_pi_c/kM_R89_M_pi_c)*(1 + M_nadp_c/kM_R89_M_nadp_c) + (1 + M_h_c/kM_R89_M_h_c)*(1 + M_nadph_c/kM_R89_M_nadph_c)*(1 + M_acg5p_c/kM_R89_M_acg5p_c) - 1);
    u_R89 = NaN; kC_R89 = 3.706; kEQ_R89 = 0.142; kM_R89_M_h_c = 0.08309; kM_R89_M_acg5sa_c = 0.2958; kM_R89_M_pi_c = 2.813; kM_R89_M_nadp_c = 0.03352; kM_R89_M_nadph_c = 0.08309; kM_R89_M_acg5p_c = 0.08309;
  R_ICL: M_icit_c => M_glx_c + M_succ_c; u_R90*(kC_R90*sqrt(kEQ_R90*kM_R90_M_icit_c/kM_R90_M_glx_c/kM_R90_M_succ_c)*(M_icit_c/kM_R90_M_icit_c) - kC_R90/sqrt(kEQ_R90*kM_R90_M_icit_c/kM_R90_M_glx_c/kM_R90_M_succ_c)*(M_glx_c/kM_R90_M_glx_c)*(M_succ_c/kM_R90_M_succ_c))/(1 + M_icit_c/kM_R90_M_icit_c + (1 + M_glx_c/kM_R90_M_glx_c)*(1 + M_succ_c/kM_R90_M_succ_c) - 1);
    u_R90 = NaN; kC_R90 = 3.242; kEQ_R90 = 0.02069; kM_R90_M_glx_c = 0.01793; kM_R90_M_succ_c = 0.02852; kM_R90_M_icit_c = 0.04161;
  R_EX_acald_e: M_acald_e => ; u_R91*(kC_R91*sqrt(kEQ_R91*kM_R91_M_acald_e)*(M_acald_e/kM_R91_M_acald_e) - kC_R91/sqrt(kEQ_R91*kM_R91_M_acald_e))/(1 + M_acald_e/kM_R91_M_acald_e + (-1));
    u_R91 = NaN; kC_R91 = 10; kEQ_R91 = 0.2883; kM_R91_M_acald_e = 0.2239;
  R_GLYCL: M_nad_c + M_thf_c + M_gly_c => M_nh4_c + M_mlthf_c + M_nadh_c + M_co2_c; u_R92*(kC_R92*sqrt(kEQ_R92*kM_R92_M_nad_c*kM_R92_M_thf_c*kM_R92_M_gly_c/kM_R92_M_nh4_c/kM_R92_M_mlthf_c/kM_R92_M_nadh_c/kM_R92_M_co2_c)*(M_nad_c/kM_R92_M_nad_c)*(M_thf_c/kM_R92_M_thf_c)*(M_gly_c/kM_R92_M_gly_c) - kC_R92/sqrt(kEQ_R92*kM_R92_M_nad_c*kM_R92_M_thf_c*kM_R92_M_gly_c/kM_R92_M_nh4_c/kM_R92_M_mlthf_c/kM_R92_M_nadh_c/kM_R92_M_co2_c)*(M_nh4_c/kM_R92_M_nh4_c)*(M_mlthf_c/kM_R92_M_mlthf_c)*(M_nadh_c/kM_R92_M_nadh_c)*(M_co2_c/kM_R92_M_co2_c))/((1 + M_nad_c/kM_R92_M_nad_c)*(1 + M_thf_c/kM_R92_M_thf_c)*(1 + M_gly_c/kM_R92_M_gly_c) + (1 + M_nh4_c/kM_R92_M_nh4_c)*(1 + M_mlthf_c/kM_R92_M_mlthf_c)*(1 + M_nadh_c/kM_R92_M_nadh_c)*(1 + M_co2_c/kM_R92_M_co2_c) - 1);
    u_R92 = NaN; kC_R92 = 5.772; kEQ_R92 = 0.0005108; kM_R92_M_nad_c = 0.2079; kM_R92_M_nh4_c = 0.04809; kM_R92_M_thf_c = 0.2079; kM_R92_M_mlthf_c = 0.04809; kM_R92_M_gly_c = 0.2079; kM_R92_M_nadh_c = 0.04809; kM_R92_M_co2_c = 0.04809;
  R_XYLI1: M_xyl__D_c -> M_xylu__D_c; u_R93*(kC_R93*sqrt(kEQ_R93*kM_R93_M_xyl__D_c/kM_R93_M_xylu__D_c)*(M_xyl__D_c/kM_R93_M_xyl__D_c) - kC_R93/sqrt(kEQ_R93*kM_R93_M_xyl__D_c/kM_R93_M_xylu__D_c)*(M_xylu__D_c/kM_R93_M_xylu__D_c))/(1 + M_xyl__D_c/kM_R93_M_xyl__D_c + 1 + M_xylu__D_c/kM_R93_M_xylu__D_c - 1);
    u_R93 = NaN; kC_R93 = 1.261; kEQ_R93 = 0.2185; kM_R93_M_xylu__D_c = 0.04943; kM_R93_M_xyl__D_c = 0.2023;
  R_PPC: M_pep_c + M_h2o_c + M_co2_c => M_h_c + M_pi_c + M_oaa_c; u_R94*(kC_R94*sqrt(kEQ_R94*kM_R94_M_pep_c*kM_R94_M_h2o_c*kM_R94_M_co2_c/kM_R94_M_h_c/kM_R94_M_pi_c/kM_R94_M_oaa_c)*(M_pep_c/kM_R94_M_pep_c)*(M_h2o_c/kM_R94_M_h2o_c)*(M_co2_c/kM_R94_M_co2_c) - kC_R94/sqrt(kEQ_R94*kM_R94_M_pep_c*kM_R94_M_h2o_c*kM_R94_M_co2_c/kM_R94_M_h_c/kM_R94_M_pi_c/kM_R94_M_oaa_c)*(M_h_c/kM_R94_M_h_c)*(M_pi_c/kM_R94_M_pi_c)*(M_oaa_c/kM_R94_M_oaa_c))/((1 + M_pep_c/kM_R94_M_pep_c)*(1 + M_h2o_c/kM_R94_M_h2o_c)*(1 + M_co2_c/kM_R94_M_co2_c) + (1 + M_h_c/kM_R94_M_h_c)*(1 + M_pi_c/kM_R94_M_pi_c)*(1 + M_oaa_c/kM_R94_M_oaa_c) - 1);
    u_R94 = NaN; kC_R94 = 89.59; kEQ_R94 = 6575000; kM_R94_M_pep_c = 0.09715; kM_R94_M_h_c = 1.959; kM_R94_M_pi_c = 1.959; kM_R94_M_h2o_c = 0.005105; kM_R94_M_oaa_c = 1.959; kM_R94_M_co2_c = 0.005105;
  R_G3PT: M_glyc3p_c + M_h2o_c => M_pi_c + M_glyc_c; u_R95*(kC_R95*sqrt(kEQ_R95*kM_R95_M_glyc3p_c*kM_R95_M_h2o_c/kM_R95_M_pi_c/kM_R95_M_glyc_c)*(M_glyc3p_c/kM_R95_M_glyc3p_c)*(M_h2o_c/kM_R95_M_h2o_c) - kC_R95/sqrt(kEQ_R95*kM_R95_M_glyc3p_c*kM_R95_M_h2o_c/kM_R95_M_pi_c/kM_R95_M_glyc_c)*(M_pi_c/kM_R95_M_pi_c)*(M_glyc_c/kM_R95_M_glyc_c))/((1 + M_glyc3p_c/kM_R95_M_glyc3p_c)*(1 + M_h2o_c/kM_R95_M_h2o_c) + (1 + M_pi_c/kM_R95_M_pi_c)*(1 + M_glyc_c/kM_R95_M_glyc_c) - 1);
    u_R95 = NaN; kC_R95 = 11.15; kEQ_R95 = 175.9; kM_R95_M_glyc3p_c = 0.0467; kM_R95_M_pi_c = 0.2141; kM_R95_M_h2o_c = 0.0467; kM_R95_M_glyc_c = 0.2141;
  R_SADT2: M_atp_c + M_h2o_c + M_so4_c + M_gtp_c => M_pi_c + M_gdp_c + M_ppi_c + M_aps_c; u_R96*(kC_R96*sqrt(kEQ_R96*kM_R96_M_atp_c*kM_R96_M_h2o_c*kM_R96_M_so4_c*kM_R96_M_gtp_c/kM_R96_M_pi_c/kM_R96_M_gdp_c/kM_R96_M_ppi_c/kM_R96_M_aps_c)*(M_atp_c/kM_R96_M_atp_c)*(M_h2o_c/kM_R96_M_h2o_c)*(M_so4_c/kM_R96_M_so4_c)*(M_gtp_c/kM_R96_M_gtp_c) - kC_R96/sqrt(kEQ_R96*kM_R96_M_atp_c*kM_R96_M_h2o_c*kM_R96_M_so4_c*kM_R96_M_gtp_c/kM_R96_M_pi_c/kM_R96_M_gdp_c/kM_R96_M_ppi_c/kM_R96_M_aps_c)*(M_pi_c/kM_R96_M_pi_c)*(M_gdp_c/kM_R96_M_gdp_c)*(M_ppi_c/kM_R96_M_ppi_c)*(M_aps_c/kM_R96_M_aps_c))/((1 + M_atp_c/kM_R96_M_atp_c)*(1 + M_h2o_c/kM_R96_M_h2o_c)*(1 + M_so4_c/kM_R96_M_so4_c)*(1 + M_gtp_c/kM_R96_M_gtp_c) + (1 + M_pi_c/kM_R96_M_pi_c)*(1 + M_gdp_c/kM_R96_M_gdp_c)*(1 + M_ppi_c/kM_R96_M_ppi_c)*(1 + M_aps_c/kM_R96_M_aps_c) - 1);
    u_R96 = NaN; kC_R96 = 10; kEQ_R96 = 1.537; kM_R96_M_pi_c = 0.1038; kM_R96_M_atp_c = 0.0963; kM_R96_M_gdp_c = 0.1038; kM_R96_M_ppi_c = 0.1038; kM_R96_M_h2o_c = 0.0963; kM_R96_M_so4_c = 0.0963; kM_R96_M_gtp_c = 0.0963; kM_R96_M_aps_c = 0.1038;
  R_AACPS1: M_atp_c + M_ttdca_c + M_ACP_c => M_ppi_c + M_amp_c + M_myrsACP_c; u_R97*(kC_R97*sqrt(kEQ_R97*kM_R97_M_atp_c*kM_R97_M_ttdca_c*kM_R97_M_ACP_c/kM_R97_M_ppi_c/kM_R97_M_amp_c/kM_R97_M_myrsACP_c)*(M_atp_c/kM_R97_M_atp_c)*(M_ttdca_c/kM_R97_M_ttdca_c)*(M_ACP_c/kM_R97_M_ACP_c) - kC_R97/sqrt(kEQ_R97*kM_R97_M_atp_c*kM_R97_M_ttdca_c*kM_R97_M_ACP_c/kM_R97_M_ppi_c/kM_R97_M_amp_c/kM_R97_M_myrsACP_c)*(M_ppi_c/kM_R97_M_ppi_c)*(M_amp_c/kM_R97_M_amp_c)*(M_myrsACP_c/kM_R97_M_myrsACP_c))/((1 + M_atp_c/kM_R97_M_atp_c)*(1 + M_ttdca_c/kM_R97_M_ttdca_c)*(1 + M_ACP_c/kM_R97_M_ACP_c) + (1 + M_ppi_c/kM_R97_M_ppi_c)*(1 + M_amp_c/kM_R97_M_amp_c)*(1 + M_myrsACP_c/kM_R97_M_myrsACP_c) - 1);
    u_R97 = NaN; kC_R97 = 10; kEQ_R97 = 5545; kM_R97_M_atp_c = 0.03997; kM_R97_M_ttdca_c = 0.03997; kM_R97_M_ppi_c = 0.2502; kM_R97_M_amp_c = 0.2502; kM_R97_M_myrsACP_c = 0.2502; kM_R97_M_ACP_c = 0.03997;
  R_GHMT2r: M_ser__L_c + M_thf_c -> M_mlthf_c + M_h2o_c + M_gly_c; u_R98*(kC_R98*sqrt(kEQ_R98*kM_R98_M_ser__L_c*kM_R98_M_thf_c/kM_R98_M_mlthf_c/kM_R98_M_h2o_c/kM_R98_M_gly_c)*(M_ser__L_c/kM_R98_M_ser__L_c)*(M_thf_c/kM_R98_M_thf_c) - kC_R98/sqrt(kEQ_R98*kM_R98_M_ser__L_c*kM_R98_M_thf_c/kM_R98_M_mlthf_c/kM_R98_M_h2o_c/kM_R98_M_gly_c)*(M_mlthf_c/kM_R98_M_mlthf_c)*(M_h2o_c/kM_R98_M_h2o_c)*(M_gly_c/kM_R98_M_gly_c))/((1 + M_ser__L_c/kM_R98_M_ser__L_c)*(1 + M_thf_c/kM_R98_M_thf_c) + (1 + M_mlthf_c/kM_R98_M_mlthf_c)*(1 + M_h2o_c/kM_R98_M_h2o_c)*(1 + M_gly_c/kM_R98_M_gly_c) - 1);
    u_R98 = NaN; kC_R98 = 2.145; kEQ_R98 = 40.77; kM_R98_M_ser__L_c = 0.06335; kM_R98_M_thf_c = 0.001778; kM_R98_M_mlthf_c = 0.1578; kM_R98_M_h2o_c = 0.1578; kM_R98_M_gly_c = 0.1578;
  R_DHORD2: M_dhor__S_c + M_q8_c => M_q8h2_c + M_orot_c; u_R99*(kC_R99*sqrt(kEQ_R99*kM_R99_M_dhor__S_c*kM_R99_M_q8_c/kM_R99_M_q8h2_c/kM_R99_M_orot_c)*(M_dhor__S_c/kM_R99_M_dhor__S_c)*(M_q8_c/kM_R99_M_q8_c) - kC_R99/sqrt(kEQ_R99*kM_R99_M_dhor__S_c*kM_R99_M_q8_c/kM_R99_M_q8h2_c/kM_R99_M_orot_c)*(M_q8h2_c/kM_R99_M_q8h2_c)*(M_orot_c/kM_R99_M_orot_c))/((1 + M_dhor__S_c/kM_R99_M_dhor__S_c)*(1 + M_q8_c/kM_R99_M_q8_c) + (1 + M_q8h2_c/kM_R99_M_q8h2_c)*(1 + M_orot_c/kM_R99_M_orot_c) - 1);
    u_R99 = NaN; kC_R99 = 10; kEQ_R99 = 0.9219; kM_R99_M_q8h2_c = 0.09891; kM_R99_M_dhor__S_c = 0.1011; kM_R99_M_orot_c = 0.09891; kM_R99_M_q8_c = 0.1011;
  R_SDPDS: M_sl26da_c + M_h2o_c => M_26dap_LL_c + M_succ_c; u_R100*(kC_R100*sqrt(kEQ_R100*kM_R100_M_sl26da_c*kM_R100_M_h2o_c/kM_R100_M_26dap_LL_c/kM_R100_M_succ_c)*(M_sl26da_c/kM_R100_M_sl26da_c)*(M_h2o_c/kM_R100_M_h2o_c) - kC_R100/sqrt(kEQ_R100*kM_R100_M_sl26da_c*kM_R100_M_h2o_c/kM_R100_M_26dap_LL_c/kM_R100_M_succ_c)*(M_26dap_LL_c/kM_R100_M_26dap_LL_c)*(M_succ_c/kM_R100_M_succ_c))/((1 + M_sl26da_c/kM_R100_M_sl26da_c)*(1 + M_h2o_c/kM_R100_M_h2o_c) + (1 + M_26dap_LL_c/kM_R100_M_26dap_LL_c)*(1 + M_succ_c/kM_R100_M_succ_c) - 1);
    u_R100 = NaN; kC_R100 = 27.09; kEQ_R100 = 0.02648; kM_R100_M_26dap_LL_c = 0.1597; kM_R100_M_sl26da_c = 1.092; kM_R100_M_h2o_c = 0.06262; kM_R100_M_succ_c = 0.1597;
  R_EX_lac__D_e: M_lac__D_e => ; u_R101*(kC_R101*sqrt(kEQ_R101*kM_R101_M_lac__D_e)*(M_lac__D_e/kM_R101_M_lac__D_e) - kC_R101/sqrt(kEQ_R101*kM_R101_M_lac__D_e))/(1 + M_lac__D_e/kM_R101_M_lac__D_e + (-1));
    u_R101 = NaN; kC_R101 = 10; kEQ_R101 = 0.03317; kM_R101_M_lac__D_e = 0.366;
  R_UMPK: M_ump_c + M_atp_c -> M_adp_c + M_udp_c; u_R102*(kC_R102*sqrt(kEQ_R102*kM_R102_M_ump_c*kM_R102_M_atp_c/kM_R102_M_adp_c/kM_R102_M_udp_c)*(M_ump_c/kM_R102_M_ump_c)*(M_atp_c/kM_R102_M_atp_c) - kC_R102/sqrt(kEQ_R102*kM_R102_M_ump_c*kM_R102_M_atp_c/kM_R102_M_adp_c/kM_R102_M_udp_c)*(M_adp_c/kM_R102_M_adp_c)*(M_udp_c/kM_R102_M_udp_c))/((1 + M_ump_c/kM_R102_M_ump_c)*(1 + M_atp_c/kM_R102_M_atp_c) + (1 + M_adp_c/kM_R102_M_adp_c)*(1 + M_udp_c/kM_R102_M_udp_c) - 1);
    u_R102 = NaN; kC_R102 = 5.505; kEQ_R102 = 0.7792; kM_R102_M_ump_c = 0.06635; kM_R102_M_adp_c = 0.1507; kM_R102_M_atp_c = 0.06635; kM_R102_M_udp_c = 0.1507;
  R_CTPS2: M_atp_c + M_utp_c + M_gln__L_c + M_h2o_c => 2 M_h_c + M_ctp_c + M_adp_c + M_pi_c + M_glu__L_c; u_R103*(kC_R103*sqrt(kEQ_R103*kM_R103_M_atp_c*kM_R103_M_utp_c*kM_R103_M_gln__L_c*kM_R103_M_h2o_c/kM_R103_M_h_c^2/kM_R103_M_ctp_c/kM_R103_M_adp_c/kM_R103_M_pi_c/kM_R103_M_glu__L_c)*(M_atp_c/kM_R103_M_atp_c)*(M_utp_c/kM_R103_M_utp_c)*(M_gln__L_c/kM_R103_M_gln__L_c)*(M_h2o_c/kM_R103_M_h2o_c) - kC_R103/sqrt(kEQ_R103*kM_R103_M_atp_c*kM_R103_M_utp_c*kM_R103_M_gln__L_c*kM_R103_M_h2o_c/kM_R103_M_h_c^2/kM_R103_M_ctp_c/kM_R103_M_adp_c/kM_R103_M_pi_c/kM_R103_M_glu__L_c)*(M_h_c/kM_R103_M_h_c)^2*(M_ctp_c/kM_R103_M_ctp_c)*(M_adp_c/kM_R103_M_adp_c)*(M_pi_c/kM_R103_M_pi_c)*(M_glu__L_c/kM_R103_M_glu__L_c))/((1 + M_atp_c/kM_R103_M_atp_c)*(1 + M_utp_c/kM_R103_M_utp_c)*(1 + M_gln__L_c/kM_R103_M_gln__L_c)*(1 + M_h2o_c/kM_R103_M_h2o_c) + (1 + M_h_c/kM_R103_M_h_c)^2*(1 + M_ctp_c/kM_R103_M_ctp_c)*(1 + M_adp_c/kM_R103_M_adp_c)*(1 + M_pi_c/kM_R103_M_pi_c)*(1 + M_glu__L_c/kM_R103_M_glu__L_c) - 1);
    u_R103 = NaN; kC_R103 = 6.969; kEQ_R103 = 2429; kM_R103_M_h_c = 0.203; kM_R103_M_ctp_c = 0.1425; kM_R103_M_adp_c = 0.1425; kM_R103_M_pi_c = 0.1425; kM_R103_M_atp_c = 0.005037; kM_R103_M_utp_c = 0.004358; kM_R103_M_glu__L_c = 0.1425; kM_R103_M_gln__L_c = 0.07018; kM_R103_M_h2o_c = 0.07018;
  R_NDPK7: M_atp_c + M_dcdp_c -> M_adp_c + M_dctp_c; u_R104*(kC_R104*sqrt(kEQ_R104*kM_R104_M_atp_c*kM_R104_M_dcdp_c/kM_R104_M_adp_c/kM_R104_M_dctp_c)*(M_atp_c/kM_R104_M_atp_c)*(M_dcdp_c/kM_R104_M_dcdp_c) - kC_R104/sqrt(kEQ_R104*kM_R104_M_atp_c*kM_R104_M_dcdp_c/kM_R104_M_adp_c/kM_R104_M_dctp_c)*(M_adp_c/kM_R104_M_adp_c)*(M_dctp_c/kM_R104_M_dctp_c))/((1 + M_atp_c/kM_R104_M_atp_c)*(1 + M_dcdp_c/kM_R104_M_dcdp_c) + (1 + M_adp_c/kM_R104_M_adp_c)*(1 + M_dctp_c/kM_R104_M_dctp_c) - 1);
    u_R104 = NaN; kC_R104 = 2.464; kEQ_R104 = 0.1501; kM_R104_M_adp_c = 0.06296; kM_R104_M_atp_c = 0.1588; kM_R104_M_dctp_c = 0.06296; kM_R104_M_dcdp_c = 0.1588;
  R_TRPS3: M_3ig3p_c => M_g3p_c + M_indole_c; u_R105*(kC_R105*sqrt(kEQ_R105*kM_R105_M_3ig3p_c/kM_R105_M_g3p_c/kM_R105_M_indole_c)*(M_3ig3p_c/kM_R105_M_3ig3p_c) - kC_R105/sqrt(kEQ_R105*kM_R105_M_3ig3p_c/kM_R105_M_g3p_c/kM_R105_M_indole_c)*(M_g3p_c/kM_R105_M_g3p_c)*(M_indole_c/kM_R105_M_indole_c))/(1 + M_3ig3p_c/kM_R105_M_3ig3p_c + (1 + M_g3p_c/kM_R105_M_g3p_c)*(1 + M_indole_c/kM_R105_M_indole_c) - 1);
    u_R105 = NaN; kC_R105 = 2.171; kEQ_R105 = 0.0004151; kM_R105_M_g3p_c = 0.01539; kM_R105_M_indole_c = 0.01539; kM_R105_M_3ig3p_c = 0.6497;
  R_ADK1: M_atp_c + M_amp_c -> 2 M_adp_c; u_R106*(kC_R106*sqrt(kEQ_R106*kM_R106_M_atp_c*kM_R106_M_amp_c/kM_R106_M_adp_c^2)*(M_atp_c/kM_R106_M_atp_c)*(M_amp_c/kM_R106_M_amp_c) - kC_R106/sqrt(kEQ_R106*kM_R106_M_atp_c*kM_R106_M_amp_c/kM_R106_M_adp_c^2)*(M_adp_c/kM_R106_M_adp_c)^2)/((1 + M_atp_c/kM_R106_M_atp_c)*(1 + M_amp_c/kM_R106_M_amp_c) + (1 + M_adp_c/kM_R106_M_adp_c)^2 - 1);
    u_R106 = NaN; kC_R106 = 8.223; kEQ_R106 = 0.8774; kM_R106_M_adp_c = 0.02062; kM_R106_M_atp_c = 0.0128; kM_R106_M_amp_c = 0.002228;
  R_NDPK2: M_atp_c + M_udp_c -> M_adp_c + M_utp_c; u_R107*(kC_R107*sqrt(kEQ_R107*kM_R107_M_atp_c*kM_R107_M_udp_c/kM_R107_M_adp_c/kM_R107_M_utp_c)*(M_atp_c/kM_R107_M_atp_c)*(M_udp_c/kM_R107_M_udp_c) - kC_R107/sqrt(kEQ_R107*kM_R107_M_atp_c*kM_R107_M_udp_c/kM_R107_M_adp_c/kM_R107_M_utp_c)*(M_adp_c/kM_R107_M_adp_c)*(M_utp_c/kM_R107_M_utp_c))/((1 + M_atp_c/kM_R107_M_atp_c)*(1 + M_udp_c/kM_R107_M_udp_c) + (1 + M_adp_c/kM_R107_M_adp_c)*(1 + M_utp_c/kM_R107_M_utp_c) - 1);
    u_R107 = NaN; kC_R107 = 7.907; kEQ_R107 = 1.055; kM_R107_M_adp_c = 0.1479; kM_R107_M_atp_c = 0.0676; kM_R107_M_utp_c = 0.1479; kM_R107_M_udp_c = 0.0676;
  R_NDPK4: M_atp_c + M_dtdp_c -> M_adp_c + M_dttp_c; u_R108*(kC_R108*sqrt(kEQ_R108*kM_R108_M_atp_c*kM_R108_M_dtdp_c/kM_R108_M_adp_c/kM_R108_M_dttp_c)*(M_atp_c/kM_R108_M_atp_c)*(M_dtdp_c/kM_R108_M_dtdp_c) - kC_R108/sqrt(kEQ_R108*kM_R108_M_atp_c*kM_R108_M_dtdp_c/kM_R108_M_adp_c/kM_R108_M_dttp_c)*(M_adp_c/kM_R108_M_adp_c)*(M_dttp_c/kM_R108_M_dttp_c))/((1 + M_atp_c/kM_R108_M_atp_c)*(1 + M_dtdp_c/kM_R108_M_dtdp_c) + (1 + M_adp_c/kM_R108_M_adp_c)*(1 + M_dttp_c/kM_R108_M_dttp_c) - 1);
    u_R108 = NaN; kC_R108 = 2.96; kEQ_R108 = 0.6689; kM_R108_M_adp_c = 0.09934; kM_R108_M_atp_c = 0.1007; kM_R108_M_dttp_c = 0.09934; kM_R108_M_dtdp_c = 0.1007;
  R_ACODA: M_acorn_c + M_h2o_c => M_ac_c + M_orn_c; u_R109*(kC_R109*sqrt(kEQ_R109*kM_R109_M_acorn_c*kM_R109_M_h2o_c/kM_R109_M_ac_c/kM_R109_M_orn_c)*(M_acorn_c/kM_R109_M_acorn_c)*(M_h2o_c/kM_R109_M_h2o_c) - kC_R109/sqrt(kEQ_R109*kM_R109_M_acorn_c*kM_R109_M_h2o_c/kM_R109_M_ac_c/kM_R109_M_orn_c)*(M_ac_c/kM_R109_M_ac_c)*(M_orn_c/kM_R109_M_orn_c))/((1 + M_acorn_c/kM_R109_M_acorn_c)*(1 + M_h2o_c/kM_R109_M_h2o_c) + (1 + M_ac_c/kM_R109_M_ac_c)*(1 + M_orn_c/kM_R109_M_orn_c) - 1);
    u_R109 = NaN; kC_R109 = 11.45; kEQ_R109 = 9.114; kM_R109_M_ac_c = 0.1457; kM_R109_M_acorn_c = 0.06862; kM_R109_M_h2o_c = 0.06862; kM_R109_M_orn_c = 0.1457;
  R_ADSS: M_asp__L_c + M_imp_c + M_gtp_c => 2 M_h_c + M_pi_c + M_gdp_c + M_dcamp_c; u_R110*(kC_R110*sqrt(kEQ_R110*kM_R110_M_asp__L_c*kM_R110_M_imp_c*kM_R110_M_gtp_c/kM_R110_M_h_c^2/kM_R110_M_pi_c/kM_R110_M_gdp_c/kM_R110_M_dcamp_c)*(M_asp__L_c/kM_R110_M_asp__L_c)*(M_imp_c/kM_R110_M_imp_c)*(M_gtp_c/kM_R110_M_gtp_c) - kC_R110/sqrt(kEQ_R110*kM_R110_M_asp__L_c*kM_R110_M_imp_c*kM_R110_M_gtp_c/kM_R110_M_h_c^2/kM_R110_M_pi_c/kM_R110_M_gdp_c/kM_R110_M_dcamp_c)*(M_h_c/kM_R110_M_h_c)^2*(M_pi_c/kM_R110_M_pi_c)*(M_gdp_c/kM_R110_M_gdp_c)*(M_dcamp_c/kM_R110_M_dcamp_c))/((1 + M_asp__L_c/kM_R110_M_asp__L_c)*(1 + M_imp_c/kM_R110_M_imp_c)*(1 + M_gtp_c/kM_R110_M_gtp_c) + (1 + M_h_c/kM_R110_M_h_c)^2*(1 + M_pi_c/kM_R110_M_pi_c)*(1 + M_gdp_c/kM_R110_M_gdp_c)*(1 + M_dcamp_c/kM_R110_M_dcamp_c) - 1);
    u_R110 = NaN; kC_R110 = 3.866; kEQ_R110 = 0.987; kM_R110_M_h_c = 0.1183; kM_R110_M_asp__L_c = 0.8632; kM_R110_M_imp_c = 0.07605; kM_R110_M_pi_c = 0.1088; kM_R110_M_gdp_c = 0.1088; kM_R110_M_gtp_c = 0.02097; kM_R110_M_dcamp_c = 0.1088;
  R_ASNS2: M_asp__L_c + M_nh4_c + M_atp_c => M_h_c + M_ppi_c + M_amp_c + M_asn__L_c; u_R111*(kC_R111*sqrt(kEQ_R111*kM_R111_M_asp__L_c*kM_R111_M_nh4_c*kM_R111_M_atp_c/kM_R111_M_h_c/kM_R111_M_ppi_c/kM_R111_M_amp_c/kM_R111_M_asn__L_c)*(M_asp__L_c/kM_R111_M_asp__L_c)*(M_nh4_c/kM_R111_M_nh4_c)*(M_atp_c/kM_R111_M_atp_c) - kC_R111/sqrt(kEQ_R111*kM_R111_M_asp__L_c*kM_R111_M_nh4_c*kM_R111_M_atp_c/kM_R111_M_h_c/kM_R111_M_ppi_c/kM_R111_M_amp_c/kM_R111_M_asn__L_c)*(M_h_c/kM_R111_M_h_c)*(M_ppi_c/kM_R111_M_ppi_c)*(M_amp_c/kM_R111_M_amp_c)*(M_asn__L_c/kM_R111_M_asn__L_c))/((1 + M_asp__L_c/kM_R111_M_asp__L_c)*(1 + M_nh4_c/kM_R111_M_nh4_c)*(1 + M_atp_c/kM_R111_M_atp_c) + (1 + M_h_c/kM_R111_M_h_c)*(1 + M_ppi_c/kM_R111_M_ppi_c)*(1 + M_amp_c/kM_R111_M_amp_c)*(1 + M_asn__L_c/kM_R111_M_asn__L_c) - 1);
    u_R111 = NaN; kC_R111 = 18.71; kEQ_R111 = 11960; kM_R111_M_h_c = 0.4389; kM_R111_M_asp__L_c = 0.02278; kM_R111_M_nh4_c = 0.02278; kM_R111_M_atp_c = 0.06377; kM_R111_M_ppi_c = 0.4389; kM_R111_M_amp_c = 0.4389; kM_R111_M_asn__L_c = 0.4389;
  R_ASPCT: M_asp__L_c + M_cbp_c => M_h_c + M_pi_c + M_cbasp_c; u_R112*(kC_R112*sqrt(kEQ_R112*kM_R112_M_asp__L_c*kM_R112_M_cbp_c/kM_R112_M_h_c/kM_R112_M_pi_c/kM_R112_M_cbasp_c)*(M_asp__L_c/kM_R112_M_asp__L_c)*(M_cbp_c/kM_R112_M_cbp_c) - kC_R112/sqrt(kEQ_R112*kM_R112_M_asp__L_c*kM_R112_M_cbp_c/kM_R112_M_h_c/kM_R112_M_pi_c/kM_R112_M_cbasp_c)*(M_h_c/kM_R112_M_h_c)*(M_pi_c/kM_R112_M_pi_c)*(M_cbasp_c/kM_R112_M_cbasp_c))/((1 + M_asp__L_c/kM_R112_M_asp__L_c)*(1 + M_cbp_c/kM_R112_M_cbp_c) + (1 + M_h_c/kM_R112_M_h_c)*(1 + M_pi_c/kM_R112_M_pi_c)*(1 + M_cbasp_c/kM_R112_M_cbasp_c) - 1);
    u_R112 = NaN; kC_R112 = 40.38; kEQ_R112 = 3662; kM_R112_M_h_c = 1.405; kM_R112_M_asp__L_c = 13.04; kM_R112_M_pi_c = 1.405; kM_R112_M_cbp_c = 0.001227; kM_R112_M_cbasp_c = 1.405;
  R_MCOATA: M_malcoa_c + M_ACP_c -> M_malACP_c + M_coa_c; u_R113*(kC_R113*sqrt(kEQ_R113*kM_R113_M_malcoa_c*kM_R113_M_ACP_c/kM_R113_M_malACP_c/kM_R113_M_coa_c)*(M_malcoa_c/kM_R113_M_malcoa_c)*(M_ACP_c/kM_R113_M_ACP_c) - kC_R113/sqrt(kEQ_R113*kM_R113_M_malcoa_c*kM_R113_M_ACP_c/kM_R113_M_malACP_c/kM_R113_M_coa_c)*(M_malACP_c/kM_R113_M_malACP_c)*(M_coa_c/kM_R113_M_coa_c))/((1 + M_malcoa_c/kM_R113_M_malcoa_c)*(1 + M_ACP_c/kM_R113_M_ACP_c) + (1 + M_malACP_c/kM_R113_M_malACP_c)*(1 + M_coa_c/kM_R113_M_coa_c) - 1);
    u_R113 = NaN; kC_R113 = 0.6825; kEQ_R113 = 0.3038; kM_R113_M_malcoa_c = 0.1524; kM_R113_M_malACP_c = 0.06562; kM_R113_M_coa_c = 0.06562; kM_R113_M_ACP_c = 0.1524;
  R_DAPE: M_26dap_LL_c -> M_26dap__M_c; u_R114*(kC_R114*sqrt(kEQ_R114*kM_R114_M_26dap_LL_c/kM_R114_M_26dap__M_c)*(M_26dap_LL_c/kM_R114_M_26dap_LL_c) - kC_R114/sqrt(kEQ_R114*kM_R114_M_26dap_LL_c/kM_R114_M_26dap__M_c)*(M_26dap__M_c/kM_R114_M_26dap__M_c))/(1 + M_26dap_LL_c/kM_R114_M_26dap_LL_c + 1 + M_26dap__M_c/kM_R114_M_26dap__M_c - 1);
    u_R114 = NaN; kC_R114 = 13.82; kEQ_R114 = 1.203; kM_R114_M_26dap_LL_c = 0.02311; kM_R114_M_26dap__M_c = 0.4326;
  R_DHDPRy: M_h_c + M_nadph_c + M_23dhdp_c => M_nadp_c + M_thdp_c; u_R115*(kC_R115*sqrt(kEQ_R115*kM_R115_M_h_c*kM_R115_M_nadph_c*kM_R115_M_23dhdp_c/kM_R115_M_nadp_c/kM_R115_M_thdp_c)*(M_h_c/kM_R115_M_h_c)*(M_nadph_c/kM_R115_M_nadph_c)*(M_23dhdp_c/kM_R115_M_23dhdp_c) - kC_R115/sqrt(kEQ_R115*kM_R115_M_h_c*kM_R115_M_nadph_c*kM_R115_M_23dhdp_c/kM_R115_M_nadp_c/kM_R115_M_thdp_c)*(M_nadp_c/kM_R115_M_nadp_c)*(M_thdp_c/kM_R115_M_thdp_c))/((1 + M_h_c/kM_R115_M_h_c)*(1 + M_nadph_c/kM_R115_M_nadph_c)*(1 + M_23dhdp_c/kM_R115_M_23dhdp_c) + (1 + M_nadp_c/kM_R115_M_nadp_c)*(1 + M_thdp_c/kM_R115_M_thdp_c) - 1);
    u_R115 = NaN; kC_R115 = 10; kEQ_R115 = 1.533; kM_R115_M_h_c = 0.125; kM_R115_M_nadp_c = 0.07999; kM_R115_M_thdp_c = 0.07999; kM_R115_M_nadph_c = 0.125; kM_R115_M_23dhdp_c = 0.125;
  R_HSK: M_hom__L_c + M_atp_c => M_h_c + M_adp_c + M_phom_c; u_R116*(kC_R116*sqrt(kEQ_R116*kM_R116_M_hom__L_c*kM_R116_M_atp_c/kM_R116_M_h_c/kM_R116_M_adp_c/kM_R116_M_phom_c)*(M_hom__L_c/kM_R116_M_hom__L_c)*(M_atp_c/kM_R116_M_atp_c) - kC_R116/sqrt(kEQ_R116*kM_R116_M_hom__L_c*kM_R116_M_atp_c/kM_R116_M_h_c/kM_R116_M_adp_c/kM_R116_M_phom_c)*(M_h_c/kM_R116_M_h_c)*(M_adp_c/kM_R116_M_adp_c)*(M_phom_c/kM_R116_M_phom_c))/((1 + M_hom__L_c/kM_R116_M_hom__L_c)*(1 + M_atp_c/kM_R116_M_atp_c) + (1 + M_h_c/kM_R116_M_h_c)*(1 + M_adp_c/kM_R116_M_adp_c)*(1 + M_phom_c/kM_R116_M_phom_c) - 1);
    u_R116 = NaN; kC_R116 = 199.7; kEQ_R116 = 1218000; kM_R116_M_h_c = 4.97; kM_R116_M_adp_c = 4.97; kM_R116_M_hom__L_c = 0.002012; kM_R116_M_atp_c = 0.08719; kM_R116_M_phom_c = 4.97;
  R_SDPTA: M_akg_c + M_sl26da_c -> M_glu__L_c + M_sl2a6o_c; u_R117*(kC_R117*sqrt(kEQ_R117*kM_R117_M_akg_c*kM_R117_M_sl26da_c/kM_R117_M_glu__L_c/kM_R117_M_sl2a6o_c)*(M_akg_c/kM_R117_M_akg_c)*(M_sl26da_c/kM_R117_M_sl26da_c) - kC_R117/sqrt(kEQ_R117*kM_R117_M_akg_c*kM_R117_M_sl26da_c/kM_R117_M_glu__L_c/kM_R117_M_sl2a6o_c)*(M_glu__L_c/kM_R117_M_glu__L_c)*(M_sl2a6o_c/kM_R117_M_sl2a6o_c))/((1 + M_akg_c/kM_R117_M_akg_c)*(1 + M_sl26da_c/kM_R117_M_sl26da_c) + (1 + M_glu__L_c/kM_R117_M_glu__L_c)*(1 + M_sl2a6o_c/kM_R117_M_sl2a6o_c) - 1);
    u_R117 = NaN; kC_R117 = 2.704; kEQ_R117 = 0.9681; kM_R117_M_akg_c = 0.3905; kM_R117_M_sl26da_c = 0.3905; kM_R117_M_glu__L_c = 3.012; kM_R117_M_sl2a6o_c = 0.02561;
  R_THRS: M_h2o_c + M_phom_c => M_thr__L_c + M_pi_c; u_R118*(kC_R118*sqrt(kEQ_R118*kM_R118_M_h2o_c*kM_R118_M_phom_c/kM_R118_M_thr__L_c/kM_R118_M_pi_c)*(M_h2o_c/kM_R118_M_h2o_c)*(M_phom_c/kM_R118_M_phom_c) - kC_R118/sqrt(kEQ_R118*kM_R118_M_h2o_c*kM_R118_M_phom_c/kM_R118_M_thr__L_c/kM_R118_M_pi_c)*(M_thr__L_c/kM_R118_M_thr__L_c)*(M_pi_c/kM_R118_M_pi_c))/((1 + M_h2o_c/kM_R118_M_h2o_c)*(1 + M_phom_c/kM_R118_M_phom_c) + (1 + M_thr__L_c/kM_R118_M_thr__L_c)*(1 + M_pi_c/kM_R118_M_pi_c) - 1);
    u_R118 = NaN; kC_R118 = 72.17; kEQ_R118 = 55410; kM_R118_M_thr__L_c = 2.133; kM_R118_M_pi_c = 2.133; kM_R118_M_h2o_c = 0.004688; kM_R118_M_phom_c = 0.1299;
  R_HSST: M_hom__L_c + M_succoa_c => M_suchms_c + M_coa_c; u_R119*(kC_R119*sqrt(kEQ_R119*kM_R119_M_hom__L_c*kM_R119_M_succoa_c/kM_R119_M_suchms_c/kM_R119_M_coa_c)*(M_hom__L_c/kM_R119_M_hom__L_c)*(M_succoa_c/kM_R119_M_succoa_c) - kC_R119/sqrt(kEQ_R119*kM_R119_M_hom__L_c*kM_R119_M_succoa_c/kM_R119_M_suchms_c/kM_R119_M_coa_c)*(M_suchms_c/kM_R119_M_suchms_c)*(M_coa_c/kM_R119_M_coa_c))/((1 + M_hom__L_c/kM_R119_M_hom__L_c)*(1 + M_succoa_c/kM_R119_M_succoa_c) + (1 + M_suchms_c/kM_R119_M_suchms_c)*(1 + M_coa_c/kM_R119_M_coa_c) - 1);
    u_R119 = NaN; kC_R119 = 28.56; kEQ_R119 = 27230; kM_R119_M_hom__L_c = 0.009791; kM_R119_M_suchms_c = 3.354; kM_R119_M_coa_c = 0.3612; kM_R119_M_succoa_c = 0.1417;
  R_PPNDH: M_h_c + M_pphn_c => M_phpyr_c + M_h2o_c + M_co2_c; u_R120*(kC_R120*sqrt(kEQ_R120*kM_R120_M_h_c*kM_R120_M_pphn_c/kM_R120_M_phpyr_c/kM_R120_M_h2o_c/kM_R120_M_co2_c)*(M_h_c/kM_R120_M_h_c)*(M_pphn_c/kM_R120_M_pphn_c) - kC_R120/sqrt(kEQ_R120*kM_R120_M_h_c*kM_R120_M_pphn_c/kM_R120_M_phpyr_c/kM_R120_M_h2o_c/kM_R120_M_co2_c)*(M_phpyr_c/kM_R120_M_phpyr_c)*(M_h2o_c/kM_R120_M_h2o_c)*(M_co2_c/kM_R120_M_co2_c))/((1 + M_h_c/kM_R120_M_h_c)*(1 + M_pphn_c/kM_R120_M_pphn_c) + (1 + M_phpyr_c/kM_R120_M_phpyr_c)*(1 + M_h2o_c/kM_R120_M_h2o_c)*(1 + M_co2_c/kM_R120_M_co2_c) - 1);
    u_R120 = NaN; kC_R120 = 14.62; kEQ_R120 = 0.8213; kM_R120_M_h_c = 0.06421; kM_R120_M_phpyr_c = 0.1557; kM_R120_M_h2o_c = 0.1557; kM_R120_M_pphn_c = 0.06421; kM_R120_M_co2_c = 0.1557;
  R_DTMPK: M_atp_c + M_dtmp_c -> M_adp_c + M_dtdp_c; u_R121*(kC_R121*sqrt(kEQ_R121*kM_R121_M_atp_c*kM_R121_M_dtmp_c/kM_R121_M_adp_c/kM_R121_M_dtdp_c)*(M_atp_c/kM_R121_M_atp_c)*(M_dtmp_c/kM_R121_M_dtmp_c) - kC_R121/sqrt(kEQ_R121*kM_R121_M_atp_c*kM_R121_M_dtmp_c/kM_R121_M_adp_c/kM_R121_M_dtdp_c)*(M_adp_c/kM_R121_M_adp_c)*(M_dtdp_c/kM_R121_M_dtdp_c))/((1 + M_atp_c/kM_R121_M_atp_c)*(1 + M_dtmp_c/kM_R121_M_dtmp_c) + (1 + M_adp_c/kM_R121_M_adp_c)*(1 + M_dtdp_c/kM_R121_M_dtdp_c) - 1);
    u_R121 = NaN; kC_R121 = 2.621; kEQ_R121 = 1.239; kM_R121_M_adp_c = 0.1471; kM_R121_M_atp_c = 0.068; kM_R121_M_dtmp_c = 0.068; kM_R121_M_dtdp_c = 0.1471;
  R_NDPK1: M_atp_c + M_gdp_c -> M_adp_c + M_gtp_c; u_R122*(kC_R122*sqrt(kEQ_R122*kM_R122_M_atp_c*kM_R122_M_gdp_c/kM_R122_M_adp_c/kM_R122_M_gtp_c)*(M_atp_c/kM_R122_M_atp_c)*(M_gdp_c/kM_R122_M_gdp_c) - kC_R122/sqrt(kEQ_R122*kM_R122_M_atp_c*kM_R122_M_gdp_c/kM_R122_M_adp_c/kM_R122_M_gtp_c)*(M_adp_c/kM_R122_M_adp_c)*(M_gtp_c/kM_R122_M_gtp_c))/((1 + M_atp_c/kM_R122_M_atp_c)*(1 + M_gdp_c/kM_R122_M_gdp_c) + (1 + M_adp_c/kM_R122_M_adp_c)*(1 + M_gtp_c/kM_R122_M_gtp_c) - 1);
    u_R122 = NaN; kC_R122 = 5.964; kEQ_R122 = 2.737; kM_R122_M_adp_c = 0.2782; kM_R122_M_atp_c = 0.03594; kM_R122_M_gdp_c = 0.03594; kM_R122_M_gtp_c = 0.2782;
  R_TRDR: M_h_c + M_trdox_c + M_nadph_c => M_nadp_c + M_trdrd_c; u_R123*(kC_R123*sqrt(kEQ_R123*kM_R123_M_h_c*kM_R123_M_trdox_c*kM_R123_M_nadph_c/kM_R123_M_nadp_c/kM_R123_M_trdrd_c)*(M_h_c/kM_R123_M_h_c)*(M_trdox_c/kM_R123_M_trdox_c)*(M_nadph_c/kM_R123_M_nadph_c) - kC_R123/sqrt(kEQ_R123*kM_R123_M_h_c*kM_R123_M_trdox_c*kM_R123_M_nadph_c/kM_R123_M_nadp_c/kM_R123_M_trdrd_c)*(M_nadp_c/kM_R123_M_nadp_c)*(M_trdrd_c/kM_R123_M_trdrd_c))/((1 + M_h_c/kM_R123_M_h_c)*(1 + M_trdox_c/kM_R123_M_trdox_c)*(1 + M_nadph_c/kM_R123_M_nadph_c) + (1 + M_nadp_c/kM_R123_M_nadp_c)*(1 + M_trdrd_c/kM_R123_M_trdrd_c) - 1);
    u_R123 = NaN; kC_R123 = 5.209; kEQ_R123 = 14.47; kM_R123_M_h_c = 0.2037; kM_R123_M_trdox_c = 0.2037; kM_R123_M_nadp_c = 0.04908; kM_R123_M_trdrd_c = 0.000485; kM_R123_M_nadph_c = 5.637e-5;
  R_DDPA: M_pep_c + M_e4p_c + M_h2o_c => M_pi_c + M_2dda7p_c; u_R124*(kC_R124*sqrt(kEQ_R124*kM_R124_M_pep_c*kM_R124_M_e4p_c*kM_R124_M_h2o_c/kM_R124_M_pi_c/kM_R124_M_2dda7p_c)*(M_pep_c/kM_R124_M_pep_c)*(M_e4p_c/kM_R124_M_e4p_c)*(M_h2o_c/kM_R124_M_h2o_c) - kC_R124/sqrt(kEQ_R124*kM_R124_M_pep_c*kM_R124_M_e4p_c*kM_R124_M_h2o_c/kM_R124_M_pi_c/kM_R124_M_2dda7p_c)*(M_pi_c/kM_R124_M_pi_c)*(M_2dda7p_c/kM_R124_M_2dda7p_c))/((1 + M_pep_c/kM_R124_M_pep_c)*(1 + M_e4p_c/kM_R124_M_e4p_c)*(1 + M_h2o_c/kM_R124_M_h2o_c) + (1 + M_pi_c/kM_R124_M_pi_c)*(1 + M_2dda7p_c/kM_R124_M_2dda7p_c) - 1);
    u_R124 = NaN; kC_R124 = 16.43; kEQ_R124 = 0.94; kM_R124_M_pep_c = 2.204; kM_R124_M_pi_c = 0.2866; kM_R124_M_e4p_c = 4.944; kM_R124_M_h2o_c = 0.03489; kM_R124_M_2dda7p_c = 0.2866;
  R_MALS: M_accoa_c + M_glx_c + M_h2o_c => M_h_c + M_mal__L_c + M_coa_c; u_R125*(kC_R125*sqrt(kEQ_R125*kM_R125_M_accoa_c*kM_R125_M_glx_c*kM_R125_M_h2o_c/kM_R125_M_h_c/kM_R125_M_mal__L_c/kM_R125_M_coa_c)*(M_accoa_c/kM_R125_M_accoa_c)*(M_glx_c/kM_R125_M_glx_c)*(M_h2o_c/kM_R125_M_h2o_c) - kC_R125/sqrt(kEQ_R125*kM_R125_M_accoa_c*kM_R125_M_glx_c*kM_R125_M_h2o_c/kM_R125_M_h_c/kM_R125_M_mal__L_c/kM_R125_M_coa_c)*(M_h_c/kM_R125_M_h_c)*(M_mal__L_c/kM_R125_M_mal__L_c)*(M_coa_c/kM_R125_M_coa_c))/((1 + M_accoa_c/kM_R125_M_accoa_c)*(1 + M_glx_c/kM_R125_M_glx_c)*(1 + M_h2o_c/kM_R125_M_h2o_c) + (1 + M_h_c/kM_R125_M_h_c)*(1 + M_mal__L_c/kM_R125_M_mal__L_c)*(1 + M_coa_c/kM_R125_M_coa_c) - 1);
    u_R125 = NaN; kC_R125 = 38.43; kEQ_R125 = 3260000; kM_R125_M_h_c = 0.6132; kM_R125_M_accoa_c = 0.002711; kM_R125_M_mal__L_c = 0.6132; kM_R125_M_glx_c = 0.002493; kM_R125_M_h2o_c = 0.01631; kM_R125_M_coa_c = 0.6132;
  R_NADTRHD: M_nad_c + M_nadph_c => M_nadp_c + M_nadh_c; u_R126*(kC_R126*sqrt(kEQ_R126*kM_R126_M_nad_c*kM_R126_M_nadph_c/kM_R126_M_nadp_c/kM_R126_M_nadh_c)*(M_nad_c/kM_R126_M_nad_c)*(M_nadph_c/kM_R126_M_nadph_c) - kC_R126/sqrt(kEQ_R126*kM_R126_M_nad_c*kM_R126_M_nadph_c/kM_R126_M_nadp_c/kM_R126_M_nadh_c)*(M_nadp_c/kM_R126_M_nadp_c)*(M_nadh_c/kM_R126_M_nadh_c))/((1 + M_nad_c/kM_R126_M_nad_c)*(1 + M_nadph_c/kM_R126_M_nadph_c) + (1 + M_nadp_c/kM_R126_M_nadp_c)*(1 + M_nadh_c/kM_R126_M_nadh_c) - 1);
    u_R126 = NaN; kC_R126 = 14.63; kEQ_R126 = 1.01; kM_R126_M_nad_c = 0.08027; kM_R126_M_nadp_c = 0.1246; kM_R126_M_nadph_c = 0.08027; kM_R126_M_nadh_c = 0.1246;
  R_G3PD2: M_glyc3p_c + M_nadp_c -> M_dhap_c + M_h_c + M_nadph_c; u_R127*(kC_R127*sqrt(kEQ_R127*kM_R127_M_glyc3p_c*kM_R127_M_nadp_c/kM_R127_M_dhap_c/kM_R127_M_h_c/kM_R127_M_nadph_c)*(M_glyc3p_c/kM_R127_M_glyc3p_c)*(M_nadp_c/kM_R127_M_nadp_c) - kC_R127/sqrt(kEQ_R127*kM_R127_M_glyc3p_c*kM_R127_M_nadp_c/kM_R127_M_dhap_c/kM_R127_M_h_c/kM_R127_M_nadph_c)*(M_dhap_c/kM_R127_M_dhap_c)*(M_h_c/kM_R127_M_h_c)*(M_nadph_c/kM_R127_M_nadph_c))/((1 + M_glyc3p_c/kM_R127_M_glyc3p_c)*(1 + M_nadp_c/kM_R127_M_nadp_c) + (1 + M_dhap_c/kM_R127_M_dhap_c)*(1 + M_h_c/kM_R127_M_h_c)*(1 + M_nadph_c/kM_R127_M_nadph_c) - 1);
    u_R127 = NaN; kC_R127 = 58.35; kEQ_R127 = 0.0001066; kM_R127_M_dhap_c = 0.03368; kM_R127_M_h_c = 0.1254; kM_R127_M_glyc3p_c = 0.07974; kM_R127_M_nadp_c = 0.07974; kM_R127_M_nadph_c = 0.000314;
  R_GMPS2: M_atp_c + M_gln__L_c + M_xmp_c + M_h2o_c => 2 M_h_c + M_ppi_c + M_glu__L_c + M_gmp_c + M_amp_c; u_R128*(kC_R128*sqrt(kEQ_R128*kM_R128_M_atp_c*kM_R128_M_gln__L_c*kM_R128_M_xmp_c*kM_R128_M_h2o_c/kM_R128_M_h_c^2/kM_R128_M_ppi_c/kM_R128_M_glu__L_c/kM_R128_M_gmp_c/kM_R128_M_amp_c)*(M_atp_c/kM_R128_M_atp_c)*(M_gln__L_c/kM_R128_M_gln__L_c)*(M_xmp_c/kM_R128_M_xmp_c)*(M_h2o_c/kM_R128_M_h2o_c) - kC_R128/sqrt(kEQ_R128*kM_R128_M_atp_c*kM_R128_M_gln__L_c*kM_R128_M_xmp_c*kM_R128_M_h2o_c/kM_R128_M_h_c^2/kM_R128_M_ppi_c/kM_R128_M_glu__L_c/kM_R128_M_gmp_c/kM_R128_M_amp_c)*(M_h_c/kM_R128_M_h_c)^2*(M_ppi_c/kM_R128_M_ppi_c)*(M_glu__L_c/kM_R128_M_glu__L_c)*(M_gmp_c/kM_R128_M_gmp_c)*(M_amp_c/kM_R128_M_amp_c))/((1 + M_atp_c/kM_R128_M_atp_c)*(1 + M_gln__L_c/kM_R128_M_gln__L_c)*(1 + M_xmp_c/kM_R128_M_xmp_c)*(1 + M_h2o_c/kM_R128_M_h2o_c) + (1 + M_h_c/kM_R128_M_h_c)^2*(1 + M_ppi_c/kM_R128_M_ppi_c)*(1 + M_glu__L_c/kM_R128_M_glu__L_c)*(1 + M_gmp_c/kM_R128_M_gmp_c)*(1 + M_amp_c/kM_R128_M_amp_c) - 1);
    u_R128 = NaN; kC_R128 = 4.061; kEQ_R128 = 2.02; kM_R128_M_h_c = 0.08239; kM_R128_M_atp_c = 0.06572; kM_R128_M_ppi_c = 0.09077; kM_R128_M_glu__L_c = 0.09077; kM_R128_M_gln__L_c = 0.1102; kM_R128_M_xmp_c = 0.009478; kM_R128_M_gmp_c = 0.09077; kM_R128_M_h2o_c = 0.1102; kM_R128_M_amp_c = 0.09077;
  R_AACPS3: M_atp_c + M_hdca_c + M_ACP_c => M_ppi_c + M_amp_c + M_palmACP_c; u_R129*(kC_R129*sqrt(kEQ_R129*kM_R129_M_atp_c*kM_R129_M_hdca_c*kM_R129_M_ACP_c/kM_R129_M_ppi_c/kM_R129_M_amp_c/kM_R129_M_palmACP_c)*(M_atp_c/kM_R129_M_atp_c)*(M_hdca_c/kM_R129_M_hdca_c)*(M_ACP_c/kM_R129_M_ACP_c) - kC_R129/sqrt(kEQ_R129*kM_R129_M_atp_c*kM_R129_M_hdca_c*kM_R129_M_ACP_c/kM_R129_M_ppi_c/kM_R129_M_amp_c/kM_R129_M_palmACP_c)*(M_ppi_c/kM_R129_M_ppi_c)*(M_amp_c/kM_R129_M_amp_c)*(M_palmACP_c/kM_R129_M_palmACP_c))/((1 + M_atp_c/kM_R129_M_atp_c)*(1 + M_hdca_c/kM_R129_M_hdca_c)*(1 + M_ACP_c/kM_R129_M_ACP_c) + (1 + M_ppi_c/kM_R129_M_ppi_c)*(1 + M_amp_c/kM_R129_M_amp_c)*(1 + M_palmACP_c/kM_R129_M_palmACP_c) - 1);
    u_R129 = NaN; kC_R129 = 10; kEQ_R129 = 5553; kM_R129_M_atp_c = 0.03996; kM_R129_M_ppi_c = 0.2502; kM_R129_M_hdca_c = 0.03996; kM_R129_M_amp_c = 0.2502; kM_R129_M_ACP_c = 0.03996; kM_R129_M_palmACP_c = 0.2502;
  R_P5CR: 2 M_h_c + M_1pyr5c_c + M_nadph_c => M_nadp_c + M_pro__L_c; u_R130*(kC_R130*sqrt(kEQ_R130*kM_R130_M_h_c^2*kM_R130_M_1pyr5c_c*kM_R130_M_nadph_c/kM_R130_M_nadp_c/kM_R130_M_pro__L_c)*(M_h_c/kM_R130_M_h_c)^2*(M_1pyr5c_c/kM_R130_M_1pyr5c_c)*(M_nadph_c/kM_R130_M_nadph_c) - kC_R130/sqrt(kEQ_R130*kM_R130_M_h_c^2*kM_R130_M_1pyr5c_c*kM_R130_M_nadph_c/kM_R130_M_nadp_c/kM_R130_M_pro__L_c)*(M_nadp_c/kM_R130_M_nadp_c)*(M_pro__L_c/kM_R130_M_pro__L_c))/((1 + M_h_c/kM_R130_M_h_c)^2*(1 + M_1pyr5c_c/kM_R130_M_1pyr5c_c)*(1 + M_nadph_c/kM_R130_M_nadph_c) + (1 + M_nadp_c/kM_R130_M_nadp_c)*(1 + M_pro__L_c/kM_R130_M_pro__L_c) - 1);
    u_R130 = NaN; kC_R130 = 9.788; kEQ_R130 = 118.7; kM_R130_M_h_c = 0.2707; kM_R130_M_nadp_c = 0.06078; kM_R130_M_1pyr5c_c = 0.03361; kM_R130_M_nadph_c = 0.002548; kM_R130_M_pro__L_c = 0.06078;
  R_G5SADs: M_glu5sa_c => M_h_c + M_1pyr5c_c + M_h2o_c; u_R131*(kC_R131*sqrt(kEQ_R131*kM_R131_M_glu5sa_c/kM_R131_M_h_c/kM_R131_M_1pyr5c_c/kM_R131_M_h2o_c)*(M_glu5sa_c/kM_R131_M_glu5sa_c) - kC_R131/sqrt(kEQ_R131*kM_R131_M_glu5sa_c/kM_R131_M_h_c/kM_R131_M_1pyr5c_c/kM_R131_M_h2o_c)*(M_h_c/kM_R131_M_h_c)*(M_1pyr5c_c/kM_R131_M_1pyr5c_c)*(M_h2o_c/kM_R131_M_h2o_c))/(1 + M_glu5sa_c/kM_R131_M_glu5sa_c + (1 + M_h_c/kM_R131_M_h_c)*(1 + M_1pyr5c_c/kM_R131_M_1pyr5c_c)*(1 + M_h2o_c/kM_R131_M_h2o_c) - 1);
    u_R131 = NaN; kC_R131 = 10; kEQ_R131 = 391700; kM_R131_M_h_c = 1.062; kM_R131_M_glu5sa_c = 0.009416; kM_R131_M_1pyr5c_c = 1.062; kM_R131_M_h2o_c = 1.062;
  R_AKGDH: M_akg_c + M_nad_c + M_coa_c => M_nadh_c + M_co2_c + M_succoa_c; u_R132*(kC_R132*sqrt(kEQ_R132*kM_R132_M_akg_c*kM_R132_M_nad_c*kM_R132_M_coa_c/kM_R132_M_nadh_c/kM_R132_M_co2_c/kM_R132_M_succoa_c)*(M_akg_c/kM_R132_M_akg_c)*(M_nad_c/kM_R132_M_nad_c)*(M_coa_c/kM_R132_M_coa_c) - kC_R132/sqrt(kEQ_R132*kM_R132_M_akg_c*kM_R132_M_nad_c*kM_R132_M_coa_c/kM_R132_M_nadh_c/kM_R132_M_co2_c/kM_R132_M_succoa_c)*(M_nadh_c/kM_R132_M_nadh_c)*(M_co2_c/kM_R132_M_co2_c)*(M_succoa_c/kM_R132_M_succoa_c))/((1 + M_akg_c/kM_R132_M_akg_c)*(1 + M_nad_c/kM_R132_M_nad_c)*(1 + M_coa_c/kM_R132_M_coa_c) + (1 + M_nadh_c/kM_R132_M_nadh_c)*(1 + M_co2_c/kM_R132_M_co2_c)*(1 + M_succoa_c/kM_R132_M_succoa_c) - 1);
    u_R132 = NaN; kC_R132 = 38.38; kEQ_R132 = 20720; kM_R132_M_akg_c = 0.01891; kM_R132_M_nad_c = 0.01891; kM_R132_M_nadh_c = 0.5288; kM_R132_M_coa_c = 0.01891; kM_R132_M_co2_c = 0.5288; kM_R132_M_succoa_c = 0.5288;
  R_ATPPRT: M_atp_c + M_prpp_c => M_prbatp_c + M_ppi_c; u_R133*(kC_R133*sqrt(kEQ_R133*kM_R133_M_atp_c*kM_R133_M_prpp_c/kM_R133_M_prbatp_c/kM_R133_M_ppi_c)*(M_atp_c/kM_R133_M_atp_c)*(M_prpp_c/kM_R133_M_prpp_c) - kC_R133/sqrt(kEQ_R133*kM_R133_M_atp_c*kM_R133_M_prpp_c/kM_R133_M_prbatp_c/kM_R133_M_ppi_c)*(M_prbatp_c/kM_R133_M_prbatp_c)*(M_ppi_c/kM_R133_M_ppi_c))/((1 + M_atp_c/kM_R133_M_atp_c)*(1 + M_prpp_c/kM_R133_M_prpp_c) + (1 + M_prbatp_c/kM_R133_M_prbatp_c)*(1 + M_ppi_c/kM_R133_M_ppi_c) - 1);
    u_R133 = NaN; kC_R133 = 4.6; kEQ_R133 = 2.517; kM_R133_M_prbatp_c = 0.07252; kM_R133_M_atp_c = 0.1379; kM_R133_M_ppi_c = 0.07252; kM_R133_M_prpp_c = 0.1379;
  R_HISTD: 2 M_nad_c + M_h2o_c + M_histd_c => 3 M_h_c + M_his__L_c + 2 M_nadh_c; u_R134*(kC_R134*sqrt(kEQ_R134*kM_R134_M_nad_c^2*kM_R134_M_h2o_c*kM_R134_M_histd_c/kM_R134_M_h_c^3/kM_R134_M_his__L_c/kM_R134_M_nadh_c^2)*(M_nad_c/kM_R134_M_nad_c)^2*(M_h2o_c/kM_R134_M_h2o_c)*(M_histd_c/kM_R134_M_histd_c) - kC_R134/sqrt(kEQ_R134*kM_R134_M_nad_c^2*kM_R134_M_h2o_c*kM_R134_M_histd_c/kM_R134_M_h_c^3/kM_R134_M_his__L_c/kM_R134_M_nadh_c^2)*(M_h_c/kM_R134_M_h_c)^3*(M_his__L_c/kM_R134_M_his__L_c)*(M_nadh_c/kM_R134_M_nadh_c)^2)/((1 + M_nad_c/kM_R134_M_nad_c)^2*(1 + M_h2o_c/kM_R134_M_h2o_c)*(1 + M_histd_c/kM_R134_M_histd_c) + (1 + M_h_c/kM_R134_M_h_c)^3*(1 + M_his__L_c/kM_R134_M_his__L_c)*(1 + M_nadh_c/kM_R134_M_nadh_c)^2 - 1);
    u_R134 = NaN; kC_R134 = 6.66; kEQ_R134 = 635.3; kM_R134_M_h_c = 0.1783; kM_R134_M_nad_c = 0.2542; kM_R134_M_h2o_c = 0.05608; kM_R134_M_histd_c = 0.05608; kM_R134_M_his__L_c = 0.1783; kM_R134_M_nadh_c = 0.3179;
  R_DHDPS: M_aspsa_c + M_pyr_c => M_h_c + 2 M_h2o_c + M_23dhdp_c; u_R135*(kC_R135*sqrt(kEQ_R135*kM_R135_M_aspsa_c*kM_R135_M_pyr_c/kM_R135_M_h_c/kM_R135_M_h2o_c^2/kM_R135_M_23dhdp_c)*(M_aspsa_c/kM_R135_M_aspsa_c)*(M_pyr_c/kM_R135_M_pyr_c) - kC_R135/sqrt(kEQ_R135*kM_R135_M_aspsa_c*kM_R135_M_pyr_c/kM_R135_M_h_c/kM_R135_M_h2o_c^2/kM_R135_M_23dhdp_c)*(M_h_c/kM_R135_M_h_c)*(M_h2o_c/kM_R135_M_h2o_c)^2*(M_23dhdp_c/kM_R135_M_23dhdp_c))/((1 + M_aspsa_c/kM_R135_M_aspsa_c)*(1 + M_pyr_c/kM_R135_M_pyr_c) + (1 + M_h_c/kM_R135_M_h_c)*(1 + M_h2o_c/kM_R135_M_h2o_c)^2*(1 + M_23dhdp_c/kM_R135_M_23dhdp_c) - 1);
    u_R135 = NaN; kC_R135 = 10; kEQ_R135 = 0.9617; kM_R135_M_h_c = 0.1493; kM_R135_M_aspsa_c = 0.067; kM_R135_M_h2o_c = 0.2228; kM_R135_M_pyr_c = 0.067; kM_R135_M_23dhdp_c = 0.1493;
  R_IGPDH: M_eig3p_c => M_imacp_c + M_h2o_c; u_R136*(kC_R136*sqrt(kEQ_R136*kM_R136_M_eig3p_c/kM_R136_M_imacp_c/kM_R136_M_h2o_c)*(M_eig3p_c/kM_R136_M_eig3p_c) - kC_R136/sqrt(kEQ_R136*kM_R136_M_eig3p_c/kM_R136_M_imacp_c/kM_R136_M_h2o_c)*(M_imacp_c/kM_R136_M_imacp_c)*(M_h2o_c/kM_R136_M_h2o_c))/(1 + M_eig3p_c/kM_R136_M_eig3p_c + (1 + M_imacp_c/kM_R136_M_imacp_c)*(1 + M_h2o_c/kM_R136_M_h2o_c) - 1);
    u_R136 = NaN; kC_R136 = 32.8; kEQ_R136 = 8981000; kM_R136_M_eig3p_c = 0.002598; kM_R136_M_imacp_c = 3.849; kM_R136_M_h2o_c = 3.849;
  R_PRPPS: M_r5p_c + M_atp_c -> M_h_c + M_prpp_c + M_amp_c; u_R137*(kC_R137*sqrt(kEQ_R137*kM_R137_M_r5p_c*kM_R137_M_atp_c/kM_R137_M_h_c/kM_R137_M_prpp_c/kM_R137_M_amp_c)*(M_r5p_c/kM_R137_M_r5p_c)*(M_atp_c/kM_R137_M_atp_c) - kC_R137/sqrt(kEQ_R137*kM_R137_M_r5p_c*kM_R137_M_atp_c/kM_R137_M_h_c/kM_R137_M_prpp_c/kM_R137_M_amp_c)*(M_h_c/kM_R137_M_h_c)*(M_prpp_c/kM_R137_M_prpp_c)*(M_amp_c/kM_R137_M_amp_c))/((1 + M_r5p_c/kM_R137_M_r5p_c)*(1 + M_atp_c/kM_R137_M_atp_c) + (1 + M_h_c/kM_R137_M_h_c)*(1 + M_prpp_c/kM_R137_M_prpp_c)*(1 + M_amp_c/kM_R137_M_amp_c) - 1);
    u_R137 = NaN; kC_R137 = 10; kEQ_R137 = 17.4; kM_R137_M_r5p_c = 0.05411; kM_R137_M_h_c = 0.1848; kM_R137_M_atp_c = 0.05411; kM_R137_M_prpp_c = 0.1848; kM_R137_M_amp_c = 0.1848;
  R_PRATPP: M_prbatp_c + M_h2o_c => M_prbamp_c + M_h_c + M_ppi_c; u_R138*(kC_R138*sqrt(kEQ_R138*kM_R138_M_prbatp_c*kM_R138_M_h2o_c/kM_R138_M_prbamp_c/kM_R138_M_h_c/kM_R138_M_ppi_c)*(M_prbatp_c/kM_R138_M_prbatp_c)*(M_h2o_c/kM_R138_M_h2o_c) - kC_R138/sqrt(kEQ_R138*kM_R138_M_prbatp_c*kM_R138_M_h2o_c/kM_R138_M_prbamp_c/kM_R138_M_h_c/kM_R138_M_ppi_c)*(M_prbamp_c/kM_R138_M_prbamp_c)*(M_h_c/kM_R138_M_h_c)*(M_ppi_c/kM_R138_M_ppi_c))/((1 + M_prbatp_c/kM_R138_M_prbatp_c)*(1 + M_h2o_c/kM_R138_M_h2o_c) + (1 + M_prbamp_c/kM_R138_M_prbamp_c)*(1 + M_h_c/kM_R138_M_h_c)*(1 + M_ppi_c/kM_R138_M_ppi_c) - 1);
    u_R138 = NaN; kC_R138 = 10.37; kEQ_R138 = 1.423; kM_R138_M_prbatp_c = 0.07159; kM_R138_M_prbamp_c = 0.1397; kM_R138_M_h_c = 0.1397; kM_R138_M_ppi_c = 0.1397; kM_R138_M_h2o_c = 0.07159;
  R_GLUN: M_gln__L_c + M_h2o_c => M_nh4_c + M_glu__L_c; u_R139*(kC_R139*sqrt(kEQ_R139*kM_R139_M_gln__L_c*kM_R139_M_h2o_c/kM_R139_M_nh4_c/kM_R139_M_glu__L_c)*(M_gln__L_c/kM_R139_M_gln__L_c)*(M_h2o_c/kM_R139_M_h2o_c) - kC_R139/sqrt(kEQ_R139*kM_R139_M_gln__L_c*kM_R139_M_h2o_c/kM_R139_M_nh4_c/kM_R139_M_glu__L_c)*(M_nh4_c/kM_R139_M_nh4_c)*(M_glu__L_c/kM_R139_M_glu__L_c))/((1 + M_gln__L_c/kM_R139_M_gln__L_c)*(1 + M_h2o_c/kM_R139_M_h2o_c) + (1 + M_nh4_c/kM_R139_M_nh4_c)*(1 + M_glu__L_c/kM_R139_M_glu__L_c) - 1);
    u_R139 = NaN; kC_R139 = 9.72; kEQ_R139 = 173.6; kM_R139_M_nh4_c = 0.07757; kM_R139_M_glu__L_c = 0.2286; kM_R139_M_gln__L_c = 0.04375; kM_R139_M_h2o_c = 0.04375;
  R_PRMICI: M_prfp_c -> M_prlp_c; u_R140*(kC_R140*sqrt(kEQ_R140*kM_R140_M_prfp_c/kM_R140_M_prlp_c)*(M_prfp_c/kM_R140_M_prfp_c) - kC_R140/sqrt(kEQ_R140*kM_R140_M_prfp_c/kM_R140_M_prlp_c)*(M_prlp_c/kM_R140_M_prlp_c))/(1 + M_prfp_c/kM_R140_M_prfp_c + 1 + M_prlp_c/kM_R140_M_prlp_c - 1);
    u_R140 = NaN; kC_R140 = 4.915; kEQ_R140 = 40.62; kM_R140_M_prlp_c = 207.3; kM_R140_M_prfp_c = 1.315;
  R_GLUPRT: M_gln__L_c + M_h2o_c + M_prpp_c => M_ppi_c + M_glu__L_c + M_pram_c; u_R141*(kC_R141*sqrt(kEQ_R141*kM_R141_M_gln__L_c*kM_R141_M_h2o_c*kM_R141_M_prpp_c/kM_R141_M_ppi_c/kM_R141_M_glu__L_c/kM_R141_M_pram_c)*(M_gln__L_c/kM_R141_M_gln__L_c)*(M_h2o_c/kM_R141_M_h2o_c)*(M_prpp_c/kM_R141_M_prpp_c) - kC_R141/sqrt(kEQ_R141*kM_R141_M_gln__L_c*kM_R141_M_h2o_c*kM_R141_M_prpp_c/kM_R141_M_ppi_c/kM_R141_M_glu__L_c/kM_R141_M_pram_c)*(M_ppi_c/kM_R141_M_ppi_c)*(M_glu__L_c/kM_R141_M_glu__L_c)*(M_pram_c/kM_R141_M_pram_c))/((1 + M_gln__L_c/kM_R141_M_gln__L_c)*(1 + M_h2o_c/kM_R141_M_h2o_c)*(1 + M_prpp_c/kM_R141_M_prpp_c) + (1 + M_ppi_c/kM_R141_M_ppi_c)*(1 + M_glu__L_c/kM_R141_M_glu__L_c)*(1 + M_pram_c/kM_R141_M_pram_c) - 1);
    u_R141 = NaN; kC_R141 = 11.62; kEQ_R141 = 9.71; kM_R141_M_ppi_c = 0.09863; kM_R141_M_glu__L_c = 0.09863; kM_R141_M_gln__L_c = 0.1014; kM_R141_M_h2o_c = 0.1014; kM_R141_M_prpp_c = 0.004838; kM_R141_M_pram_c = 0.09863;
  R_SERAT: M_ser__L_c + M_accoa_c -> M_acser_c + M_coa_c; u_R142*(kC_R142*sqrt(kEQ_R142*kM_R142_M_ser__L_c*kM_R142_M_accoa_c/kM_R142_M_acser_c/kM_R142_M_coa_c)*(M_ser__L_c/kM_R142_M_ser__L_c)*(M_accoa_c/kM_R142_M_accoa_c) - kC_R142/sqrt(kEQ_R142*kM_R142_M_ser__L_c*kM_R142_M_accoa_c/kM_R142_M_acser_c/kM_R142_M_coa_c)*(M_acser_c/kM_R142_M_acser_c)*(M_coa_c/kM_R142_M_coa_c))/((1 + M_ser__L_c/kM_R142_M_ser__L_c)*(1 + M_accoa_c/kM_R142_M_accoa_c) + (1 + M_acser_c/kM_R142_M_acser_c)*(1 + M_coa_c/kM_R142_M_coa_c) - 1);
    u_R142 = NaN; kC_R142 = 8.122; kEQ_R142 = 7.577; kM_R142_M_ser__L_c = 0.02156; kM_R142_M_accoa_c = 0.2419; kM_R142_M_acser_c = 0.4638; kM_R142_M_coa_c = 0.4638;
  R_CYSS: M_h2s_c + M_acser_c => M_ac_c + M_h_c + M_cys__L_c; u_R143*(kC_R143*sqrt(kEQ_R143*kM_R143_M_h2s_c*kM_R143_M_acser_c/kM_R143_M_ac_c/kM_R143_M_h_c/kM_R143_M_cys__L_c)*(M_h2s_c/kM_R143_M_h2s_c)*(M_acser_c/kM_R143_M_acser_c) - kC_R143/sqrt(kEQ_R143*kM_R143_M_h2s_c*kM_R143_M_acser_c/kM_R143_M_ac_c/kM_R143_M_h_c/kM_R143_M_cys__L_c)*(M_ac_c/kM_R143_M_ac_c)*(M_h_c/kM_R143_M_h_c)*(M_cys__L_c/kM_R143_M_cys__L_c))/((1 + M_h2s_c/kM_R143_M_h2s_c)*(1 + M_acser_c/kM_R143_M_acser_c) + (1 + M_ac_c/kM_R143_M_ac_c)*(1 + M_h_c/kM_R143_M_h_c)*(1 + M_cys__L_c/kM_R143_M_cys__L_c) - 1);
    u_R143 = NaN; kC_R143 = 11.75; kEQ_R143 = 1.015; kM_R143_M_ac_c = 0.143; kM_R143_M_h_c = 0.143; kM_R143_M_cys__L_c = 0.143; kM_R143_M_h2s_c = 0.06994; kM_R143_M_acser_c = 0.06994;
  R_BPNT: M_pap_c + M_h2o_c => M_pi_c + M_amp_c; u_R144*(kC_R144*sqrt(kEQ_R144*kM_R144_M_pap_c*kM_R144_M_h2o_c/kM_R144_M_pi_c/kM_R144_M_amp_c)*(M_pap_c/kM_R144_M_pap_c)*(M_h2o_c/kM_R144_M_h2o_c) - kC_R144/sqrt(kEQ_R144*kM_R144_M_pap_c*kM_R144_M_h2o_c/kM_R144_M_pi_c/kM_R144_M_amp_c)*(M_pi_c/kM_R144_M_pi_c)*(M_amp_c/kM_R144_M_amp_c))/((1 + M_pap_c/kM_R144_M_pap_c)*(1 + M_h2o_c/kM_R144_M_h2o_c) + (1 + M_pi_c/kM_R144_M_pi_c)*(1 + M_amp_c/kM_R144_M_amp_c) - 1);
    u_R144 = NaN; kC_R144 = 37.14; kEQ_R144 = 11.9; kM_R144_M_pi_c = 0.3188; kM_R144_M_pap_c = 0.05304; kM_R144_M_h2o_c = 0.03137; kM_R144_M_amp_c = 0.3188;
  R_PAPSR: M_paps_c + M_trdrd_c => 2 M_h_c + M_so3_c + M_trdox_c + M_pap_c; u_R145*(kC_R145*sqrt(kEQ_R145*kM_R145_M_paps_c*kM_R145_M_trdrd_c/kM_R145_M_h_c^2/kM_R145_M_so3_c/kM_R145_M_trdox_c/kM_R145_M_pap_c)*(M_paps_c/kM_R145_M_paps_c)*(M_trdrd_c/kM_R145_M_trdrd_c) - kC_R145/sqrt(kEQ_R145*kM_R145_M_paps_c*kM_R145_M_trdrd_c/kM_R145_M_h_c^2/kM_R145_M_so3_c/kM_R145_M_trdox_c/kM_R145_M_pap_c)*(M_h_c/kM_R145_M_h_c)^2*(M_so3_c/kM_R145_M_so3_c)*(M_trdox_c/kM_R145_M_trdox_c)*(M_pap_c/kM_R145_M_pap_c))/((1 + M_paps_c/kM_R145_M_paps_c)*(1 + M_trdrd_c/kM_R145_M_trdrd_c) + (1 + M_h_c/kM_R145_M_h_c)^2*(1 + M_so3_c/kM_R145_M_so3_c)*(1 + M_trdox_c/kM_R145_M_trdox_c)*(1 + M_pap_c/kM_R145_M_pap_c) - 1);
    u_R145 = NaN; kC_R145 = 23.92; kEQ_R145 = 2584000; kM_R145_M_h_c = 3.864; kM_R145_M_so3_c = 0.6216; kM_R145_M_trdox_c = 0.6216; kM_R145_M_paps_c = 0.001057; kM_R145_M_pap_c = 0.6216; kM_R145_M_trdrd_c = 0.01609;
  R_ASPK: M_asp__L_c + M_atp_c -> M_adp_c + M_4pasp_c; u_R146*(kC_R146*sqrt(kEQ_R146*kM_R146_M_asp__L_c*kM_R146_M_atp_c/kM_R146_M_adp_c/kM_R146_M_4pasp_c)*(M_asp__L_c/kM_R146_M_asp__L_c)*(M_atp_c/kM_R146_M_atp_c) - kC_R146/sqrt(kEQ_R146*kM_R146_M_asp__L_c*kM_R146_M_atp_c/kM_R146_M_adp_c/kM_R146_M_4pasp_c)*(M_adp_c/kM_R146_M_adp_c)*(M_4pasp_c/kM_R146_M_4pasp_c))/((1 + M_asp__L_c/kM_R146_M_asp__L_c)*(1 + M_atp_c/kM_R146_M_atp_c) + (1 + M_adp_c/kM_R146_M_adp_c)*(1 + M_4pasp_c/kM_R146_M_4pasp_c) - 1);
    u_R146 = NaN; kC_R146 = 3.633; kEQ_R146 = 0.0001427; kM_R146_M_asp__L_c = 1.401; kM_R146_M_adp_c = 0.06857; kM_R146_M_atp_c = 2.52; kM_R146_M_4pasp_c = 0.06857;
  R_ASAD: M_aspsa_c + M_pi_c + M_nadp_c -> M_h_c + M_nadph_c + M_4pasp_c; u_R147*(kC_R147*sqrt(kEQ_R147*kM_R147_M_aspsa_c*kM_R147_M_pi_c*kM_R147_M_nadp_c/kM_R147_M_h_c/kM_R147_M_nadph_c/kM_R147_M_4pasp_c)*(M_aspsa_c/kM_R147_M_aspsa_c)*(M_pi_c/kM_R147_M_pi_c)*(M_nadp_c/kM_R147_M_nadp_c) - kC_R147/sqrt(kEQ_R147*kM_R147_M_aspsa_c*kM_R147_M_pi_c*kM_R147_M_nadp_c/kM_R147_M_h_c/kM_R147_M_nadph_c/kM_R147_M_4pasp_c)*(M_h_c/kM_R147_M_h_c)*(M_nadph_c/kM_R147_M_nadph_c)*(M_4pasp_c/kM_R147_M_4pasp_c))/((1 + M_aspsa_c/kM_R147_M_aspsa_c)*(1 + M_pi_c/kM_R147_M_pi_c)*(1 + M_nadp_c/kM_R147_M_nadp_c) + (1 + M_h_c/kM_R147_M_h_c)*(1 + M_nadph_c/kM_R147_M_nadph_c)*(1 + M_4pasp_c/kM_R147_M_4pasp_c) - 1);
    u_R147 = NaN; kC_R147 = 4.632; kEQ_R147 = 11670; kM_R147_M_h_c = 1.124; kM_R147_M_aspsa_c = 0.03361; kM_R147_M_pi_c = 5.83; kM_R147_M_nadp_c = 0.008184; kM_R147_M_nadph_c = 1.124; kM_R147_M_4pasp_c = 1.124;
  R_DAPDC: M_h_c + M_26dap__M_c => M_lys__L_c + M_co2_c; u_R148*(kC_R148*sqrt(kEQ_R148*kM_R148_M_h_c*kM_R148_M_26dap__M_c/kM_R148_M_lys__L_c/kM_R148_M_co2_c)*(M_h_c/kM_R148_M_h_c)*(M_26dap__M_c/kM_R148_M_26dap__M_c) - kC_R148/sqrt(kEQ_R148*kM_R148_M_h_c*kM_R148_M_26dap__M_c/kM_R148_M_lys__L_c/kM_R148_M_co2_c)*(M_lys__L_c/kM_R148_M_lys__L_c)*(M_co2_c/kM_R148_M_co2_c))/((1 + M_h_c/kM_R148_M_h_c)*(1 + M_26dap__M_c/kM_R148_M_26dap__M_c) + (1 + M_lys__L_c/kM_R148_M_lys__L_c)*(1 + M_co2_c/kM_R148_M_co2_c) - 1);
    u_R148 = NaN; kC_R148 = 38.85; kEQ_R148 = 201.3; kM_R148_M_h_c = 0.02239; kM_R148_M_lys__L_c = 0.4466; kM_R148_M_26dap__M_c = 0.02239; kM_R148_M_co2_c = 0.4466;
  R_OCBT: M_cbp_c + M_orn_c -> M_citr__L_c + M_h_c + M_pi_c; u_R149*(kC_R149*sqrt(kEQ_R149*kM_R149_M_cbp_c*kM_R149_M_orn_c/kM_R149_M_citr__L_c/kM_R149_M_h_c/kM_R149_M_pi_c)*(M_cbp_c/kM_R149_M_cbp_c)*(M_orn_c/kM_R149_M_orn_c) - kC_R149/sqrt(kEQ_R149*kM_R149_M_cbp_c*kM_R149_M_orn_c/kM_R149_M_citr__L_c/kM_R149_M_h_c/kM_R149_M_pi_c)*(M_citr__L_c/kM_R149_M_citr__L_c)*(M_h_c/kM_R149_M_h_c)*(M_pi_c/kM_R149_M_pi_c))/((1 + M_cbp_c/kM_R149_M_cbp_c)*(1 + M_orn_c/kM_R149_M_orn_c) + (1 + M_citr__L_c/kM_R149_M_citr__L_c)*(1 + M_h_c/kM_R149_M_h_c)*(1 + M_pi_c/kM_R149_M_pi_c) - 1);
    u_R149 = NaN; kC_R149 = 4.212; kEQ_R149 = 71620; kM_R149_M_citr__L_c = 14.75; kM_R149_M_h_c = 14.75; kM_R149_M_pi_c = 14.75; kM_R149_M_cbp_c = 0.02833; kM_R149_M_orn_c = 0.4502;
  R_GARFT: M_10fthf_c + M_gar_c -> M_h_c + M_thf_c + M_fgam_c; u_R150*(kC_R150*sqrt(kEQ_R150*kM_R150_M_10fthf_c*kM_R150_M_gar_c/kM_R150_M_h_c/kM_R150_M_thf_c/kM_R150_M_fgam_c)*(M_10fthf_c/kM_R150_M_10fthf_c)*(M_gar_c/kM_R150_M_gar_c) - kC_R150/sqrt(kEQ_R150*kM_R150_M_10fthf_c*kM_R150_M_gar_c/kM_R150_M_h_c/kM_R150_M_thf_c/kM_R150_M_fgam_c)*(M_h_c/kM_R150_M_h_c)*(M_thf_c/kM_R150_M_thf_c)*(M_fgam_c/kM_R150_M_fgam_c))/((1 + M_10fthf_c/kM_R150_M_10fthf_c)*(1 + M_gar_c/kM_R150_M_gar_c) + (1 + M_h_c/kM_R150_M_h_c)*(1 + M_thf_c/kM_R150_M_thf_c)*(1 + M_fgam_c/kM_R150_M_fgam_c) - 1);
    u_R150 = NaN; kC_R150 = 24.58; kEQ_R150 = 0.2473; kM_R150_M_10fthf_c = 0.009473; kM_R150_M_h_c = 0.1362; kM_R150_M_thf_c = 0.1362; kM_R150_M_fgam_c = 0.04849; kM_R150_M_gar_c = 0.07343;
  R_PHETA1: M_akg_c + M_phe__L_c -> M_phpyr_c + M_glu__L_c; u_R151*(kC_R151*sqrt(kEQ_R151*kM_R151_M_akg_c*kM_R151_M_phe__L_c/kM_R151_M_phpyr_c/kM_R151_M_glu__L_c)*(M_akg_c/kM_R151_M_akg_c)*(M_phe__L_c/kM_R151_M_phe__L_c) - kC_R151/sqrt(kEQ_R151*kM_R151_M_akg_c*kM_R151_M_phe__L_c/kM_R151_M_phpyr_c/kM_R151_M_glu__L_c)*(M_phpyr_c/kM_R151_M_phpyr_c)*(M_glu__L_c/kM_R151_M_glu__L_c))/((1 + M_akg_c/kM_R151_M_akg_c)*(1 + M_phe__L_c/kM_R151_M_phe__L_c) + (1 + M_phpyr_c/kM_R151_M_phpyr_c)*(1 + M_glu__L_c/kM_R151_M_glu__L_c) - 1);
    u_R151 = NaN; kC_R151 = 4.022; kEQ_R151 = 0.7866; kM_R151_M_akg_c = 0.05671; kM_R151_M_phpyr_c = 0.006224; kM_R151_M_glu__L_c = 0.08117; kM_R151_M_phe__L_c = 0.05671;
  R_PPND: M_nad_c + M_pphn_c => M_34hpp_c + M_nadh_c + M_co2_c; u_R152*(kC_R152*sqrt(kEQ_R152*kM_R152_M_nad_c*kM_R152_M_pphn_c/kM_R152_M_34hpp_c/kM_R152_M_nadh_c/kM_R152_M_co2_c)*(M_nad_c/kM_R152_M_nad_c)*(M_pphn_c/kM_R152_M_pphn_c) - kC_R152/sqrt(kEQ_R152*kM_R152_M_nad_c*kM_R152_M_pphn_c/kM_R152_M_34hpp_c/kM_R152_M_nadh_c/kM_R152_M_co2_c)*(M_34hpp_c/kM_R152_M_34hpp_c)*(M_nadh_c/kM_R152_M_nadh_c)*(M_co2_c/kM_R152_M_co2_c))/((1 + M_nad_c/kM_R152_M_nad_c)*(1 + M_pphn_c/kM_R152_M_pphn_c) + (1 + M_34hpp_c/kM_R152_M_34hpp_c)*(1 + M_nadh_c/kM_R152_M_nadh_c)*(1 + M_co2_c/kM_R152_M_co2_c) - 1);
    u_R152 = NaN; kC_R152 = 28.53; kEQ_R152 = 10.15; kM_R152_M_34hpp_c = 0.4946; kM_R152_M_nad_c = 0.04142; kM_R152_M_pphn_c = 0.7656; kM_R152_M_nadh_c = 0.4946; kM_R152_M_co2_c = 0.4946;
  R_PRAMPC: M_prbamp_c + M_h2o_c => M_prfp_c; u_R153*(kC_R153*sqrt(kEQ_R153*kM_R153_M_prbamp_c*kM_R153_M_h2o_c/kM_R153_M_prfp_c)*(M_prbamp_c/kM_R153_M_prbamp_c)*(M_h2o_c/kM_R153_M_h2o_c) - kC_R153/sqrt(kEQ_R153*kM_R153_M_prbamp_c*kM_R153_M_h2o_c/kM_R153_M_prfp_c)*(M_prfp_c/kM_R153_M_prfp_c))/((1 + M_prbamp_c/kM_R153_M_prbamp_c)*(1 + M_h2o_c/kM_R153_M_h2o_c) + 1 + M_prfp_c/kM_R153_M_prfp_c - 1);
    u_R153 = NaN; kC_R153 = 6.679; kEQ_R153 = 2.396; kM_R153_M_prbamp_c = 0.1634; kM_R153_M_h2o_c = 0.1634; kM_R153_M_prfp_c = 0.06118;
  R_GLYCK2: M_atp_c + M_glyc__R_c => M_2pg_c + M_h_c + M_adp_c; u_R154*(kC_R154*sqrt(kEQ_R154*kM_R154_M_atp_c*kM_R154_M_glyc__R_c/kM_R154_M_2pg_c/kM_R154_M_h_c/kM_R154_M_adp_c)*(M_atp_c/kM_R154_M_atp_c)*(M_glyc__R_c/kM_R154_M_glyc__R_c) - kC_R154/sqrt(kEQ_R154*kM_R154_M_atp_c*kM_R154_M_glyc__R_c/kM_R154_M_2pg_c/kM_R154_M_h_c/kM_R154_M_adp_c)*(M_2pg_c/kM_R154_M_2pg_c)*(M_h_c/kM_R154_M_h_c)*(M_adp_c/kM_R154_M_adp_c))/((1 + M_atp_c/kM_R154_M_atp_c)*(1 + M_glyc__R_c/kM_R154_M_glyc__R_c) + (1 + M_2pg_c/kM_R154_M_2pg_c)*(1 + M_h_c/kM_R154_M_h_c)*(1 + M_adp_c/kM_R154_M_adp_c) - 1);
    u_R154 = NaN; kC_R154 = 6.974; kEQ_R154 = 74.26; kM_R154_M_2pg_c = 0.1831; kM_R154_M_h_c = 0.1831; kM_R154_M_adp_c = 0.1831; kM_R154_M_atp_c = 0.05463; kM_R154_M_glyc__R_c = 0.05463;
  R_ACOTA: M_akg_c + M_acorn_c -> M_acg5sa_c + M_glu__L_c; u_R155*(kC_R155*sqrt(kEQ_R155*kM_R155_M_akg_c*kM_R155_M_acorn_c/kM_R155_M_acg5sa_c/kM_R155_M_glu__L_c)*(M_akg_c/kM_R155_M_akg_c)*(M_acorn_c/kM_R155_M_acorn_c) - kC_R155/sqrt(kEQ_R155*kM_R155_M_akg_c*kM_R155_M_acorn_c/kM_R155_M_acg5sa_c/kM_R155_M_glu__L_c)*(M_acg5sa_c/kM_R155_M_acg5sa_c)*(M_glu__L_c/kM_R155_M_glu__L_c))/((1 + M_akg_c/kM_R155_M_akg_c)*(1 + M_acorn_c/kM_R155_M_acorn_c) + (1 + M_acg5sa_c/kM_R155_M_acg5sa_c)*(1 + M_glu__L_c/kM_R155_M_glu__L_c) - 1);
    u_R155 = NaN; kC_R155 = 6.634; kEQ_R155 = 2.052; kM_R155_M_akg_c = 0.06607; kM_R155_M_acg5sa_c = 0.1514; kM_R155_M_glu__L_c = 0.1514; kM_R155_M_acorn_c = 0.06607;
  R_SULR: 5 M_h_c + M_so3_c + 3 M_nadph_c => M_h2s_c + 3 M_nadp_c + 3 M_h2o_c; u_R156*(kC_R156*sqrt(kEQ_R156*kM_R156_M_h_c^5*kM_R156_M_so3_c*kM_R156_M_nadph_c^3/kM_R156_M_h2s_c/kM_R156_M_nadp_c^3/kM_R156_M_h2o_c^3)*(M_h_c/kM_R156_M_h_c)^5*(M_so3_c/kM_R156_M_so3_c)*(M_nadph_c/kM_R156_M_nadph_c)^3 - kC_R156/sqrt(kEQ_R156*kM_R156_M_h_c^5*kM_R156_M_so3_c*kM_R156_M_nadph_c^3/kM_R156_M_h2s_c/kM_R156_M_nadp_c^3/kM_R156_M_h2o_c^3)*(M_h2s_c/kM_R156_M_h2s_c)*(M_nadp_c/kM_R156_M_nadp_c)^3*(M_h2o_c/kM_R156_M_h2o_c)^3)/((1 + M_h_c/kM_R156_M_h_c)^5*(1 + M_so3_c/kM_R156_M_so3_c)*(1 + M_nadph_c/kM_R156_M_nadph_c)^3 + (1 + M_h2s_c/kM_R156_M_h2s_c)*(1 + M_nadp_c/kM_R156_M_nadp_c)^3*(1 + M_h2o_c/kM_R156_M_h2o_c)^3 - 1);
    u_R156 = NaN; kC_R156 = 2.433; kEQ_R156 = 4.875; kM_R156_M_h_c = 0.5552; kM_R156_M_so3_c = 0.0006658; kM_R156_M_h2s_c = 0.01801; kM_R156_M_nadp_c = 0.01801; kM_R156_M_h2o_c = 0.01801; kM_R156_M_nadph_c = 0.003882;
  R_PRAGSr: M_atp_c + M_gly_c + M_pram_c -> M_h_c + M_adp_c + M_pi_c + M_gar_c; u_R157*(kC_R157*sqrt(kEQ_R157*kM_R157_M_atp_c*kM_R157_M_gly_c*kM_R157_M_pram_c/kM_R157_M_h_c/kM_R157_M_adp_c/kM_R157_M_pi_c/kM_R157_M_gar_c)*(M_atp_c/kM_R157_M_atp_c)*(M_gly_c/kM_R157_M_gly_c)*(M_pram_c/kM_R157_M_pram_c) - kC_R157/sqrt(kEQ_R157*kM_R157_M_atp_c*kM_R157_M_gly_c*kM_R157_M_pram_c/kM_R157_M_h_c/kM_R157_M_adp_c/kM_R157_M_pi_c/kM_R157_M_gar_c)*(M_h_c/kM_R157_M_h_c)*(M_adp_c/kM_R157_M_adp_c)*(M_pi_c/kM_R157_M_pi_c)*(M_gar_c/kM_R157_M_gar_c))/((1 + M_atp_c/kM_R157_M_atp_c)*(1 + M_gly_c/kM_R157_M_gly_c)*(1 + M_pram_c/kM_R157_M_pram_c) + (1 + M_h_c/kM_R157_M_h_c)*(1 + M_adp_c/kM_R157_M_adp_c)*(1 + M_pi_c/kM_R157_M_pi_c)*(1 + M_gar_c/kM_R157_M_gar_c) - 1);
    u_R157 = NaN; kC_R157 = 5.059; kEQ_R157 = 32400; kM_R157_M_h_c = 0.6649; kM_R157_M_adp_c = 0.6649; kM_R157_M_pi_c = 0.6649; kM_R157_M_atp_c = 0.01504; kM_R157_M_gly_c = 0.01504; kM_R157_M_pram_c = 0.005847; kM_R157_M_gar_c = 0.6649;
  R_PRFGS: M_atp_c + M_gln__L_c + M_h2o_c + M_fgam_c => M_fpram_c + M_h_c + M_adp_c + M_pi_c + M_glu__L_c; u_R158*(kC_R158*sqrt(kEQ_R158*kM_R158_M_atp_c*kM_R158_M_gln__L_c*kM_R158_M_h2o_c*kM_R158_M_fgam_c/kM_R158_M_fpram_c/kM_R158_M_h_c/kM_R158_M_adp_c/kM_R158_M_pi_c/kM_R158_M_glu__L_c)*(M_atp_c/kM_R158_M_atp_c)*(M_gln__L_c/kM_R158_M_gln__L_c)*(M_h2o_c/kM_R158_M_h2o_c)*(M_fgam_c/kM_R158_M_fgam_c) - kC_R158/sqrt(kEQ_R158*kM_R158_M_atp_c*kM_R158_M_gln__L_c*kM_R158_M_h2o_c*kM_R158_M_fgam_c/kM_R158_M_fpram_c/kM_R158_M_h_c/kM_R158_M_adp_c/kM_R158_M_pi_c/kM_R158_M_glu__L_c)*(M_fpram_c/kM_R158_M_fpram_c)*(M_h_c/kM_R158_M_h_c)*(M_adp_c/kM_R158_M_adp_c)*(M_pi_c/kM_R158_M_pi_c)*(M_glu__L_c/kM_R158_M_glu__L_c))/((1 + M_atp_c/kM_R158_M_atp_c)*(1 + M_gln__L_c/kM_R158_M_gln__L_c)*(1 + M_h2o_c/kM_R158_M_h2o_c)*(1 + M_fgam_c/kM_R158_M_fgam_c) + (1 + M_fpram_c/kM_R158_M_fpram_c)*(1 + M_h_c/kM_R158_M_h_c)*(1 + M_adp_c/kM_R158_M_adp_c)*(1 + M_pi_c/kM_R158_M_pi_c)*(1 + M_glu__L_c/kM_R158_M_glu__L_c) - 1);
    u_R158 = NaN; kC_R158 = 10; kEQ_R158 = 6.997; kM_R158_M_fpram_c = 0.1409; kM_R158_M_h_c = 0.1409; kM_R158_M_adp_c = 0.1409; kM_R158_M_pi_c = 0.1409; kM_R158_M_atp_c = 0.07099; kM_R158_M_glu__L_c = 0.1409; kM_R158_M_gln__L_c = 0.07099; kM_R158_M_h2o_c = 0.07099; kM_R158_M_fgam_c = 0.07099;
  R_PSERT: M_glu__L_c + M_3php_c => M_akg_c + M_pser__L_c; u_R159*(kC_R159*sqrt(kEQ_R159*kM_R159_M_glu__L_c*kM_R159_M_3php_c/kM_R159_M_akg_c/kM_R159_M_pser__L_c)*(M_glu__L_c/kM_R159_M_glu__L_c)*(M_3php_c/kM_R159_M_3php_c) - kC_R159/sqrt(kEQ_R159*kM_R159_M_glu__L_c*kM_R159_M_3php_c/kM_R159_M_akg_c/kM_R159_M_pser__L_c)*(M_akg_c/kM_R159_M_akg_c)*(M_pser__L_c/kM_R159_M_pser__L_c))/((1 + M_glu__L_c/kM_R159_M_glu__L_c)*(1 + M_3php_c/kM_R159_M_3php_c) + (1 + M_akg_c/kM_R159_M_akg_c)*(1 + M_pser__L_c/kM_R159_M_pser__L_c) - 1);
    u_R159 = NaN; kC_R159 = 33.08; kEQ_R159 = 80.14; kM_R159_M_akg_c = 0.4254; kM_R159_M_glu__L_c = 0.02351; kM_R159_M_pser__L_c = 0.002684; kM_R159_M_3php_c = 0.0005151;
  R_AIRC2: M_air_c + M_atp_c + M_hco3_c => M_h_c + M_adp_c + M_pi_c + M_5caiz_c; u_R160*(kC_R160*sqrt(kEQ_R160*kM_R160_M_air_c*kM_R160_M_atp_c*kM_R160_M_hco3_c/kM_R160_M_h_c/kM_R160_M_adp_c/kM_R160_M_pi_c/kM_R160_M_5caiz_c)*(M_air_c/kM_R160_M_air_c)*(M_atp_c/kM_R160_M_atp_c)*(M_hco3_c/kM_R160_M_hco3_c) - kC_R160/sqrt(kEQ_R160*kM_R160_M_air_c*kM_R160_M_atp_c*kM_R160_M_hco3_c/kM_R160_M_h_c/kM_R160_M_adp_c/kM_R160_M_pi_c/kM_R160_M_5caiz_c)*(M_h_c/kM_R160_M_h_c)*(M_adp_c/kM_R160_M_adp_c)*(M_pi_c/kM_R160_M_pi_c)*(M_5caiz_c/kM_R160_M_5caiz_c))/((1 + M_air_c/kM_R160_M_air_c)*(1 + M_atp_c/kM_R160_M_atp_c)*(1 + M_hco3_c/kM_R160_M_hco3_c) + (1 + M_h_c/kM_R160_M_h_c)*(1 + M_adp_c/kM_R160_M_adp_c)*(1 + M_pi_c/kM_R160_M_pi_c)*(1 + M_5caiz_c/kM_R160_M_5caiz_c) - 1);
    u_R160 = NaN; kC_R160 = 10; kEQ_R160 = 6.164; kM_R160_M_h_c = 0.1486; kM_R160_M_adp_c = 0.1486; kM_R160_M_air_c = 0.06728; kM_R160_M_pi_c = 0.1486; kM_R160_M_atp_c = 0.06728; kM_R160_M_5caiz_c = 0.1486; kM_R160_M_hco3_c = 0.06728;
  R_GAPD: M_nad_c + M_g3p_c + M_pi_c -> M_13dpg_c + M_h_c + M_nadh_c; u_R161*(kC_R161*sqrt(kEQ_R161*kM_R161_M_nad_c*kM_R161_M_g3p_c*kM_R161_M_pi_c/kM_R161_M_13dpg_c/kM_R161_M_h_c/kM_R161_M_nadh_c)*(M_nad_c/kM_R161_M_nad_c)*(M_g3p_c/kM_R161_M_g3p_c)*(M_pi_c/kM_R161_M_pi_c) - kC_R161/sqrt(kEQ_R161*kM_R161_M_nad_c*kM_R161_M_g3p_c*kM_R161_M_pi_c/kM_R161_M_13dpg_c/kM_R161_M_h_c/kM_R161_M_nadh_c)*(M_13dpg_c/kM_R161_M_13dpg_c)*(M_h_c/kM_R161_M_h_c)*(M_nadh_c/kM_R161_M_nadh_c))/((1 + M_nad_c/kM_R161_M_nad_c)*(1 + M_g3p_c/kM_R161_M_g3p_c)*(1 + M_pi_c/kM_R161_M_pi_c) + (1 + M_13dpg_c/kM_R161_M_13dpg_c)*(1 + M_h_c/kM_R161_M_h_c)*(1 + M_nadh_c/kM_R161_M_nadh_c) - 1);
    u_R161 = NaN; kC_R161 = 32.02; kEQ_R161 = 0.597; kM_R161_M_13dpg_c = 0.1738; kM_R161_M_h_c = 0.1738; kM_R161_M_nad_c = 0.009962; kM_R161_M_g3p_c = 0.05753; kM_R161_M_pi_c = 13.41; kM_R161_M_nadh_c = 0.1738;
  R_GND: M_6pgc_c + M_nadp_c => M_ru5p__D_c + M_nadph_c + M_co2_c; u_R162*(kC_R162*sqrt(kEQ_R162*kM_R162_M_6pgc_c*kM_R162_M_nadp_c/kM_R162_M_ru5p__D_c/kM_R162_M_nadph_c/kM_R162_M_co2_c)*(M_6pgc_c/kM_R162_M_6pgc_c)*(M_nadp_c/kM_R162_M_nadp_c) - kC_R162/sqrt(kEQ_R162*kM_R162_M_6pgc_c*kM_R162_M_nadp_c/kM_R162_M_ru5p__D_c/kM_R162_M_nadph_c/kM_R162_M_co2_c)*(M_ru5p__D_c/kM_R162_M_ru5p__D_c)*(M_nadph_c/kM_R162_M_nadph_c)*(M_co2_c/kM_R162_M_co2_c))/((1 + M_6pgc_c/kM_R162_M_6pgc_c)*(1 + M_nadp_c/kM_R162_M_nadp_c) + (1 + M_ru5p__D_c/kM_R162_M_ru5p__D_c)*(1 + M_nadph_c/kM_R162_M_nadph_c)*(1 + M_co2_c/kM_R162_M_co2_c) - 1);
    u_R162 = NaN; kC_R162 = 10.73; kEQ_R162 = 0.01784; kM_R162_M_6pgc_c = 0.01416; kM_R162_M_ru5p__D_c = 0.03751; kM_R162_M_nadp_c = 0.005519; kM_R162_M_nadph_c = 0.03751; kM_R162_M_co2_c = 0.03751;
  R_G6PDH2r: M_nadp_c + M_g6p_c -> M_h_c + M_6pgl_c + M_nadph_c; u_R163*(kC_R163*sqrt(kEQ_R163*kM_R163_M_nadp_c*kM_R163_M_g6p_c/kM_R163_M_h_c/kM_R163_M_6pgl_c/kM_R163_M_nadph_c)*(M_nadp_c/kM_R163_M_nadp_c)*(M_g6p_c/kM_R163_M_g6p_c) - kC_R163/sqrt(kEQ_R163*kM_R163_M_nadp_c*kM_R163_M_g6p_c/kM_R163_M_h_c/kM_R163_M_6pgl_c/kM_R163_M_nadph_c)*(M_h_c/kM_R163_M_h_c)*(M_6pgl_c/kM_R163_M_6pgl_c)*(M_nadph_c/kM_R163_M_nadph_c))/((1 + M_nadp_c/kM_R163_M_nadp_c)*(1 + M_g6p_c/kM_R163_M_g6p_c) + (1 + M_h_c/kM_R163_M_h_c)*(1 + M_6pgl_c/kM_R163_M_6pgl_c)*(1 + M_nadph_c/kM_R163_M_nadph_c) - 1);
    u_R163 = NaN; kC_R163 = 27.34; kEQ_R163 = 15.44; kM_R163_M_h_c = 0.56; kM_R163_M_nadp_c = 0.01786; kM_R163_M_g6p_c = 0.01786; kM_R163_M_6pgl_c = 0.56; kM_R163_M_nadph_c = 0.56;
  R_ME2: M_mal__L_c + M_nadp_c => M_nadph_c + M_pyr_c + M_co2_c; u_R164*(kC_R164*sqrt(kEQ_R164*kM_R164_M_mal__L_c*kM_R164_M_nadp_c/kM_R164_M_nadph_c/kM_R164_M_pyr_c/kM_R164_M_co2_c)*(M_mal__L_c/kM_R164_M_mal__L_c)*(M_nadp_c/kM_R164_M_nadp_c) - kC_R164/sqrt(kEQ_R164*kM_R164_M_mal__L_c*kM_R164_M_nadp_c/kM_R164_M_nadph_c/kM_R164_M_pyr_c/kM_R164_M_co2_c)*(M_nadph_c/kM_R164_M_nadph_c)*(M_pyr_c/kM_R164_M_pyr_c)*(M_co2_c/kM_R164_M_co2_c))/((1 + M_mal__L_c/kM_R164_M_mal__L_c)*(1 + M_nadp_c/kM_R164_M_nadp_c) + (1 + M_nadph_c/kM_R164_M_nadph_c)*(1 + M_pyr_c/kM_R164_M_pyr_c)*(1 + M_co2_c/kM_R164_M_co2_c) - 1);
    u_R164 = NaN; kC_R164 = 10.28; kEQ_R164 = 0.009072; kM_R164_M_mal__L_c = 3.242; kM_R164_M_nadp_c = 0.003869; kM_R164_M_nadph_c = 0.07254; kM_R164_M_pyr_c = 0.07254; kM_R164_M_co2_c = 0.07254;
  R_ARGSL: M_argsuc_c -> M_arg__L_c + M_fum_c; u_R165*(kC_R165*sqrt(kEQ_R165*kM_R165_M_argsuc_c/kM_R165_M_arg__L_c/kM_R165_M_fum_c)*(M_argsuc_c/kM_R165_M_argsuc_c) - kC_R165/sqrt(kEQ_R165*kM_R165_M_argsuc_c/kM_R165_M_arg__L_c/kM_R165_M_fum_c)*(M_arg__L_c/kM_R165_M_arg__L_c)*(M_fum_c/kM_R165_M_fum_c))/(1 + M_argsuc_c/kM_R165_M_argsuc_c + (1 + M_arg__L_c/kM_R165_M_arg__L_c)*(1 + M_fum_c/kM_R165_M_fum_c) - 1);
    u_R165 = NaN; kC_R165 = 4.366; kEQ_R165 = 16.25; kM_R165_M_arg__L_c = 0.6301; kM_R165_M_argsuc_c = 0.01587; kM_R165_M_fum_c = 0.6301;
  R_CBPS: 2 M_atp_c + M_gln__L_c + M_hco3_c + M_h2o_c => 2 M_h_c + 2 M_adp_c + M_pi_c + M_glu__L_c + M_cbp_c; u_R166*(kC_R166*sqrt(kEQ_R166*kM_R166_M_atp_c^2*kM_R166_M_gln__L_c*kM_R166_M_hco3_c*kM_R166_M_h2o_c/kM_R166_M_h_c^2/kM_R166_M_adp_c^2/kM_R166_M_pi_c/kM_R166_M_glu__L_c/kM_R166_M_cbp_c)*(M_atp_c/kM_R166_M_atp_c)^2*(M_gln__L_c/kM_R166_M_gln__L_c)*(M_hco3_c/kM_R166_M_hco3_c)*(M_h2o_c/kM_R166_M_h2o_c) - kC_R166/sqrt(kEQ_R166*kM_R166_M_atp_c^2*kM_R166_M_gln__L_c*kM_R166_M_hco3_c*kM_R166_M_h2o_c/kM_R166_M_h_c^2/kM_R166_M_adp_c^2/kM_R166_M_pi_c/kM_R166_M_glu__L_c/kM_R166_M_cbp_c)*(M_h_c/kM_R166_M_h_c)^2*(M_adp_c/kM_R166_M_adp_c)^2*(M_pi_c/kM_R166_M_pi_c)*(M_glu__L_c/kM_R166_M_glu__L_c)*(M_cbp_c/kM_R166_M_cbp_c))/((1 + M_atp_c/kM_R166_M_atp_c)^2*(1 + M_gln__L_c/kM_R166_M_gln__L_c)*(1 + M_hco3_c/kM_R166_M_hco3_c)*(1 + M_h2o_c/kM_R166_M_h2o_c) + (1 + M_h_c/kM_R166_M_h_c)^2*(1 + M_adp_c/kM_R166_M_adp_c)^2*(1 + M_pi_c/kM_R166_M_pi_c)*(1 + M_glu__L_c/kM_R166_M_glu__L_c)*(1 + M_cbp_c/kM_R166_M_cbp_c) - 1);
    u_R166 = NaN; kC_R166 = 9.091; kEQ_R166 = 234.3; kM_R166_M_h_c = 1.624; kM_R166_M_adp_c = 0.05616; kM_R166_M_pi_c = 0.4029; kM_R166_M_atp_c = 0.2805; kM_R166_M_glu__L_c = 0.4029; kM_R166_M_cbp_c = 0.4029; kM_R166_M_gln__L_c = 0.02482; kM_R166_M_hco3_c = 8.2; kM_R166_M_h2o_c = 0.02482;
  R_GLU5K: M_atp_c + M_glu__L_c => M_adp_c + M_glu5p_c; u_R167*(kC_R167*sqrt(kEQ_R167*kM_R167_M_atp_c*kM_R167_M_glu__L_c/kM_R167_M_adp_c/kM_R167_M_glu5p_c)*(M_atp_c/kM_R167_M_atp_c)*(M_glu__L_c/kM_R167_M_glu__L_c) - kC_R167/sqrt(kEQ_R167*kM_R167_M_atp_c*kM_R167_M_glu__L_c/kM_R167_M_adp_c/kM_R167_M_glu5p_c)*(M_adp_c/kM_R167_M_adp_c)*(M_glu5p_c/kM_R167_M_glu5p_c))/((1 + M_atp_c/kM_R167_M_atp_c)*(1 + M_glu__L_c/kM_R167_M_glu__L_c) + (1 + M_adp_c/kM_R167_M_adp_c)*(1 + M_glu5p_c/kM_R167_M_glu5p_c) - 1);
    u_R167 = NaN; kC_R167 = 3.738; kEQ_R167 = 9.435e-6; kM_R167_M_adp_c = 0.01649; kM_R167_M_atp_c = 6.783; kM_R167_M_glu__L_c = 0.6065; kM_R167_M_glu5p_c = 0.01649;
  R_IPPS: M_accoa_c + M_3mob_c + M_h2o_c => M_h_c + M_3c3hmp_c + M_coa_c; u_R168*(kC_R168*sqrt(kEQ_R168*kM_R168_M_accoa_c*kM_R168_M_3mob_c*kM_R168_M_h2o_c/kM_R168_M_h_c/kM_R168_M_3c3hmp_c/kM_R168_M_coa_c)*(M_accoa_c/kM_R168_M_accoa_c)*(M_3mob_c/kM_R168_M_3mob_c)*(M_h2o_c/kM_R168_M_h2o_c) - kC_R168/sqrt(kEQ_R168*kM_R168_M_accoa_c*kM_R168_M_3mob_c*kM_R168_M_h2o_c/kM_R168_M_h_c/kM_R168_M_3c3hmp_c/kM_R168_M_coa_c)*(M_h_c/kM_R168_M_h_c)*(M_3c3hmp_c/kM_R168_M_3c3hmp_c)*(M_coa_c/kM_R168_M_coa_c))/((1 + M_accoa_c/kM_R168_M_accoa_c)*(1 + M_3mob_c/kM_R168_M_3mob_c)*(1 + M_h2o_c/kM_R168_M_h2o_c) + (1 + M_h_c/kM_R168_M_h_c)*(1 + M_3c3hmp_c/kM_R168_M_3c3hmp_c)*(1 + M_coa_c/kM_R168_M_coa_c) - 1);
    u_R168 = NaN; kC_R168 = 17.1; kEQ_R168 = 33250; kM_R168_M_h_c = 0.3859; kM_R168_M_accoa_c = 0.02591; kM_R168_M_3mob_c = 0.02591; kM_R168_M_3c3hmp_c = 0.3859; kM_R168_M_h2o_c = 0.02591; kM_R168_M_coa_c = 0.3859;
  R_ACOATA: M_accoa_c + M_ACP_c -> M_acACP_c + M_coa_c; u_R169*(kC_R169*sqrt(kEQ_R169*kM_R169_M_accoa_c*kM_R169_M_ACP_c/kM_R169_M_acACP_c/kM_R169_M_coa_c)*(M_accoa_c/kM_R169_M_accoa_c)*(M_ACP_c/kM_R169_M_ACP_c) - kC_R169/sqrt(kEQ_R169*kM_R169_M_accoa_c*kM_R169_M_ACP_c/kM_R169_M_acACP_c/kM_R169_M_coa_c)*(M_acACP_c/kM_R169_M_acACP_c)*(M_coa_c/kM_R169_M_coa_c))/((1 + M_accoa_c/kM_R169_M_accoa_c)*(1 + M_ACP_c/kM_R169_M_ACP_c) + (1 + M_acACP_c/kM_R169_M_acACP_c)*(1 + M_coa_c/kM_R169_M_coa_c) - 1);
    u_R169 = NaN; kC_R169 = 0.914; kEQ_R169 = 1.443; kM_R169_M_accoa_c = 0.004423; kM_R169_M_acACP_c = 0.04213; kM_R169_M_coa_c = 0.04213; kM_R169_M_ACP_c = 0.2374;
  R_ACtex: M_ac_e -> M_ac_p; u_R170*(kC_R170*sqrt(kEQ_R170*kM_R170_M_ac_e/kM_R170_M_ac_p)*(M_ac_e/kM_R170_M_ac_e) - kC_R170/sqrt(kEQ_R170*kM_R170_M_ac_e/kM_R170_M_ac_p)*(M_ac_p/kM_R170_M_ac_p))/(1 + M_ac_e/kM_R170_M_ac_e + 1 + M_ac_p/kM_R170_M_ac_p - 1);
    u_R170 = NaN; kC_R170 = 10; kEQ_R170 = 16.02; kM_R170_M_ac_e = 0.05983; kM_R170_M_ac_p = 0.1671;
  R_ACALDtex: M_acald_e -> M_acald_p; u_R171*(kC_R171*sqrt(kEQ_R171*kM_R171_M_acald_e/kM_R171_M_acald_p)*(M_acald_e/kM_R171_M_acald_e) - kC_R171/sqrt(kEQ_R171*kM_R171_M_acald_e/kM_R171_M_acald_p)*(M_acald_p/kM_R171_M_acald_p))/(1 + M_acald_e/kM_R171_M_acald_e + 1 + M_acald_p/kM_R171_M_acald_p - 1);
    u_R171 = NaN; kC_R171 = 10; kEQ_R171 = 5.082; kM_R171_M_acald_p = 0.1351; kM_R171_M_acald_e = 0.074;
  R_PSP_L: M_pser__L_c + M_h2o_c => M_ser__L_c + M_pi_c; u_R172*(kC_R172*sqrt(kEQ_R172*kM_R172_M_pser__L_c*kM_R172_M_h2o_c/kM_R172_M_ser__L_c/kM_R172_M_pi_c)*(M_pser__L_c/kM_R172_M_pser__L_c)*(M_h2o_c/kM_R172_M_h2o_c) - kC_R172/sqrt(kEQ_R172*kM_R172_M_pser__L_c*kM_R172_M_h2o_c/kM_R172_M_ser__L_c/kM_R172_M_pi_c)*(M_ser__L_c/kM_R172_M_ser__L_c)*(M_pi_c/kM_R172_M_pi_c))/((1 + M_pser__L_c/kM_R172_M_pser__L_c)*(1 + M_h2o_c/kM_R172_M_h2o_c) + (1 + M_ser__L_c/kM_R172_M_ser__L_c)*(1 + M_pi_c/kM_R172_M_pi_c) - 1);
    u_R172 = NaN; kC_R172 = 211.3; kEQ_R172 = 65.09; kM_R172_M_ser__L_c = 1.014; kM_R172_M_pi_c = 1.014; kM_R172_M_pser__L_c = 0.009862; kM_R172_M_h2o_c = 0.009862;
  R_ADSK: M_atp_c + M_aps_c => M_h_c + M_adp_c + M_paps_c; u_R173*(kC_R173*sqrt(kEQ_R173*kM_R173_M_atp_c*kM_R173_M_aps_c/kM_R173_M_h_c/kM_R173_M_adp_c/kM_R173_M_paps_c)*(M_atp_c/kM_R173_M_atp_c)*(M_aps_c/kM_R173_M_aps_c) - kC_R173/sqrt(kEQ_R173*kM_R173_M_atp_c*kM_R173_M_aps_c/kM_R173_M_h_c/kM_R173_M_adp_c/kM_R173_M_paps_c)*(M_h_c/kM_R173_M_h_c)*(M_adp_c/kM_R173_M_adp_c)*(M_paps_c/kM_R173_M_paps_c))/((1 + M_atp_c/kM_R173_M_atp_c)*(1 + M_aps_c/kM_R173_M_aps_c) + (1 + M_h_c/kM_R173_M_h_c)*(1 + M_adp_c/kM_R173_M_adp_c)*(1 + M_paps_c/kM_R173_M_paps_c) - 1);
    u_R173 = NaN; kC_R173 = 12.46; kEQ_R173 = 284.3; kM_R173_M_h_c = 0.04268; kM_R173_M_adp_c = 0.04268; kM_R173_M_atp_c = 0.0006799; kM_R173_M_paps_c = 0.1189; kM_R173_M_aps_c = 2.436e-5;
  R_SUCCt2_2pp: 2 M_h_p + M_succ_p => 2 M_h_c + M_succ_c; u_R174*(kC_R174*sqrt(kEQ_R174*kM_R174_M_h_p^2*kM_R174_M_succ_p/kM_R174_M_h_c^2/kM_R174_M_succ_c)*(M_h_p/kM_R174_M_h_p)^2*(M_succ_p/kM_R174_M_succ_p) - kC_R174/sqrt(kEQ_R174*kM_R174_M_h_p^2*kM_R174_M_succ_p/kM_R174_M_h_c^2/kM_R174_M_succ_c)*(M_h_c/kM_R174_M_h_c)^2*(M_succ_c/kM_R174_M_succ_c))/((1 + M_h_p/kM_R174_M_h_p)^2*(1 + M_succ_p/kM_R174_M_succ_p) + (1 + M_h_c/kM_R174_M_h_c)^2*(1 + M_succ_c/kM_R174_M_succ_c) - 1);
    u_R174 = NaN; kC_R174 = 10; kEQ_R174 = 2.485; kM_R174_M_h_c = 0.1146; kM_R174_M_h_p = 0.08729; kM_R174_M_succ_p = 0.09343; kM_R174_M_succ_c = 0.107;
  R_HSDy: M_hom__L_c + M_nadp_c -> M_h_c + M_aspsa_c + M_nadph_c; u_R175*(kC_R175*sqrt(kEQ_R175*kM_R175_M_hom__L_c*kM_R175_M_nadp_c/kM_R175_M_h_c/kM_R175_M_aspsa_c/kM_R175_M_nadph_c)*(M_hom__L_c/kM_R175_M_hom__L_c)*(M_nadp_c/kM_R175_M_nadp_c) - kC_R175/sqrt(kEQ_R175*kM_R175_M_hom__L_c*kM_R175_M_nadp_c/kM_R175_M_h_c/kM_R175_M_aspsa_c/kM_R175_M_nadph_c)*(M_h_c/kM_R175_M_h_c)*(M_aspsa_c/kM_R175_M_aspsa_c)*(M_nadph_c/kM_R175_M_nadph_c))/((1 + M_hom__L_c/kM_R175_M_hom__L_c)*(1 + M_nadp_c/kM_R175_M_nadp_c) + (1 + M_h_c/kM_R175_M_h_c)*(1 + M_aspsa_c/kM_R175_M_aspsa_c)*(1 + M_nadph_c/kM_R175_M_nadph_c) - 1);
    u_R175 = NaN; kC_R175 = 3.156; kEQ_R175 = 0.0003863; kM_R175_M_h_c = 0.006893; kM_R175_M_aspsa_c = 0.02427; kM_R175_M_hom__L_c = 1.451; kM_R175_M_nadp_c = 0.01284; kM_R175_M_nadph_c = 0.007883;
  R_CYSTL: M_cyst__L_c + M_h2o_c => M_nh4_c + M_pyr_c + M_hcys__L_c; u_R176*(kC_R176*sqrt(kEQ_R176*kM_R176_M_cyst__L_c*kM_R176_M_h2o_c/kM_R176_M_nh4_c/kM_R176_M_pyr_c/kM_R176_M_hcys__L_c)*(M_cyst__L_c/kM_R176_M_cyst__L_c)*(M_h2o_c/kM_R176_M_h2o_c) - kC_R176/sqrt(kEQ_R176*kM_R176_M_cyst__L_c*kM_R176_M_h2o_c/kM_R176_M_nh4_c/kM_R176_M_pyr_c/kM_R176_M_hcys__L_c)*(M_nh4_c/kM_R176_M_nh4_c)*(M_pyr_c/kM_R176_M_pyr_c)*(M_hcys__L_c/kM_R176_M_hcys__L_c))/((1 + M_cyst__L_c/kM_R176_M_cyst__L_c)*(1 + M_h2o_c/kM_R176_M_h2o_c) + (1 + M_nh4_c/kM_R176_M_nh4_c)*(1 + M_pyr_c/kM_R176_M_pyr_c)*(1 + M_hcys__L_c/kM_R176_M_hcys__L_c) - 1);
    u_R176 = NaN; kC_R176 = 7.46; kEQ_R176 = 0.5589; kM_R176_M_cyst__L_c = 0.0945; kM_R176_M_nh4_c = 0.1058; kM_R176_M_h2o_c = 0.0945; kM_R176_M_pyr_c = 0.1058; kM_R176_M_hcys__L_c = 0.1058;
  R_SHSL1: M_cys__L_c + M_suchms_c => M_h_c + M_cyst__L_c + M_succ_c; u_R177*(kC_R177*sqrt(kEQ_R177*kM_R177_M_cys__L_c*kM_R177_M_suchms_c/kM_R177_M_h_c/kM_R177_M_cyst__L_c/kM_R177_M_succ_c)*(M_cys__L_c/kM_R177_M_cys__L_c)*(M_suchms_c/kM_R177_M_suchms_c) - kC_R177/sqrt(kEQ_R177*kM_R177_M_cys__L_c*kM_R177_M_suchms_c/kM_R177_M_h_c/kM_R177_M_cyst__L_c/kM_R177_M_succ_c)*(M_h_c/kM_R177_M_h_c)*(M_cyst__L_c/kM_R177_M_cyst__L_c)*(M_succ_c/kM_R177_M_succ_c))/((1 + M_cys__L_c/kM_R177_M_cys__L_c)*(1 + M_suchms_c/kM_R177_M_suchms_c) + (1 + M_h_c/kM_R177_M_h_c)*(1 + M_cyst__L_c/kM_R177_M_cyst__L_c)*(1 + M_succ_c/kM_R177_M_succ_c) - 1);
    u_R177 = NaN; kC_R177 = 13.11; kEQ_R177 = 0.5433; kM_R177_M_h_c = 0.2733; kM_R177_M_cyst__L_c = 0.2733; kM_R177_M_cys__L_c = 0.03659; kM_R177_M_suchms_c = 9.918; kM_R177_M_succ_c = 0.2733;
  R_SULabcpp: M_atp_c + M_h2o_c + M_so4_p => M_h_c + M_adp_c + M_pi_c + M_so4_c; u_R178*(kC_R178*sqrt(kEQ_R178*kM_R178_M_atp_c*kM_R178_M_h2o_c*kM_R178_M_so4_p/kM_R178_M_h_c/kM_R178_M_adp_c/kM_R178_M_pi_c/kM_R178_M_so4_c)*(M_atp_c/kM_R178_M_atp_c)*(M_h2o_c/kM_R178_M_h2o_c)*(M_so4_p/kM_R178_M_so4_p) - kC_R178/sqrt(kEQ_R178*kM_R178_M_atp_c*kM_R178_M_h2o_c*kM_R178_M_so4_p/kM_R178_M_h_c/kM_R178_M_adp_c/kM_R178_M_pi_c/kM_R178_M_so4_c)*(M_h_c/kM_R178_M_h_c)*(M_adp_c/kM_R178_M_adp_c)*(M_pi_c/kM_R178_M_pi_c)*(M_so4_c/kM_R178_M_so4_c))/((1 + M_atp_c/kM_R178_M_atp_c)*(1 + M_h2o_c/kM_R178_M_h2o_c)*(1 + M_so4_p/kM_R178_M_so4_p) + (1 + M_h_c/kM_R178_M_h_c)*(1 + M_adp_c/kM_R178_M_adp_c)*(1 + M_pi_c/kM_R178_M_pi_c)*(1 + M_so4_c/kM_R178_M_so4_c) - 1);
    u_R178 = NaN; kC_R178 = 10; kEQ_R178 = 264.3; kM_R178_M_h_c = 0.2133; kM_R178_M_adp_c = 0.2133; kM_R178_M_pi_c = 0.2133; kM_R178_M_atp_c = 0.04687; kM_R178_M_h2o_c = 0.04687; kM_R178_M_so4_c = 0.2133; kM_R178_M_so4_p = 0.04687;
  R_GLUtex: M_glu__L_e -> M_glu__L_p; u_R179*(kC_R179*sqrt(kEQ_R179*kM_R179_M_glu__L_e/kM_R179_M_glu__L_p)*(M_glu__L_e/kM_R179_M_glu__L_e) - kC_R179/sqrt(kEQ_R179*kM_R179_M_glu__L_e/kM_R179_M_glu__L_p)*(M_glu__L_p/kM_R179_M_glu__L_p))/(1 + M_glu__L_e/kM_R179_M_glu__L_e + 1 + M_glu__L_p/kM_R179_M_glu__L_p - 1);
    u_R179 = NaN; kC_R179 = 10; kEQ_R179 = 38.63; kM_R179_M_glu__L_e = 0.05083; kM_R179_M_glu__L_p = 0.1967;
  R_AKGt2rpp: M_h_p + M_akg_p -> M_akg_c + M_h_c; u_R180*(kC_R180*sqrt(kEQ_R180*kM_R180_M_h_p*kM_R180_M_akg_p/kM_R180_M_akg_c/kM_R180_M_h_c)*(M_h_p/kM_R180_M_h_p)*(M_akg_p/kM_R180_M_akg_p) - kC_R180/sqrt(kEQ_R180*kM_R180_M_h_p*kM_R180_M_akg_p/kM_R180_M_akg_c/kM_R180_M_h_c)*(M_akg_c/kM_R180_M_akg_c)*(M_h_c/kM_R180_M_h_c))/((1 + M_h_p/kM_R180_M_h_p)*(1 + M_akg_p/kM_R180_M_akg_p) + (1 + M_akg_c/kM_R180_M_akg_c)*(1 + M_h_c/kM_R180_M_h_c) - 1);
    u_R180 = NaN; kC_R180 = 10; kEQ_R180 = 0.3319; kM_R180_M_akg_c = 0.08615; kM_R180_M_h_c = 0.08615; kM_R180_M_h_p = 0.1161; kM_R180_M_akg_p = 0.1161;
  R_XYLt2pp: M_h_p + M_xyl__D_p => M_h_c + M_xyl__D_c; u_R181*(kC_R181*sqrt(kEQ_R181*kM_R181_M_h_p*kM_R181_M_xyl__D_p/kM_R181_M_h_c/kM_R181_M_xyl__D_c)*(M_h_p/kM_R181_M_h_p)*(M_xyl__D_p/kM_R181_M_xyl__D_p) - kC_R181/sqrt(kEQ_R181*kM_R181_M_h_p*kM_R181_M_xyl__D_p/kM_R181_M_h_c/kM_R181_M_xyl__D_c)*(M_h_c/kM_R181_M_h_c)*(M_xyl__D_c/kM_R181_M_xyl__D_c))/((1 + M_h_p/kM_R181_M_h_p)*(1 + M_xyl__D_p/kM_R181_M_xyl__D_p) + (1 + M_h_c/kM_R181_M_h_c)*(1 + M_xyl__D_c/kM_R181_M_xyl__D_c) - 1);
    u_R181 = NaN; kC_R181 = 10; kEQ_R181 = 0.001065; kM_R181_M_h_c = 0.03966; kM_R181_M_h_p = 0.2522; kM_R181_M_xyl__D_p = 0.2522; kM_R181_M_xyl__D_c = 0.03966;
  R_GLYCtex: M_glyc_e -> M_glyc_p; u_R182*(kC_R182*sqrt(kEQ_R182*kM_R182_M_glyc_e/kM_R182_M_glyc_p)*(M_glyc_e/kM_R182_M_glyc_e) - kC_R182/sqrt(kEQ_R182*kM_R182_M_glyc_e/kM_R182_M_glyc_p)*(M_glyc_p/kM_R182_M_glyc_p))/(1 + M_glyc_e/kM_R182_M_glyc_e + 1 + M_glyc_p/kM_R182_M_glyc_p - 1);
    u_R182 = NaN; kC_R182 = 10; kEQ_R182 = 0.179; kM_R182_M_glyc_p = 0.07272; kM_R182_M_glyc_e = 0.1375;
  R_Htex: M_h_e -> M_h_p; u_R183*(kC_R183*sqrt(kEQ_R183*kM_R183_M_h_e/kM_R183_M_h_p)*(M_h_e/kM_R183_M_h_e) - kC_R183/sqrt(kEQ_R183*kM_R183_M_h_e/kM_R183_M_h_p)*(M_h_p/kM_R183_M_h_p))/(1 + M_h_e/kM_R183_M_h_e + 1 + M_h_p/kM_R183_M_h_p - 1);
    u_R183 = NaN; kC_R183 = 10; kEQ_R183 = 1323; kM_R183_M_h_p = 0.3785; kM_R183_M_h_e = 0.02642;
  R_H2Otex: M_h2o_e -> M_h2o_p; u_R184*(kC_R184*sqrt(kEQ_R184*kM_R184_M_h2o_e/kM_R184_M_h2o_p)*(M_h2o_e/kM_R184_M_h2o_e) - kC_R184/sqrt(kEQ_R184*kM_R184_M_h2o_e/kM_R184_M_h2o_p)*(M_h2o_p/kM_R184_M_h2o_p))/(1 + M_h2o_e/kM_R184_M_h2o_e + 1 + M_h2o_p/kM_R184_M_h2o_p - 1);
    u_R184 = NaN; kC_R184 = 10; kEQ_R184 = 0.3852; kM_R184_M_h2o_p = 0.0838; kM_R184_M_h2o_e = 0.1193;
  R_O2tpp: M_o2_p -> M_o2_c; u_R185*(kC_R185*sqrt(kEQ_R185*kM_R185_M_o2_p/kM_R185_M_o2_c)*(M_o2_p/kM_R185_M_o2_p) - kC_R185/sqrt(kEQ_R185*kM_R185_M_o2_p/kM_R185_M_o2_c)*(M_o2_c/kM_R185_M_o2_c))/(1 + M_o2_p/kM_R185_M_o2_p + 1 + M_o2_c/kM_R185_M_o2_c - 1);
    u_R185 = NaN; kC_R185 = 10; kEQ_R185 = 5.659; kM_R185_M_o2_c = 0.1378; kM_R185_M_o2_p = 0.07254;
  R_PYRt2rpp: M_pyr_p + M_h_p -> M_h_c + M_pyr_c; u_R186*(kC_R186*sqrt(kEQ_R186*kM_R186_M_pyr_p*kM_R186_M_h_p/kM_R186_M_h_c/kM_R186_M_pyr_c)*(M_pyr_p/kM_R186_M_pyr_p)*(M_h_p/kM_R186_M_h_p) - kC_R186/sqrt(kEQ_R186*kM_R186_M_pyr_p*kM_R186_M_h_p/kM_R186_M_h_c/kM_R186_M_pyr_c)*(M_h_c/kM_R186_M_h_c)*(M_pyr_c/kM_R186_M_pyr_c))/((1 + M_pyr_p/kM_R186_M_pyr_p)*(1 + M_h_p/kM_R186_M_h_p) + (1 + M_h_c/kM_R186_M_h_c)*(1 + M_pyr_c/kM_R186_M_pyr_c) - 1);
    u_R186 = NaN; kC_R186 = 10; kEQ_R186 = 1.853; kM_R186_M_h_c = 0.1087; kM_R186_M_pyr_p = 0.092; kM_R186_M_h_p = 0.092; kM_R186_M_pyr_c = 0.1087;
  R_THD2pp: M_h_p + M_nadp_c + M_nadh_c => M_h_c + M_nad_c + M_nadph_c; u_R187*(kC_R187*sqrt(kEQ_R187*kM_R187_M_h_p*kM_R187_M_nadp_c*kM_R187_M_nadh_c/kM_R187_M_h_c/kM_R187_M_nad_c/kM_R187_M_nadph_c)*(M_h_p/kM_R187_M_h_p)*(M_nadp_c/kM_R187_M_nadp_c)*(M_nadh_c/kM_R187_M_nadh_c) - kC_R187/sqrt(kEQ_R187*kM_R187_M_h_p*kM_R187_M_nadp_c*kM_R187_M_nadh_c/kM_R187_M_h_c/kM_R187_M_nad_c/kM_R187_M_nadph_c)*(M_h_c/kM_R187_M_h_c)*(M_nad_c/kM_R187_M_nad_c)*(M_nadph_c/kM_R187_M_nadph_c))/((1 + M_h_p/kM_R187_M_h_p)*(1 + M_nadp_c/kM_R187_M_nadp_c)*(1 + M_nadh_c/kM_R187_M_nadh_c) + (1 + M_h_c/kM_R187_M_h_c)*(1 + M_nad_c/kM_R187_M_nad_c)*(1 + M_nadph_c/kM_R187_M_nadph_c) - 1);
    u_R187 = NaN; kC_R187 = 10; kEQ_R187 = 2.998; kM_R187_M_h_c = 0.1124; kM_R187_M_h_p = 0.08898; kM_R187_M_nad_c = 0.1124; kM_R187_M_nadp_c = 0.08898; kM_R187_M_nadph_c = 0.1124; kM_R187_M_nadh_c = 0.08898;
  R_TKT2: M_xu5p__D_c + M_e4p_c -> M_g3p_c + M_f6p_c; u_R188*(kC_R188*sqrt(kEQ_R188*kM_R188_M_xu5p__D_c*kM_R188_M_e4p_c/kM_R188_M_g3p_c/kM_R188_M_f6p_c)*(M_xu5p__D_c/kM_R188_M_xu5p__D_c)*(M_e4p_c/kM_R188_M_e4p_c) - kC_R188/sqrt(kEQ_R188*kM_R188_M_xu5p__D_c*kM_R188_M_e4p_c/kM_R188_M_g3p_c/kM_R188_M_f6p_c)*(M_g3p_c/kM_R188_M_g3p_c)*(M_f6p_c/kM_R188_M_f6p_c))/((1 + M_xu5p__D_c/kM_R188_M_xu5p__D_c)*(1 + M_e4p_c/kM_R188_M_e4p_c) + (1 + M_g3p_c/kM_R188_M_g3p_c)*(1 + M_f6p_c/kM_R188_M_f6p_c) - 1);
    u_R188 = NaN; kC_R188 = 5.794; kEQ_R188 = 45.09; kM_R188_M_xu5p__D_c = 0.02741; kM_R188_M_g3p_c = 1.865; kM_R188_M_e4p_c = 0.01057; kM_R188_M_f6p_c = 0.197;
  R_ATPS4rpp: 4 M_h_p + M_adp_c + M_pi_c -> 3 M_h_c + M_atp_c + M_h2o_c; u_R189*(kC_R189*sqrt(kEQ_R189*kM_R189_M_h_p^4*kM_R189_M_adp_c*kM_R189_M_pi_c/kM_R189_M_h_c^3/kM_R189_M_atp_c/kM_R189_M_h2o_c)*(M_h_p/kM_R189_M_h_p)^4*(M_adp_c/kM_R189_M_adp_c)*(M_pi_c/kM_R189_M_pi_c) - kC_R189/sqrt(kEQ_R189*kM_R189_M_h_p^4*kM_R189_M_adp_c*kM_R189_M_pi_c/kM_R189_M_h_c^3/kM_R189_M_atp_c/kM_R189_M_h2o_c)*(M_h_c/kM_R189_M_h_c)^3*(M_atp_c/kM_R189_M_atp_c)*(M_h2o_c/kM_R189_M_h2o_c))/((1 + M_h_p/kM_R189_M_h_p)^4*(1 + M_adp_c/kM_R189_M_adp_c)*(1 + M_pi_c/kM_R189_M_pi_c) + (1 + M_h_c/kM_R189_M_h_c)^3*(1 + M_atp_c/kM_R189_M_atp_c)*(1 + M_h2o_c/kM_R189_M_h2o_c) - 1);
    u_R189 = NaN; kC_R189 = 10; kEQ_R189 = 75.02; kM_R189_M_h_c = 0.1583; kM_R189_M_h_p = 0.06317; kM_R189_M_adp_c = 0.06317; kM_R189_M_pi_c = 0.06317; kM_R189_M_atp_c = 0.1583; kM_R189_M_h2o_c = 0.1583;
  R_CO2tpp: M_co2_p -> M_co2_c; u_R190*(kC_R190*sqrt(kEQ_R190*kM_R190_M_co2_p/kM_R190_M_co2_c)*(M_co2_p/kM_R190_M_co2_p) - kC_R190/sqrt(kEQ_R190*kM_R190_M_co2_p/kM_R190_M_co2_c)*(M_co2_c/kM_R190_M_co2_c))/(1 + M_co2_p/kM_R190_M_co2_p + 1 + M_co2_c/kM_R190_M_co2_c - 1);
    u_R190 = NaN; kC_R190 = 10; kEQ_R190 = 146.1; kM_R190_M_co2_p = 0.03973; kM_R190_M_co2_c = 0.2517;
  R_GK1: M_atp_c + M_gmp_c -> M_adp_c + M_gdp_c; u_R191*(kC_R191*sqrt(kEQ_R191*kM_R191_M_atp_c*kM_R191_M_gmp_c/kM_R191_M_adp_c/kM_R191_M_gdp_c)*(M_atp_c/kM_R191_M_atp_c)*(M_gmp_c/kM_R191_M_gmp_c) - kC_R191/sqrt(kEQ_R191*kM_R191_M_atp_c*kM_R191_M_gmp_c/kM_R191_M_adp_c/kM_R191_M_gdp_c)*(M_adp_c/kM_R191_M_adp_c)*(M_gdp_c/kM_R191_M_gdp_c))/((1 + M_atp_c/kM_R191_M_atp_c)*(1 + M_gmp_c/kM_R191_M_gmp_c) + (1 + M_adp_c/kM_R191_M_adp_c)*(1 + M_gdp_c/kM_R191_M_gdp_c) - 1);
    u_R191 = NaN; kC_R191 = 10.4; kEQ_R191 = 0.8875; kM_R191_M_adp_c = 0.181; kM_R191_M_atp_c = 0.05526; kM_R191_M_gdp_c = 0.181; kM_R191_M_gmp_c = 0.05526;
  R_GLCNtex: M_glcn_e -> M_glcn_p; u_R192*(kC_R192*sqrt(kEQ_R192*kM_R192_M_glcn_e/kM_R192_M_glcn_p)*(M_glcn_e/kM_R192_M_glcn_e) - kC_R192/sqrt(kEQ_R192*kM_R192_M_glcn_e/kM_R192_M_glcn_p)*(M_glcn_p/kM_R192_M_glcn_p))/(1 + M_glcn_e/kM_R192_M_glcn_e + 1 + M_glcn_p/kM_R192_M_glcn_p - 1);
    u_R192 = NaN; kC_R192 = 10; kEQ_R192 = 0.01592; kM_R192_M_glcn_p = 0.04645; kM_R192_M_glcn_e = 0.2153;
  R_GLNtex: M_gln__L_e -> M_gln__L_p; u_R193*(kC_R193*sqrt(kEQ_R193*kM_R193_M_gln__L_e/kM_R193_M_gln__L_p)*(M_gln__L_e/kM_R193_M_gln__L_e) - kC_R193/sqrt(kEQ_R193*kM_R193_M_gln__L_e/kM_R193_M_gln__L_p)*(M_gln__L_p/kM_R193_M_gln__L_p))/(1 + M_gln__L_e/kM_R193_M_gln__L_e + 1 + M_gln__L_p/kM_R193_M_gln__L_p - 1);
    u_R193 = NaN; kC_R193 = 10; kEQ_R193 = 195.6; kM_R193_M_gln__L_e = 0.03764; kM_R193_M_gln__L_p = 0.2657;
  R_O2tex: M_o2_e -> M_o2_p; u_R194*(kC_R194*sqrt(kEQ_R194*kM_R194_M_o2_e/kM_R194_M_o2_p)*(M_o2_e/kM_R194_M_o2_e) - kC_R194/sqrt(kEQ_R194*kM_R194_M_o2_e/kM_R194_M_o2_p)*(M_o2_p/kM_R194_M_o2_p))/(1 + M_o2_e/kM_R194_M_o2_e + 1 + M_o2_p/kM_R194_M_o2_p - 1);
    u_R194 = NaN; kC_R194 = 10; kEQ_R194 = 5.651; kM_R194_M_o2_p = 0.1378; kM_R194_M_o2_e = 0.07256;
  R_D_LACtex: M_lac__D_e -> M_lac__D_p; u_R195*(kC_R195*sqrt(kEQ_R195*kM_R195_M_lac__D_e/kM_R195_M_lac__D_p)*(M_lac__D_e/kM_R195_M_lac__D_e) - kC_R195/sqrt(kEQ_R195*kM_R195_M_lac__D_e/kM_R195_M_lac__D_p)*(M_lac__D_p/kM_R195_M_lac__D_p))/(1 + M_lac__D_e/kM_R195_M_lac__D_e + 1 + M_lac__D_p/kM_R195_M_lac__D_p - 1);
    u_R195 = NaN; kC_R195 = 10; kEQ_R195 = 46.97; kM_R195_M_lac__D_e = 0.04902; kM_R195_M_lac__D_p = 0.204;
  R_GLCtex_copy1: M_glc__D_e => M_glc__D_p; u_R196*(kC_R196*sqrt(kEQ_R196*kM_R196_M_glc__D_e/kM_R196_M_glc__D_p)*(M_glc__D_e/kM_R196_M_glc__D_e) - kC_R196/sqrt(kEQ_R196*kM_R196_M_glc__D_e/kM_R196_M_glc__D_p)*(M_glc__D_p/kM_R196_M_glc__D_p))/(1 + M_glc__D_e/kM_R196_M_glc__D_e + 1 + M_glc__D_p/kM_R196_M_glc__D_p - 1);
    u_R196 = NaN; kC_R196 = 10; kEQ_R196 = 11.52; kM_R196_M_glc__D_e = 0.06359; kM_R196_M_glc__D_p = 0.1573;
  R_FUMt2_2pp: M_fum_p + 2 M_h_p => 2 M_h_c + M_fum_c; u_R197*(kC_R197*sqrt(kEQ_R197*kM_R197_M_fum_p*kM_R197_M_h_p^2/kM_R197_M_h_c^2/kM_R197_M_fum_c)*(M_fum_p/kM_R197_M_fum_p)*(M_h_p/kM_R197_M_h_p)^2 - kC_R197/sqrt(kEQ_R197*kM_R197_M_fum_p*kM_R197_M_h_p^2/kM_R197_M_h_c^2/kM_R197_M_fum_c)*(M_h_c/kM_R197_M_h_c)^2*(M_fum_c/kM_R197_M_fum_c))/((1 + M_fum_p/kM_R197_M_fum_p)*(1 + M_h_p/kM_R197_M_h_p)^2 + (1 + M_h_c/kM_R197_M_h_c)^2*(1 + M_fum_c/kM_R197_M_fum_c) - 1);
    u_R197 = NaN; kC_R197 = 10; kEQ_R197 = 40.38; kM_R197_M_fum_p = 0.07588; kM_R197_M_h_c = 0.1737; kM_R197_M_h_p = 0.05758; kM_R197_M_fum_c = 0.1318;
  R_PItex: M_pi_e -> M_pi_p; u_R198*(kC_R198*sqrt(kEQ_R198*kM_R198_M_pi_e/kM_R198_M_pi_p)*(M_pi_e/kM_R198_M_pi_e) - kC_R198/sqrt(kEQ_R198*kM_R198_M_pi_e/kM_R198_M_pi_p)*(M_pi_p/kM_R198_M_pi_p))/(1 + M_pi_e/kM_R198_M_pi_e + 1 + M_pi_p/kM_R198_M_pi_p - 1);
    u_R198 = NaN; kC_R198 = 10; kEQ_R198 = 155.2; kM_R198_M_pi_e = 0.03929; kM_R198_M_pi_p = 0.2545;
  R_CYTBDpp: 2 M_h_c + 0.5 M_o2_c + M_q8h2_c => 2 M_h_p + M_h2o_c + M_q8_c; u_R199*(kC_R199*sqrt(kEQ_R199*kM_R199_M_h_c^2*kM_R199_M_o2_c^5e-1*kM_R199_M_q8h2_c/kM_R199_M_h_p^2/kM_R199_M_h2o_c/kM_R199_M_q8_c)*(M_h_c/kM_R199_M_h_c)^2*(M_o2_c/kM_R199_M_o2_c)^5e-1*(M_q8h2_c/kM_R199_M_q8h2_c) - kC_R199/sqrt(kEQ_R199*kM_R199_M_h_c^2*kM_R199_M_o2_c^5e-1*kM_R199_M_q8h2_c/kM_R199_M_h_p^2/kM_R199_M_h2o_c/kM_R199_M_q8_c)*(M_h_p/kM_R199_M_h_p)^2*(M_h2o_c/kM_R199_M_h2o_c)*(M_q8_c/kM_R199_M_q8_c))/((1 + M_h_c/kM_R199_M_h_c)^2*(1 + M_o2_c/kM_R199_M_o2_c)^5e-1*(1 + M_q8h2_c/kM_R199_M_q8h2_c) + (1 + M_h_p/kM_R199_M_h_p)^2*(1 + M_h2o_c/kM_R199_M_h2o_c)*(1 + M_q8_c/kM_R199_M_q8_c) - 1);
    u_R199 = NaN; kC_R199 = 10; kEQ_R199 = 1.337; kM_R199_M_h_c = 0.0963; kM_R199_M_o2_c = 0.09813; kM_R199_M_h_p = 0.1038; kM_R199_M_q8h2_c = 0.09813; kM_R199_M_h2o_c = 0.1019; kM_R199_M_q8_c = 0.1019;
  R_CYTBD2pp: 2 M_h_c + 0.5 M_o2_c + M_mql8_c => 2 M_h_p + M_h2o_c + M_mqn8_c; u_R200*(kC_R200*sqrt(kEQ_R200*kM_R200_M_h_c^2*kM_R200_M_o2_c^5e-1*kM_R200_M_mql8_c/kM_R200_M_h_p^2/kM_R200_M_h2o_c/kM_R200_M_mqn8_c)*(M_h_c/kM_R200_M_h_c)^2*(M_o2_c/kM_R200_M_o2_c)^5e-1*(M_mql8_c/kM_R200_M_mql8_c) - kC_R200/sqrt(kEQ_R200*kM_R200_M_h_c^2*kM_R200_M_o2_c^5e-1*kM_R200_M_mql8_c/kM_R200_M_h_p^2/kM_R200_M_h2o_c/kM_R200_M_mqn8_c)*(M_h_p/kM_R200_M_h_p)^2*(M_h2o_c/kM_R200_M_h2o_c)*(M_mqn8_c/kM_R200_M_mqn8_c))/((1 + M_h_c/kM_R200_M_h_c)^2*(1 + M_o2_c/kM_R200_M_o2_c)^5e-1*(1 + M_mql8_c/kM_R200_M_mql8_c) + (1 + M_h_p/kM_R200_M_h_p)^2*(1 + M_h2o_c/kM_R200_M_h2o_c)*(1 + M_mqn8_c/kM_R200_M_mqn8_c) - 1);
    u_R200 = NaN; kC_R200 = 10; kEQ_R200 = 1.168; kM_R200_M_h_c = 0.09801; kM_R200_M_o2_c = 0.099; kM_R200_M_h_p = 0.102; kM_R200_M_h2o_c = 0.101; kM_R200_M_mql8_c = 0.099; kM_R200_M_mqn8_c = 0.101;
  R_ACALDtpp: M_acald_p -> M_acald_c; u_R201*(kC_R201*sqrt(kEQ_R201*kM_R201_M_acald_p/kM_R201_M_acald_c)*(M_acald_p/kM_R201_M_acald_p) - kC_R201/sqrt(kEQ_R201*kM_R201_M_acald_p/kM_R201_M_acald_c)*(M_acald_c/kM_R201_M_acald_c))/(1 + M_acald_p/kM_R201_M_acald_p + 1 + M_acald_c/kM_R201_M_acald_c - 1);
    u_R201 = NaN; kC_R201 = 10; kEQ_R201 = 5.089; kM_R201_M_acald_p = 0.07398; kM_R201_M_acald_c = 0.1352;
  R_ACt2rpp: M_h_p + M_ac_p -> M_ac_c + M_h_c; u_R202*(kC_R202*sqrt(kEQ_R202*kM_R202_M_h_p*kM_R202_M_ac_p/kM_R202_M_ac_c/kM_R202_M_h_c)*(M_h_p/kM_R202_M_h_p)*(M_ac_p/kM_R202_M_ac_p) - kC_R202/sqrt(kEQ_R202*kM_R202_M_h_p*kM_R202_M_ac_p/kM_R202_M_ac_c/kM_R202_M_h_c)*(M_ac_c/kM_R202_M_ac_c)*(M_h_c/kM_R202_M_h_c))/((1 + M_h_p/kM_R202_M_h_p)*(1 + M_ac_p/kM_R202_M_ac_p) + (1 + M_ac_c/kM_R202_M_ac_c)*(1 + M_h_c/kM_R202_M_h_c) - 1);
    u_R202 = NaN; kC_R202 = 10; kEQ_R202 = 17.66; kM_R202_M_ac_c = 0.1474; kM_R202_M_h_c = 0.1474; kM_R202_M_h_p = 0.06784; kM_R202_M_ac_p = 0.06784;
  R_METS: M_5mthf_c + M_hcys__L_c => M_h_c + M_met__L_c + M_thf_c; u_R203*(kC_R203*sqrt(kEQ_R203*kM_R203_M_5mthf_c*kM_R203_M_hcys__L_c/kM_R203_M_h_c/kM_R203_M_met__L_c/kM_R203_M_thf_c)*(M_5mthf_c/kM_R203_M_5mthf_c)*(M_hcys__L_c/kM_R203_M_hcys__L_c) - kC_R203/sqrt(kEQ_R203*kM_R203_M_5mthf_c*kM_R203_M_hcys__L_c/kM_R203_M_h_c/kM_R203_M_met__L_c/kM_R203_M_thf_c)*(M_h_c/kM_R203_M_h_c)*(M_met__L_c/kM_R203_M_met__L_c)*(M_thf_c/kM_R203_M_thf_c))/((1 + M_5mthf_c/kM_R203_M_5mthf_c)*(1 + M_hcys__L_c/kM_R203_M_hcys__L_c) + (1 + M_h_c/kM_R203_M_h_c)*(1 + M_met__L_c/kM_R203_M_met__L_c)*(1 + M_thf_c/kM_R203_M_thf_c) - 1);
    u_R203 = NaN; kC_R203 = 6.177; kEQ_R203 = 0.4456; kM_R203_M_h_c = 0.09362; kM_R203_M_5mthf_c = 0.1068; kM_R203_M_met__L_c = 0.09362; kM_R203_M_thf_c = 0.09362; kM_R203_M_hcys__L_c = 0.1068;
  R_EX_glyc__R_e: M_glyc__R_e => ; u_R204*(kC_R204*sqrt(kEQ_R204*kM_R204_M_glyc__R_e)*(M_glyc__R_e/kM_R204_M_glyc__R_e) - kC_R204/sqrt(kEQ_R204*kM_R204_M_glyc__R_e))/(1 + M_glyc__R_e/kM_R204_M_glyc__R_e + (-1));
    u_R204 = NaN; kC_R204 = 10; kEQ_R204 = 359.1; kM_R204_M_glyc__R_e = 0.04431;
  R_FRUtex: M_fru_e -> M_fru_p; u_R205*(kC_R205*sqrt(kEQ_R205*kM_R205_M_fru_e/kM_R205_M_fru_p)*(M_fru_e/kM_R205_M_fru_e) - kC_R205/sqrt(kEQ_R205*kM_R205_M_fru_e/kM_R205_M_fru_p)*(M_fru_p/kM_R205_M_fru_p))/(1 + M_fru_e/kM_R205_M_fru_e + 1 + M_fru_p/kM_R205_M_fru_p - 1);
    u_R205 = NaN; kC_R205 = 10; kEQ_R205 = 0.5126; kM_R205_M_fru_e = 0.1132; kM_R205_M_fru_p = 0.08836;
  R_FUMtex: M_fum_e -> M_fum_p; u_R206*(kC_R206*sqrt(kEQ_R206*kM_R206_M_fum_e/kM_R206_M_fum_p)*(M_fum_e/kM_R206_M_fum_e) - kC_R206/sqrt(kEQ_R206*kM_R206_M_fum_e/kM_R206_M_fum_p)*(M_fum_p/kM_R206_M_fum_p))/(1 + M_fum_e/kM_R206_M_fum_e + 1 + M_fum_p/kM_R206_M_fum_p - 1);
    u_R206 = NaN; kC_R206 = 10; kEQ_R206 = 30.71; kM_R206_M_fum_p = 0.1886; kM_R206_M_fum_e = 0.05304;
  R_PRASCSi: M_asp__L_c + M_5aizc_c + M_atp_c => M_h_c + M_adp_c + M_pi_c + M_25aics_c; u_R207*(kC_R207*sqrt(kEQ_R207*kM_R207_M_asp__L_c*kM_R207_M_5aizc_c*kM_R207_M_atp_c/kM_R207_M_h_c/kM_R207_M_adp_c/kM_R207_M_pi_c/kM_R207_M_25aics_c)*(M_asp__L_c/kM_R207_M_asp__L_c)*(M_5aizc_c/kM_R207_M_5aizc_c)*(M_atp_c/kM_R207_M_atp_c) - kC_R207/sqrt(kEQ_R207*kM_R207_M_asp__L_c*kM_R207_M_5aizc_c*kM_R207_M_atp_c/kM_R207_M_h_c/kM_R207_M_adp_c/kM_R207_M_pi_c/kM_R207_M_25aics_c)*(M_h_c/kM_R207_M_h_c)*(M_adp_c/kM_R207_M_adp_c)*(M_pi_c/kM_R207_M_pi_c)*(M_25aics_c/kM_R207_M_25aics_c))/((1 + M_asp__L_c/kM_R207_M_asp__L_c)*(1 + M_5aizc_c/kM_R207_M_5aizc_c)*(1 + M_atp_c/kM_R207_M_atp_c) + (1 + M_h_c/kM_R207_M_h_c)*(1 + M_adp_c/kM_R207_M_adp_c)*(1 + M_pi_c/kM_R207_M_pi_c)*(1 + M_25aics_c/kM_R207_M_25aics_c) - 1);
    u_R207 = NaN; kC_R207 = 6.272; kEQ_R207 = 8.115; kM_R207_M_h_c = 0.08916; kM_R207_M_asp__L_c = 0.003044; kM_R207_M_adp_c = 0.08916; kM_R207_M_5aizc_c = 0.1122; kM_R207_M_pi_c = 0.08916; kM_R207_M_atp_c = 0.1122; kM_R207_M_25aics_c = 0.08916;
  R_MTHFC: M_h2o_c + M_methf_c -> M_10fthf_c + M_h_c; u_R208*(kC_R208*sqrt(kEQ_R208*kM_R208_M_h2o_c*kM_R208_M_methf_c/kM_R208_M_10fthf_c/kM_R208_M_h_c)*(M_h2o_c/kM_R208_M_h2o_c)*(M_methf_c/kM_R208_M_methf_c) - kC_R208/sqrt(kEQ_R208*kM_R208_M_h2o_c*kM_R208_M_methf_c/kM_R208_M_10fthf_c/kM_R208_M_h_c)*(M_10fthf_c/kM_R208_M_10fthf_c)*(M_h_c/kM_R208_M_h_c))/((1 + M_h2o_c/kM_R208_M_h2o_c)*(1 + M_methf_c/kM_R208_M_methf_c) + (1 + M_10fthf_c/kM_R208_M_10fthf_c)*(1 + M_h_c/kM_R208_M_h_c) - 1);
    u_R208 = NaN; kC_R208 = 17.18; kEQ_R208 = 8.26; kM_R208_M_10fthf_c = 0.2573; kM_R208_M_h_c = 0.2573; kM_R208_M_h2o_c = 0.03887; kM_R208_M_methf_c = 0.03887;
  R_MTHFD: M_nadp_c + M_mlthf_c -> M_methf_c + M_nadph_c; u_R209*(kC_R209*sqrt(kEQ_R209*kM_R209_M_nadp_c*kM_R209_M_mlthf_c/kM_R209_M_methf_c/kM_R209_M_nadph_c)*(M_nadp_c/kM_R209_M_nadp_c)*(M_mlthf_c/kM_R209_M_mlthf_c) - kC_R209/sqrt(kEQ_R209*kM_R209_M_nadp_c*kM_R209_M_mlthf_c/kM_R209_M_methf_c/kM_R209_M_nadph_c)*(M_methf_c/kM_R209_M_methf_c)*(M_nadph_c/kM_R209_M_nadph_c))/((1 + M_nadp_c/kM_R209_M_nadp_c)*(1 + M_mlthf_c/kM_R209_M_mlthf_c) + (1 + M_methf_c/kM_R209_M_methf_c)*(1 + M_nadph_c/kM_R209_M_nadph_c) - 1);
    u_R209 = NaN; kC_R209 = 14.24; kEQ_R209 = 0.06933; kM_R209_M_nadp_c = 0.1168; kM_R209_M_mlthf_c = 0.1168; kM_R209_M_methf_c = 0.08564; kM_R209_M_nadph_c = 0.08564;
  R_XYLtex: M_xyl__D_e -> M_xyl__D_p; u_R210*(kC_R210*sqrt(kEQ_R210*kM_R210_M_xyl__D_e/kM_R210_M_xyl__D_p)*(M_xyl__D_e/kM_R210_M_xyl__D_e) - kC_R210/sqrt(kEQ_R210*kM_R210_M_xyl__D_e/kM_R210_M_xyl__D_p)*(M_xyl__D_p/kM_R210_M_xyl__D_p))/(1 + M_xyl__D_e/kM_R210_M_xyl__D_e + 1 + M_xyl__D_p/kM_R210_M_xyl__D_p - 1);
    u_R210 = NaN; kC_R210 = 10; kEQ_R210 = 0.001345; kM_R210_M_xyl__D_p = 0.02939; kM_R210_M_xyl__D_e = 0.3402;
  R_FORtppi: M_for_c => M_for_p; u_R211*(kC_R211*sqrt(kEQ_R211*kM_R211_M_for_c/kM_R211_M_for_p)*(M_for_c/kM_R211_M_for_c) - kC_R211/sqrt(kEQ_R211*kM_R211_M_for_c/kM_R211_M_for_p)*(M_for_p/kM_R211_M_for_p))/(1 + M_for_c/kM_R211_M_for_c + 1 + M_for_p/kM_R211_M_for_p - 1);
    u_R211 = NaN; kC_R211 = 10; kEQ_R211 = 2.707; kM_R211_M_for_p = 0.1202; kM_R211_M_for_c = 0.08316;
  R_PYRtex: M_pyr_e -> M_pyr_p; u_R212*(kC_R212*sqrt(kEQ_R212*kM_R212_M_pyr_e/kM_R212_M_pyr_p)*(M_pyr_e/kM_R212_M_pyr_e) - kC_R212/sqrt(kEQ_R212*kM_R212_M_pyr_e/kM_R212_M_pyr_p)*(M_pyr_p/kM_R212_M_pyr_p))/(1 + M_pyr_e/kM_R212_M_pyr_e + 1 + M_pyr_p/kM_R212_M_pyr_p - 1);
    u_R212 = NaN; kC_R212 = 10; kEQ_R212 = 1.814; kM_R212_M_pyr_p = 0.1117; kM_R212_M_pyr_e = 0.08955;
  R_SO4tex: M_so4_e -> M_so4_p; u_R213*(kC_R213*sqrt(kEQ_R213*kM_R213_M_so4_e/kM_R213_M_so4_p)*(M_so4_e/kM_R213_M_so4_e) - kC_R213/sqrt(kEQ_R213*kM_R213_M_so4_e/kM_R213_M_so4_p)*(M_so4_p/kM_R213_M_so4_p))/(1 + M_so4_e/kM_R213_M_so4_e + 1 + M_so4_p/kM_R213_M_so4_p - 1);
    u_R213 = NaN; kC_R213 = 10; kEQ_R213 = 1.663; kM_R213_M_so4_e = 0.09101; kM_R213_M_so4_p = 0.1099;
  R_SUCCtex: M_succ_e -> M_succ_p; u_R214*(kC_R214*sqrt(kEQ_R214*kM_R214_M_succ_e/kM_R214_M_succ_p)*(M_succ_e/kM_R214_M_succ_e) - kC_R214/sqrt(kEQ_R214*kM_R214_M_succ_e/kM_R214_M_succ_p)*(M_succ_p/kM_R214_M_succ_p))/(1 + M_succ_e/kM_R214_M_succ_e + 1 + M_succ_p/kM_R214_M_succ_p - 1);
    u_R214 = NaN; kC_R214 = 10; kEQ_R214 = 0.63; kM_R214_M_succ_p = 0.0918; kM_R214_M_succ_e = 0.1089;
  R_GRXR: 2 M_gthrd_c + M_grxox_c => M_grxrd_c + M_gthox_c; u_R215*(kC_R215*sqrt(kEQ_R215*kM_R215_M_gthrd_c^2*kM_R215_M_grxox_c/kM_R215_M_grxrd_c/kM_R215_M_gthox_c)*(M_gthrd_c/kM_R215_M_gthrd_c)^2*(M_grxox_c/kM_R215_M_grxox_c) - kC_R215/sqrt(kEQ_R215*kM_R215_M_gthrd_c^2*kM_R215_M_grxox_c/kM_R215_M_grxrd_c/kM_R215_M_gthox_c)*(M_grxrd_c/kM_R215_M_grxrd_c)*(M_gthox_c/kM_R215_M_gthox_c))/((1 + M_gthrd_c/kM_R215_M_gthrd_c)^2*(1 + M_grxox_c/kM_R215_M_grxox_c) + (1 + M_grxrd_c/kM_R215_M_grxrd_c)*(1 + M_gthox_c/kM_R215_M_gthox_c) - 1);
    u_R215 = NaN; kC_R215 = 10; kEQ_R215 = 4471; kM_R215_M_gthrd_c = 0.03092; kM_R215_M_grxrd_c = 0.1798; kM_R215_M_grxox_c = 0.05561; kM_R215_M_gthox_c = 0.1798;
  R_RNDR1b: M_adp_c + M_grxrd_c => M_dadp_c + M_h2o_c + M_grxox_c; u_R216*(kC_R216*sqrt(kEQ_R216*kM_R216_M_adp_c*kM_R216_M_grxrd_c/kM_R216_M_dadp_c/kM_R216_M_h2o_c/kM_R216_M_grxox_c)*(M_adp_c/kM_R216_M_adp_c)*(M_grxrd_c/kM_R216_M_grxrd_c) - kC_R216/sqrt(kEQ_R216*kM_R216_M_adp_c*kM_R216_M_grxrd_c/kM_R216_M_dadp_c/kM_R216_M_h2o_c/kM_R216_M_grxox_c)*(M_dadp_c/kM_R216_M_dadp_c)*(M_h2o_c/kM_R216_M_h2o_c)*(M_grxox_c/kM_R216_M_grxox_c))/((1 + M_adp_c/kM_R216_M_adp_c)*(1 + M_grxrd_c/kM_R216_M_grxrd_c) + (1 + M_dadp_c/kM_R216_M_dadp_c)*(1 + M_h2o_c/kM_R216_M_h2o_c)*(1 + M_grxox_c/kM_R216_M_grxox_c) - 1);
    u_R216 = NaN; kC_R216 = 10; kEQ_R216 = 74.15; kM_R216_M_dadp_c = 0.2196; kM_R216_M_adp_c = 0.04553; kM_R216_M_grxrd_c = 0.04553; kM_R216_M_h2o_c = 0.2196; kM_R216_M_grxox_c = 0.2196;
  R_RNDR2b: M_grxrd_c + M_gdp_c => M_dgdp_c + M_h2o_c + M_grxox_c; u_R217*(kC_R217*sqrt(kEQ_R217*kM_R217_M_grxrd_c*kM_R217_M_gdp_c/kM_R217_M_dgdp_c/kM_R217_M_h2o_c/kM_R217_M_grxox_c)*(M_grxrd_c/kM_R217_M_grxrd_c)*(M_gdp_c/kM_R217_M_gdp_c) - kC_R217/sqrt(kEQ_R217*kM_R217_M_grxrd_c*kM_R217_M_gdp_c/kM_R217_M_dgdp_c/kM_R217_M_h2o_c/kM_R217_M_grxox_c)*(M_dgdp_c/kM_R217_M_dgdp_c)*(M_h2o_c/kM_R217_M_h2o_c)*(M_grxox_c/kM_R217_M_grxox_c))/((1 + M_grxrd_c/kM_R217_M_grxrd_c)*(1 + M_gdp_c/kM_R217_M_gdp_c) + (1 + M_dgdp_c/kM_R217_M_dgdp_c)*(1 + M_h2o_c/kM_R217_M_h2o_c)*(1 + M_grxox_c/kM_R217_M_grxox_c) - 1);
    u_R217 = NaN; kC_R217 = 10; kEQ_R217 = 31.06; kM_R217_M_dgdp_c = 0.198; kM_R217_M_grxrd_c = 0.0505; kM_R217_M_gdp_c = 0.0505; kM_R217_M_h2o_c = 0.198; kM_R217_M_grxox_c = 0.198;
  R_MALt2_2pp: 2 M_h_p + M_mal__L_p => 2 M_h_c + M_mal__L_c; u_R218*(kC_R218*sqrt(kEQ_R218*kM_R218_M_h_p^2*kM_R218_M_mal__L_p/kM_R218_M_h_c^2/kM_R218_M_mal__L_c)*(M_h_p/kM_R218_M_h_p)^2*(M_mal__L_p/kM_R218_M_mal__L_p) - kC_R218/sqrt(kEQ_R218*kM_R218_M_h_p^2*kM_R218_M_mal__L_p/kM_R218_M_h_c^2/kM_R218_M_mal__L_c)*(M_h_c/kM_R218_M_h_c)^2*(M_mal__L_c/kM_R218_M_mal__L_c))/((1 + M_h_p/kM_R218_M_h_p)^2*(1 + M_mal__L_p/kM_R218_M_mal__L_p) + (1 + M_h_c/kM_R218_M_h_c)^2*(1 + M_mal__L_c/kM_R218_M_mal__L_c) - 1);
    u_R218 = NaN; kC_R218 = 10; kEQ_R218 = 21.38; kM_R218_M_h_c = 0.1579; kM_R218_M_h_p = 0.06331; kM_R218_M_mal__L_c = 0.1257; kM_R218_M_mal__L_p = 0.07957;
  R_NH4tpp: M_nh4_p -> M_nh4_c; u_R219*(kC_R219*sqrt(kEQ_R219*kM_R219_M_nh4_p/kM_R219_M_nh4_c)*(M_nh4_p/kM_R219_M_nh4_p) - kC_R219/sqrt(kEQ_R219*kM_R219_M_nh4_p/kM_R219_M_nh4_c)*(M_nh4_c/kM_R219_M_nh4_c))/(1 + M_nh4_p/kM_R219_M_nh4_p + 1 + M_nh4_c/kM_R219_M_nh4_c - 1);
    u_R219 = NaN; kC_R219 = 10; kEQ_R219 = 0.3142; kM_R219_M_nh4_c = 0.0807; kM_R219_M_nh4_p = 0.1239;
  R_NH4tex: M_nh4_e -> M_nh4_p; u_R220*(kC_R220*sqrt(kEQ_R220*kM_R220_M_nh4_e/kM_R220_M_nh4_p)*(M_nh4_e/kM_R220_M_nh4_e) - kC_R220/sqrt(kEQ_R220*kM_R220_M_nh4_e/kM_R220_M_nh4_p)*(M_nh4_p/kM_R220_M_nh4_p))/(1 + M_nh4_e/kM_R220_M_nh4_e + 1 + M_nh4_p/kM_R220_M_nh4_p - 1);
    u_R220 = NaN; kC_R220 = 10; kEQ_R220 = 0.3146; kM_R220_M_nh4_p = 0.08072; kM_R220_M_nh4_e = 0.1239;
  R_RIBabcpp: M_atp_c + M_rib__D_p + M_h2o_c => M_h_c + M_rib__D_c + M_adp_c + M_pi_c; u_R221*(kC_R221*sqrt(kEQ_R221*kM_R221_M_atp_c*kM_R221_M_rib__D_p*kM_R221_M_h2o_c/kM_R221_M_h_c/kM_R221_M_rib__D_c/kM_R221_M_adp_c/kM_R221_M_pi_c)*(M_atp_c/kM_R221_M_atp_c)*(M_rib__D_p/kM_R221_M_rib__D_p)*(M_h2o_c/kM_R221_M_h2o_c) - kC_R221/sqrt(kEQ_R221*kM_R221_M_atp_c*kM_R221_M_rib__D_p*kM_R221_M_h2o_c/kM_R221_M_h_c/kM_R221_M_rib__D_c/kM_R221_M_adp_c/kM_R221_M_pi_c)*(M_h_c/kM_R221_M_h_c)*(M_rib__D_c/kM_R221_M_rib__D_c)*(M_adp_c/kM_R221_M_adp_c)*(M_pi_c/kM_R221_M_pi_c))/((1 + M_atp_c/kM_R221_M_atp_c)*(1 + M_rib__D_p/kM_R221_M_rib__D_p)*(1 + M_h2o_c/kM_R221_M_h2o_c) + (1 + M_h_c/kM_R221_M_h_c)*(1 + M_rib__D_c/kM_R221_M_rib__D_c)*(1 + M_adp_c/kM_R221_M_adp_c)*(1 + M_pi_c/kM_R221_M_pi_c) - 1);
    u_R221 = NaN; kC_R221 = 10; kEQ_R221 = 4.18; kM_R221_M_h_c = 0.1432; kM_R221_M_rib__D_c = 0.1432; kM_R221_M_adp_c = 0.1432; kM_R221_M_pi_c = 0.1432; kM_R221_M_atp_c = 0.06984; kM_R221_M_rib__D_p = 0.06984; kM_R221_M_h2o_c = 0.06984;
  R_GLYCAt2rpp: M_h_p + M_glyc__R_p -> M_h_c + M_glyc__R_c; u_R222*(kC_R222*sqrt(kEQ_R222*kM_R222_M_h_p*kM_R222_M_glyc__R_p/kM_R222_M_h_c/kM_R222_M_glyc__R_c)*(M_h_p/kM_R222_M_h_p)*(M_glyc__R_p/kM_R222_M_glyc__R_p) - kC_R222/sqrt(kEQ_R222*kM_R222_M_h_p*kM_R222_M_glyc__R_p/kM_R222_M_h_c/kM_R222_M_glyc__R_c)*(M_h_c/kM_R222_M_h_c)*(M_glyc__R_c/kM_R222_M_glyc__R_c))/((1 + M_h_p/kM_R222_M_h_p)*(1 + M_glyc__R_p/kM_R222_M_glyc__R_p) + (1 + M_h_c/kM_R222_M_h_c)*(1 + M_glyc__R_c/kM_R222_M_glyc__R_c) - 1);
    u_R222 = NaN; kC_R222 = 10; kEQ_R222 = 0.002727; kM_R222_M_h_c = 0.04502; kM_R222_M_h_p = 0.2221; kM_R222_M_glyc__R_c = 0.04502; kM_R222_M_glyc__R_p = 0.2221;
  R_GLYCAtex: M_glyc__R_e -> M_glyc__R_p; u_R223*(kC_R223*sqrt(kEQ_R223*kM_R223_M_glyc__R_e/kM_R223_M_glyc__R_p)*(M_glyc__R_e/kM_R223_M_glyc__R_e) - kC_R223/sqrt(kEQ_R223*kM_R223_M_glyc__R_e/kM_R223_M_glyc__R_p)*(M_glyc__R_p/kM_R223_M_glyc__R_p))/(1 + M_glyc__R_e/kM_R223_M_glyc__R_e + 1 + M_glyc__R_p/kM_R223_M_glyc__R_p - 1);
    u_R223 = NaN; kC_R223 = 10; kEQ_R223 = 0.003334; kM_R223_M_glyc__R_e = 0.2876; kM_R223_M_glyc__R_p = 0.03478;
  R_GLYCtpp: M_glyc_c -> M_glyc_p; u_R224*(kC_R224*sqrt(kEQ_R224*kM_R224_M_glyc_c/kM_R224_M_glyc_p)*(M_glyc_c/kM_R224_M_glyc_c) - kC_R224/sqrt(kEQ_R224*kM_R224_M_glyc_c/kM_R224_M_glyc_p)*(M_glyc_p/kM_R224_M_glyc_p))/(1 + M_glyc_c/kM_R224_M_glyc_c + 1 + M_glyc_p/kM_R224_M_glyc_p - 1);
    u_R224 = NaN; kC_R224 = 10; kEQ_R224 = 5.596; kM_R224_M_glyc_p = 0.1376; kM_R224_M_glyc_c = 0.07269;
  R_H2Otpp: M_h2o_p -> M_h2o_c; u_R225*(kC_R225*sqrt(kEQ_R225*kM_R225_M_h2o_p/kM_R225_M_h2o_c)*(M_h2o_p/kM_R225_M_h2o_p) - kC_R225/sqrt(kEQ_R225*kM_R225_M_h2o_p/kM_R225_M_h2o_c)*(M_h2o_c/kM_R225_M_h2o_c))/(1 + M_h2o_p/kM_R225_M_h2o_p + 1 + M_h2o_c/kM_R225_M_h2o_c - 1);
    u_R225 = NaN; kC_R225 = 10; kEQ_R225 = 0.3848; kM_R225_M_h2o_p = 0.1193; kM_R225_M_h2o_c = 0.08379;
  R_GLNabcpp: M_atp_c + M_gln__L_p + M_h2o_c => M_h_c + M_adp_c + M_pi_c + M_gln__L_c; u_R226*(kC_R226*sqrt(kEQ_R226*kM_R226_M_atp_c*kM_R226_M_gln__L_p*kM_R226_M_h2o_c/kM_R226_M_h_c/kM_R226_M_adp_c/kM_R226_M_pi_c/kM_R226_M_gln__L_c)*(M_atp_c/kM_R226_M_atp_c)*(M_gln__L_p/kM_R226_M_gln__L_p)*(M_h2o_c/kM_R226_M_h2o_c) - kC_R226/sqrt(kEQ_R226*kM_R226_M_atp_c*kM_R226_M_gln__L_p*kM_R226_M_h2o_c/kM_R226_M_h_c/kM_R226_M_adp_c/kM_R226_M_pi_c/kM_R226_M_gln__L_c)*(M_h_c/kM_R226_M_h_c)*(M_adp_c/kM_R226_M_adp_c)*(M_pi_c/kM_R226_M_pi_c)*(M_gln__L_c/kM_R226_M_gln__L_c))/((1 + M_atp_c/kM_R226_M_atp_c)*(1 + M_gln__L_p/kM_R226_M_gln__L_p)*(1 + M_h2o_c/kM_R226_M_h2o_c) + (1 + M_h_c/kM_R226_M_h_c)*(1 + M_adp_c/kM_R226_M_adp_c)*(1 + M_pi_c/kM_R226_M_pi_c)*(1 + M_gln__L_c/kM_R226_M_gln__L_c) - 1);
    u_R226 = NaN; kC_R226 = 10; kEQ_R226 = 234.1; kM_R226_M_h_c = 0.2109; kM_R226_M_adp_c = 0.2109; kM_R226_M_pi_c = 0.2109; kM_R226_M_atp_c = 0.04742; kM_R226_M_gln__L_p = 0.04742; kM_R226_M_gln__L_c = 0.2109; kM_R226_M_h2o_c = 0.04742;
  R_CO2tex: M_co2_e -> M_co2_p; u_R227*(kC_R227*sqrt(kEQ_R227*kM_R227_M_co2_e/kM_R227_M_co2_p)*(M_co2_e/kM_R227_M_co2_e) - kC_R227/sqrt(kEQ_R227*kM_R227_M_co2_e/kM_R227_M_co2_p)*(M_co2_p/kM_R227_M_co2_p))/(1 + M_co2_e/kM_R227_M_co2_e + 1 + M_co2_p/kM_R227_M_co2_p - 1);
    u_R227 = NaN; kC_R227 = 10; kEQ_R227 = 145.5; kM_R227_M_co2_e = 0.03976; kM_R227_M_co2_p = 0.2515;
  R_GLUt2rpp: M_h_p + M_glu__L_p -> M_h_c + M_glu__L_c; u_R228*(kC_R228*sqrt(kEQ_R228*kM_R228_M_h_p*kM_R228_M_glu__L_p/kM_R228_M_h_c/kM_R228_M_glu__L_c)*(M_h_p/kM_R228_M_h_p)*(M_glu__L_p/kM_R228_M_glu__L_p) - kC_R228/sqrt(kEQ_R228*kM_R228_M_h_p*kM_R228_M_glu__L_p/kM_R228_M_h_c/kM_R228_M_glu__L_c)*(M_h_c/kM_R228_M_h_c)*(M_glu__L_c/kM_R228_M_glu__L_c))/((1 + M_h_p/kM_R228_M_h_p)*(1 + M_glu__L_p/kM_R228_M_glu__L_p) + (1 + M_h_c/kM_R228_M_h_c)*(1 + M_glu__L_c/kM_R228_M_glu__L_c) - 1);
    u_R228 = NaN; kC_R228 = 10; kEQ_R228 = 43.93; kM_R228_M_h_c = 0.1667; kM_R228_M_h_p = 0.05998; kM_R228_M_glu__L_c = 0.1667; kM_R228_M_glu__L_p = 0.05998;
  R_ACGK: M_atp_c + M_acglu_c => M_adp_c + M_acg5p_c; u_R229*(kC_R229*sqrt(kEQ_R229*kM_R229_M_atp_c*kM_R229_M_acglu_c/kM_R229_M_adp_c/kM_R229_M_acg5p_c)*(M_atp_c/kM_R229_M_atp_c)*(M_acglu_c/kM_R229_M_acglu_c) - kC_R229/sqrt(kEQ_R229*kM_R229_M_atp_c*kM_R229_M_acglu_c/kM_R229_M_adp_c/kM_R229_M_acg5p_c)*(M_adp_c/kM_R229_M_adp_c)*(M_acg5p_c/kM_R229_M_acg5p_c))/((1 + M_atp_c/kM_R229_M_atp_c)*(1 + M_acglu_c/kM_R229_M_acglu_c) + (1 + M_adp_c/kM_R229_M_adp_c)*(1 + M_acg5p_c/kM_R229_M_acg5p_c) - 1);
    u_R229 = NaN; kC_R229 = 7.093; kEQ_R229 = 4.661e-5; kM_R229_M_adp_c = 0.09608; kM_R229_M_atp_c = 3.934; kM_R229_M_acglu_c = 189.2; kM_R229_M_acg5p_c = 0.09608;
  R_GNK: M_atp_c + M_glcn_c => M_h_c + M_adp_c + M_6pgc_c; u_R230*(kC_R230*sqrt(kEQ_R230*kM_R230_M_atp_c*kM_R230_M_glcn_c/kM_R230_M_h_c/kM_R230_M_adp_c/kM_R230_M_6pgc_c)*(M_atp_c/kM_R230_M_atp_c)*(M_glcn_c/kM_R230_M_glcn_c) - kC_R230/sqrt(kEQ_R230*kM_R230_M_atp_c*kM_R230_M_glcn_c/kM_R230_M_h_c/kM_R230_M_adp_c/kM_R230_M_6pgc_c)*(M_h_c/kM_R230_M_h_c)*(M_adp_c/kM_R230_M_adp_c)*(M_6pgc_c/kM_R230_M_6pgc_c))/((1 + M_atp_c/kM_R230_M_atp_c)*(1 + M_glcn_c/kM_R230_M_glcn_c) + (1 + M_h_c/kM_R230_M_h_c)*(1 + M_adp_c/kM_R230_M_adp_c)*(1 + M_6pgc_c/kM_R230_M_6pgc_c) - 1);
    u_R230 = NaN; kC_R230 = 23.35; kEQ_R230 = 60.57; kM_R230_M_h_c = 0.2793; kM_R230_M_adp_c = 0.2793; kM_R230_M_6pgc_c = 0.2793; kM_R230_M_atp_c = 0.008978; kM_R230_M_glcn_c = 0.0358;
  R_GLUDy: M_nadp_c + M_glu__L_c + M_h2o_c -> M_akg_c + M_h_c + M_nh4_c + M_nadph_c; u_R231*(kC_R231*sqrt(kEQ_R231*kM_R231_M_nadp_c*kM_R231_M_glu__L_c*kM_R231_M_h2o_c/kM_R231_M_akg_c/kM_R231_M_h_c/kM_R231_M_nh4_c/kM_R231_M_nadph_c)*(M_nadp_c/kM_R231_M_nadp_c)*(M_glu__L_c/kM_R231_M_glu__L_c)*(M_h2o_c/kM_R231_M_h2o_c) - kC_R231/sqrt(kEQ_R231*kM_R231_M_nadp_c*kM_R231_M_glu__L_c*kM_R231_M_h2o_c/kM_R231_M_akg_c/kM_R231_M_h_c/kM_R231_M_nh4_c/kM_R231_M_nadph_c)*(M_akg_c/kM_R231_M_akg_c)*(M_h_c/kM_R231_M_h_c)*(M_nh4_c/kM_R231_M_nh4_c)*(M_nadph_c/kM_R231_M_nadph_c))/((1 + M_nadp_c/kM_R231_M_nadp_c)*(1 + M_glu__L_c/kM_R231_M_glu__L_c)*(1 + M_h2o_c/kM_R231_M_h2o_c) + (1 + M_akg_c/kM_R231_M_akg_c)*(1 + M_h_c/kM_R231_M_h_c)*(1 + M_nh4_c/kM_R231_M_nh4_c)*(1 + M_nadph_c/kM_R231_M_nadph_c) - 1);
    u_R231 = NaN; kC_R231 = 8.451; kEQ_R231 = 1.736e-6; kM_R231_M_akg_c = 0.0209; kM_R231_M_h_c = 0.0209; kM_R231_M_nh4_c = 0.0209; kM_R231_M_nadp_c = 0.4785; kM_R231_M_glu__L_c = 0.4785; kM_R231_M_h2o_c = 0.4785; kM_R231_M_nadph_c = 0.0002801;
  R_GLCNt2rpp: M_h_p + M_glcn_p -> M_h_c + M_glcn_c; u_R232*(kC_R232*sqrt(kEQ_R232*kM_R232_M_h_p*kM_R232_M_glcn_p/kM_R232_M_h_c/kM_R232_M_glcn_c)*(M_h_p/kM_R232_M_h_p)*(M_glcn_p/kM_R232_M_glcn_p) - kC_R232/sqrt(kEQ_R232*kM_R232_M_h_p*kM_R232_M_glcn_p/kM_R232_M_h_c/kM_R232_M_glcn_c)*(M_h_c/kM_R232_M_h_c)*(M_glcn_c/kM_R232_M_glcn_c))/((1 + M_h_p/kM_R232_M_h_p)*(1 + M_glcn_p/kM_R232_M_glcn_p) + (1 + M_h_c/kM_R232_M_h_c)*(1 + M_glcn_c/kM_R232_M_glcn_c) - 1);
    u_R232 = NaN; kC_R232 = 10; kEQ_R232 = 0.01376; kM_R232_M_h_c = 0.05603; kM_R232_M_h_p = 0.1785; kM_R232_M_glcn_p = 0.1785; kM_R232_M_glcn_c = 0.05603;
  R_GLCptspp: M_pep_c + M_glc__D_p => M_g6p_c + M_pyr_c; u_R233*(kC_R233*sqrt(kEQ_R233*kM_R233_M_pep_c*kM_R233_M_glc__D_p/kM_R233_M_g6p_c/kM_R233_M_pyr_c)*(M_pep_c/kM_R233_M_pep_c)*(M_glc__D_p/kM_R233_M_glc__D_p) - kC_R233/sqrt(kEQ_R233*kM_R233_M_pep_c*kM_R233_M_glc__D_p/kM_R233_M_g6p_c/kM_R233_M_pyr_c)*(M_g6p_c/kM_R233_M_g6p_c)*(M_pyr_c/kM_R233_M_pyr_c))/((1 + M_pep_c/kM_R233_M_pep_c)*(1 + M_glc__D_p/kM_R233_M_glc__D_p) + (1 + M_g6p_c/kM_R233_M_g6p_c)*(1 + M_pyr_c/kM_R233_M_pyr_c) - 1);
    u_R233 = NaN; kC_R233 = 10; kEQ_R233 = 12.56; kM_R233_M_pep_c = 0.07104; kM_R233_M_g6p_c = 0.1408; kM_R233_M_glc__D_p = 0.07104; kM_R233_M_pyr_c = 0.1408;
  R_EX_h2o_e: M_h2o_e -> ; u_R234*(kC_R234*sqrt(kEQ_R234*kM_R234_M_h2o_e)*(M_h2o_e/kM_R234_M_h2o_e) - kC_R234/sqrt(kEQ_R234*kM_R234_M_h2o_e))/(1 + M_h2o_e/kM_R234_M_h2o_e + (-1));
    u_R234 = NaN; kC_R234 = 10; kEQ_R234 = 3.543; kM_R234_M_h2o_e = 0.1266;
  R_HSTPT: M_glu__L_c + M_imacp_c => M_akg_c + M_hisp_c; u_R235*(kC_R235*sqrt(kEQ_R235*kM_R235_M_glu__L_c*kM_R235_M_imacp_c/kM_R235_M_akg_c/kM_R235_M_hisp_c)*(M_glu__L_c/kM_R235_M_glu__L_c)*(M_imacp_c/kM_R235_M_imacp_c) - kC_R235/sqrt(kEQ_R235*kM_R235_M_glu__L_c*kM_R235_M_imacp_c/kM_R235_M_akg_c/kM_R235_M_hisp_c)*(M_akg_c/kM_R235_M_akg_c)*(M_hisp_c/kM_R235_M_hisp_c))/((1 + M_glu__L_c/kM_R235_M_glu__L_c)*(1 + M_imacp_c/kM_R235_M_imacp_c) + (1 + M_akg_c/kM_R235_M_akg_c)*(1 + M_hisp_c/kM_R235_M_hisp_c) - 1);
    u_R235 = NaN; kC_R235 = 4.03; kEQ_R235 = 0.02234; kM_R235_M_akg_c = 0.0355; kM_R235_M_glu__L_c = 0.2817; kM_R235_M_hisp_c = 0.0355; kM_R235_M_imacp_c = 0.2817;
  R_THDPS: M_h2o_c + M_thdp_c + M_succoa_c => M_sl2a6o_c + M_coa_c; u_R236*(kC_R236*sqrt(kEQ_R236*kM_R236_M_h2o_c*kM_R236_M_thdp_c*kM_R236_M_succoa_c/kM_R236_M_sl2a6o_c/kM_R236_M_coa_c)*(M_h2o_c/kM_R236_M_h2o_c)*(M_thdp_c/kM_R236_M_thdp_c)*(M_succoa_c/kM_R236_M_succoa_c) - kC_R236/sqrt(kEQ_R236*kM_R236_M_h2o_c*kM_R236_M_thdp_c*kM_R236_M_succoa_c/kM_R236_M_sl2a6o_c/kM_R236_M_coa_c)*(M_sl2a6o_c/kM_R236_M_sl2a6o_c)*(M_coa_c/kM_R236_M_coa_c))/((1 + M_h2o_c/kM_R236_M_h2o_c)*(1 + M_thdp_c/kM_R236_M_thdp_c)*(1 + M_succoa_c/kM_R236_M_succoa_c) + (1 + M_sl2a6o_c/kM_R236_M_sl2a6o_c)*(1 + M_coa_c/kM_R236_M_coa_c) - 1);
    u_R236 = NaN; kC_R236 = 0.5112; kEQ_R236 = 3.475e-5; kM_R236_M_h2o_c = 5.034; kM_R236_M_sl2a6o_c = 0.001986; kM_R236_M_thdp_c = 5.034; kM_R236_M_coa_c = 0.001986; kM_R236_M_succoa_c = 0.002259;
  R_ATPM: M_atp_c + M_h2o_c => M_h_c + M_adp_c + M_pi_c; u_R237*(kC_R237*sqrt(kEQ_R237*kM_R237_M_atp_c*kM_R237_M_h2o_c/kM_R237_M_h_c/kM_R237_M_adp_c/kM_R237_M_pi_c)*(M_atp_c/kM_R237_M_atp_c)*(M_h2o_c/kM_R237_M_h2o_c) - kC_R237/sqrt(kEQ_R237*kM_R237_M_atp_c*kM_R237_M_h2o_c/kM_R237_M_h_c/kM_R237_M_adp_c/kM_R237_M_pi_c)*(M_h_c/kM_R237_M_h_c)*(M_adp_c/kM_R237_M_adp_c)*(M_pi_c/kM_R237_M_pi_c))/((1 + M_atp_c/kM_R237_M_atp_c)*(1 + M_h2o_c/kM_R237_M_h2o_c) + (1 + M_h_c/kM_R237_M_h_c)*(1 + M_adp_c/kM_R237_M_adp_c)*(1 + M_pi_c/kM_R237_M_pi_c) - 1);
    u_R237 = NaN; kC_R237 = 10; kEQ_R237 = 125400; kM_R237_M_h_c = 0.5321; kM_R237_M_adp_c = 0.5321; kM_R237_M_pi_c = 0.5321; kM_R237_M_atp_c = 0.01879; kM_R237_M_h2o_c = 0.01879;
  R_THRD_L: M_thr__L_c => M_nh4_c + M_2obut_c; u_R238*(kC_R238*sqrt(kEQ_R238*kM_R238_M_thr__L_c/kM_R238_M_nh4_c/kM_R238_M_2obut_c)*(M_thr__L_c/kM_R238_M_thr__L_c) - kC_R238/sqrt(kEQ_R238*kM_R238_M_thr__L_c/kM_R238_M_nh4_c/kM_R238_M_2obut_c)*(M_nh4_c/kM_R238_M_nh4_c)*(M_2obut_c/kM_R238_M_2obut_c))/(1 + M_thr__L_c/kM_R238_M_thr__L_c + (1 + M_nh4_c/kM_R238_M_nh4_c)*(1 + M_2obut_c/kM_R238_M_2obut_c) - 1);
    u_R238 = NaN; kC_R238 = 66.44; kEQ_R238 = 4304; kM_R238_M_thr__L_c = 0.005367; kM_R238_M_nh4_c = 1.863; kM_R238_M_2obut_c = 1.863;
  R_ETOHtex: M_etoh_e -> M_etoh_p; u_R239*(kC_R239*sqrt(kEQ_R239*kM_R239_M_etoh_e/kM_R239_M_etoh_p)*(M_etoh_e/kM_R239_M_etoh_e) - kC_R239/sqrt(kEQ_R239*kM_R239_M_etoh_e/kM_R239_M_etoh_p)*(M_etoh_p/kM_R239_M_etoh_p))/(1 + M_etoh_e/kM_R239_M_etoh_e + 1 + M_etoh_p/kM_R239_M_etoh_p - 1);
    u_R239 = NaN; kC_R239 = 10; kEQ_R239 = 98.86; kM_R239_M_etoh_e = 0.04271; kM_R239_M_etoh_p = 0.2341;
  R_RNDR2: M_gdp_c + M_trdrd_c => M_dgdp_c + M_trdox_c + M_h2o_c; u_R240*(kC_R240*sqrt(kEQ_R240*kM_R240_M_gdp_c*kM_R240_M_trdrd_c/kM_R240_M_dgdp_c/kM_R240_M_trdox_c/kM_R240_M_h2o_c)*(M_gdp_c/kM_R240_M_gdp_c)*(M_trdrd_c/kM_R240_M_trdrd_c) - kC_R240/sqrt(kEQ_R240*kM_R240_M_gdp_c*kM_R240_M_trdrd_c/kM_R240_M_dgdp_c/kM_R240_M_trdox_c/kM_R240_M_h2o_c)*(M_dgdp_c/kM_R240_M_dgdp_c)*(M_trdox_c/kM_R240_M_trdox_c)*(M_h2o_c/kM_R240_M_h2o_c))/((1 + M_gdp_c/kM_R240_M_gdp_c)*(1 + M_trdrd_c/kM_R240_M_trdrd_c) + (1 + M_dgdp_c/kM_R240_M_dgdp_c)*(1 + M_trdox_c/kM_R240_M_trdox_c)*(1 + M_h2o_c/kM_R240_M_h2o_c) - 1);
    u_R240 = NaN; kC_R240 = 9.654; kEQ_R240 = 1502000; kM_R240_M_dgdp_c = 0.7025; kM_R240_M_trdox_c = 0.7025; kM_R240_M_gdp_c = 0.01423; kM_R240_M_h2o_c = 0.7025; kM_R240_M_trdrd_c = 0.01423;
  R_DHFR: M_h_c + M_nadph_c + M_dhf_c -> M_thf_c + M_nadp_c; u_R241*(kC_R241*sqrt(kEQ_R241*kM_R241_M_h_c*kM_R241_M_nadph_c*kM_R241_M_dhf_c/kM_R241_M_thf_c/kM_R241_M_nadp_c)*(M_h_c/kM_R241_M_h_c)*(M_nadph_c/kM_R241_M_nadph_c)*(M_dhf_c/kM_R241_M_dhf_c) - kC_R241/sqrt(kEQ_R241*kM_R241_M_h_c*kM_R241_M_nadph_c*kM_R241_M_dhf_c/kM_R241_M_thf_c/kM_R241_M_nadp_c)*(M_thf_c/kM_R241_M_thf_c)*(M_nadp_c/kM_R241_M_nadp_c))/((1 + M_h_c/kM_R241_M_h_c)*(1 + M_nadph_c/kM_R241_M_nadph_c)*(1 + M_dhf_c/kM_R241_M_dhf_c) + (1 + M_thf_c/kM_R241_M_thf_c)*(1 + M_nadp_c/kM_R241_M_nadp_c) - 1);
    u_R241 = NaN; kC_R241 = 0.9088; kEQ_R241 = 1193; kM_R241_M_h_c = 0.5356; kM_R241_M_thf_c = 0.01867; kM_R241_M_nadp_c = 0.01867; kM_R241_M_nadph_c = 0.0004337; kM_R241_M_dhf_c = 0.0007007;
  R_PRAIi: M_pran_c => M_2cpr5p_c; u_R242*(kC_R242*sqrt(kEQ_R242*kM_R242_M_pran_c/kM_R242_M_2cpr5p_c)*(M_pran_c/kM_R242_M_pran_c) - kC_R242/sqrt(kEQ_R242*kM_R242_M_pran_c/kM_R242_M_2cpr5p_c)*(M_2cpr5p_c/kM_R242_M_2cpr5p_c))/(1 + M_pran_c/kM_R242_M_pran_c + 1 + M_2cpr5p_c/kM_R242_M_2cpr5p_c - 1);
    u_R242 = NaN; kC_R242 = 1.837; kEQ_R242 = 44.46; kM_R242_M_pran_c = 0.0004374; kM_R242_M_2cpr5p_c = 0.01341;
  R_EX_mal__L_e: M_mal__L_e => ; u_R243*(kC_R243*sqrt(kEQ_R243*kM_R243_M_mal__L_e)*(M_mal__L_e/kM_R243_M_mal__L_e) - kC_R243/sqrt(kEQ_R243*kM_R243_M_mal__L_e))/(1 + M_mal__L_e/kM_R243_M_mal__L_e + (-1));
    u_R243 = NaN; kC_R243 = 10; kEQ_R243 = 0.08892; kM_R243_M_mal__L_e = 0.2925;
  R_TYRTA: M_akg_c + M_tyr__L_c -> M_34hpp_c + M_glu__L_c; u_R244*(kC_R244*sqrt(kEQ_R244*kM_R244_M_akg_c*kM_R244_M_tyr__L_c/kM_R244_M_34hpp_c/kM_R244_M_glu__L_c)*(M_akg_c/kM_R244_M_akg_c)*(M_tyr__L_c/kM_R244_M_tyr__L_c) - kC_R244/sqrt(kEQ_R244*kM_R244_M_akg_c*kM_R244_M_tyr__L_c/kM_R244_M_34hpp_c/kM_R244_M_glu__L_c)*(M_34hpp_c/kM_R244_M_34hpp_c)*(M_glu__L_c/kM_R244_M_glu__L_c))/((1 + M_akg_c/kM_R244_M_akg_c)*(1 + M_tyr__L_c/kM_R244_M_tyr__L_c) + (1 + M_34hpp_c/kM_R244_M_34hpp_c)*(1 + M_glu__L_c/kM_R244_M_glu__L_c) - 1);
    u_R244 = NaN; kC_R244 = 2.24; kEQ_R244 = 0.6524; kM_R244_M_akg_c = 0.0408; kM_R244_M_34hpp_c = 0.003011; kM_R244_M_tyr__L_c = 0.0408; kM_R244_M_glu__L_c = 0.08349;
  R_SHKK: M_skm_c + M_atp_c => M_h_c + M_adp_c + M_skm5p_c; u_R245*(kC_R245*sqrt(kEQ_R245*kM_R245_M_skm_c*kM_R245_M_atp_c/kM_R245_M_h_c/kM_R245_M_adp_c/kM_R245_M_skm5p_c)*(M_skm_c/kM_R245_M_skm_c)*(M_atp_c/kM_R245_M_atp_c) - kC_R245/sqrt(kEQ_R245*kM_R245_M_skm_c*kM_R245_M_atp_c/kM_R245_M_h_c/kM_R245_M_adp_c/kM_R245_M_skm5p_c)*(M_h_c/kM_R245_M_h_c)*(M_adp_c/kM_R245_M_adp_c)*(M_skm5p_c/kM_R245_M_skm5p_c))/((1 + M_skm_c/kM_R245_M_skm_c)*(1 + M_atp_c/kM_R245_M_atp_c) + (1 + M_h_c/kM_R245_M_h_c)*(1 + M_adp_c/kM_R245_M_adp_c)*(1 + M_skm5p_c/kM_R245_M_skm5p_c) - 1);
    u_R245 = NaN; kC_R245 = 66.98; kEQ_R245 = 16240; kM_R245_M_h_c = 3.41; kM_R245_M_skm_c = 6.231; kM_R245_M_adp_c = 3.41; kM_R245_M_atp_c = 0.01968; kM_R245_M_skm5p_c = 3.41;
  R_EX_so4_e: M_so4_e -> ; u_R246*(kC_R246*sqrt(kEQ_R246*kM_R246_M_so4_e)*(M_so4_e/kM_R246_M_so4_e) - kC_R246/sqrt(kEQ_R246*kM_R246_M_so4_e))/(1 + M_so4_e/kM_R246_M_so4_e + (-1));
    u_R246 = NaN; kC_R246 = 10; kEQ_R246 = 0.8545; kM_R246_M_so4_e = 0.1749;
  R_GLUSy: M_akg_c + M_h_c + M_gln__L_c + M_nadph_c => M_nadp_c + 2 M_glu__L_c; u_R247*(kC_R247*sqrt(kEQ_R247*kM_R247_M_akg_c*kM_R247_M_h_c*kM_R247_M_gln__L_c*kM_R247_M_nadph_c/kM_R247_M_nadp_c/kM_R247_M_glu__L_c^2)*(M_akg_c/kM_R247_M_akg_c)*(M_h_c/kM_R247_M_h_c)*(M_gln__L_c/kM_R247_M_gln__L_c)*(M_nadph_c/kM_R247_M_nadph_c) - kC_R247/sqrt(kEQ_R247*kM_R247_M_akg_c*kM_R247_M_h_c*kM_R247_M_gln__L_c*kM_R247_M_nadph_c/kM_R247_M_nadp_c/kM_R247_M_glu__L_c^2)*(M_nadp_c/kM_R247_M_nadp_c)*(M_glu__L_c/kM_R247_M_glu__L_c)^2)/((1 + M_akg_c/kM_R247_M_akg_c)*(1 + M_h_c/kM_R247_M_h_c)*(1 + M_gln__L_c/kM_R247_M_gln__L_c)*(1 + M_nadph_c/kM_R247_M_nadph_c) + (1 + M_nadp_c/kM_R247_M_nadp_c)*(1 + M_glu__L_c/kM_R247_M_glu__L_c)^2 - 1);
    u_R247 = NaN; kC_R247 = 6.613; kEQ_R247 = 100000000; kM_R247_M_akg_c = 0.04667; kM_R247_M_h_c = 0.04667; kM_R247_M_nadp_c = 0.2143; kM_R247_M_glu__L_c = 0.4592; kM_R247_M_gln__L_c = 0.04667; kM_R247_M_nadph_c = 0.0003441;
  R_OMCDC: M_h_c + M_3c4mop_c => M_4mop_c + M_co2_c; u_R248*(kC_R248*sqrt(kEQ_R248*kM_R248_M_h_c*kM_R248_M_3c4mop_c/kM_R248_M_4mop_c/kM_R248_M_co2_c)*(M_h_c/kM_R248_M_h_c)*(M_3c4mop_c/kM_R248_M_3c4mop_c) - kC_R248/sqrt(kEQ_R248*kM_R248_M_h_c*kM_R248_M_3c4mop_c/kM_R248_M_4mop_c/kM_R248_M_co2_c)*(M_4mop_c/kM_R248_M_4mop_c)*(M_co2_c/kM_R248_M_co2_c))/((1 + M_h_c/kM_R248_M_h_c)*(1 + M_3c4mop_c/kM_R248_M_3c4mop_c) + (1 + M_4mop_c/kM_R248_M_4mop_c)*(1 + M_co2_c/kM_R248_M_co2_c) - 1);
    u_R248 = NaN; kC_R248 = 10; kEQ_R248 = 99.7; kM_R248_M_h_c = 0.05369; kM_R248_M_4mop_c = 0.1863; kM_R248_M_3c4mop_c = 0.05369; kM_R248_M_co2_c = 0.1863;
  R_IG3PS: M_gln__L_c + M_prlp_c => M_h_c + M_aicar_c + M_eig3p_c + M_glu__L_c; u_R249*(kC_R249*sqrt(kEQ_R249*kM_R249_M_gln__L_c*kM_R249_M_prlp_c/kM_R249_M_h_c/kM_R249_M_aicar_c/kM_R249_M_eig3p_c/kM_R249_M_glu__L_c)*(M_gln__L_c/kM_R249_M_gln__L_c)*(M_prlp_c/kM_R249_M_prlp_c) - kC_R249/sqrt(kEQ_R249*kM_R249_M_gln__L_c*kM_R249_M_prlp_c/kM_R249_M_h_c/kM_R249_M_aicar_c/kM_R249_M_eig3p_c/kM_R249_M_glu__L_c)*(M_h_c/kM_R249_M_h_c)*(M_aicar_c/kM_R249_M_aicar_c)*(M_eig3p_c/kM_R249_M_eig3p_c)*(M_glu__L_c/kM_R249_M_glu__L_c))/((1 + M_gln__L_c/kM_R249_M_gln__L_c)*(1 + M_prlp_c/kM_R249_M_prlp_c) + (1 + M_h_c/kM_R249_M_h_c)*(1 + M_aicar_c/kM_R249_M_aicar_c)*(1 + M_eig3p_c/kM_R249_M_eig3p_c)*(1 + M_glu__L_c/kM_R249_M_glu__L_c) - 1);
    u_R249 = NaN; kC_R249 = 7.687; kEQ_R249 = 1.015; kM_R249_M_h_c = 0.1451; kM_R249_M_aicar_c = 0.1451; kM_R249_M_eig3p_c = 0.1451; kM_R249_M_glu__L_c = 0.1451; kM_R249_M_gln__L_c = 0.06889; kM_R249_M_prlp_c = 0.06889;
  R_PDH: M_nad_c + M_pyr_c + M_coa_c => M_accoa_c + M_nadh_c + M_co2_c; u_R250*(kC_R250*sqrt(kEQ_R250*kM_R250_M_nad_c*kM_R250_M_pyr_c*kM_R250_M_coa_c/kM_R250_M_accoa_c/kM_R250_M_nadh_c/kM_R250_M_co2_c)*(M_nad_c/kM_R250_M_nad_c)*(M_pyr_c/kM_R250_M_pyr_c)*(M_coa_c/kM_R250_M_coa_c) - kC_R250/sqrt(kEQ_R250*kM_R250_M_nad_c*kM_R250_M_pyr_c*kM_R250_M_coa_c/kM_R250_M_accoa_c/kM_R250_M_nadh_c/kM_R250_M_co2_c)*(M_accoa_c/kM_R250_M_accoa_c)*(M_nadh_c/kM_R250_M_nadh_c)*(M_co2_c/kM_R250_M_co2_c))/((1 + M_nad_c/kM_R250_M_nad_c)*(1 + M_pyr_c/kM_R250_M_pyr_c)*(1 + M_coa_c/kM_R250_M_coa_c) + (1 + M_accoa_c/kM_R250_M_accoa_c)*(1 + M_nadh_c/kM_R250_M_nadh_c)*(1 + M_co2_c/kM_R250_M_co2_c) - 1);
    u_R250 = NaN; kC_R250 = 57.11; kEQ_R250 = 142200; kM_R250_M_accoa_c = 0.7769; kM_R250_M_nad_c = 0.01287; kM_R250_M_pyr_c = 0.01287; kM_R250_M_nadh_c = 0.7769; kM_R250_M_coa_c = 0.01287; kM_R250_M_co2_c = 0.7769;
  R_MTHFR2: 2 M_h_c + M_mlthf_c + M_nadh_c => M_5mthf_c + M_nad_c; u_R251*(kC_R251*sqrt(kEQ_R251*kM_R251_M_h_c^2*kM_R251_M_mlthf_c*kM_R251_M_nadh_c/kM_R251_M_5mthf_c/kM_R251_M_nad_c)*(M_h_c/kM_R251_M_h_c)^2*(M_mlthf_c/kM_R251_M_mlthf_c)*(M_nadh_c/kM_R251_M_nadh_c) - kC_R251/sqrt(kEQ_R251*kM_R251_M_h_c^2*kM_R251_M_mlthf_c*kM_R251_M_nadh_c/kM_R251_M_5mthf_c/kM_R251_M_nad_c)*(M_5mthf_c/kM_R251_M_5mthf_c)*(M_nad_c/kM_R251_M_nad_c))/((1 + M_h_c/kM_R251_M_h_c)^2*(1 + M_mlthf_c/kM_R251_M_mlthf_c)*(1 + M_nadh_c/kM_R251_M_nadh_c) + (1 + M_5mthf_c/kM_R251_M_5mthf_c)*(1 + M_nad_c/kM_R251_M_nad_c) - 1);
    u_R251 = NaN; kC_R251 = 7.168; kEQ_R251 = 2421000; kM_R251_M_h_c = 0.03311; kM_R251_M_5mthf_c = 0.02053; kM_R251_M_nad_c = 0.1738; kM_R251_M_mlthf_c = 0.001357; kM_R251_M_nadh_c = 0.02672;
  R_EX_nh4_e: M_nh4_e -> ; u_R252*(kC_R252*sqrt(kEQ_R252*kM_R252_M_nh4_e)*(M_nh4_e/kM_R252_M_nh4_e) - kC_R252/sqrt(kEQ_R252*kM_R252_M_nh4_e))/(1 + M_nh4_e/kM_R252_M_nh4_e + (-1));
    u_R252 = NaN; kC_R252 = 10; kEQ_R252 = 4.314; kM_R252_M_nh4_e = 0.1211;
  R_DUTPDP: M_dutp_c + M_h2o_c => M_h_c + M_ppi_c + M_dump_c; u_R253*(kC_R253*sqrt(kEQ_R253*kM_R253_M_dutp_c*kM_R253_M_h2o_c/kM_R253_M_h_c/kM_R253_M_ppi_c/kM_R253_M_dump_c)*(M_dutp_c/kM_R253_M_dutp_c)*(M_h2o_c/kM_R253_M_h2o_c) - kC_R253/sqrt(kEQ_R253*kM_R253_M_dutp_c*kM_R253_M_h2o_c/kM_R253_M_h_c/kM_R253_M_ppi_c/kM_R253_M_dump_c)*(M_h_c/kM_R253_M_h_c)*(M_ppi_c/kM_R253_M_ppi_c)*(M_dump_c/kM_R253_M_dump_c))/((1 + M_dutp_c/kM_R253_M_dutp_c)*(1 + M_h2o_c/kM_R253_M_h2o_c) + (1 + M_h_c/kM_R253_M_h_c)*(1 + M_ppi_c/kM_R253_M_ppi_c)*(1 + M_dump_c/kM_R253_M_dump_c) - 1);
    u_R253 = NaN; kC_R253 = 0.8475; kEQ_R253 = 9537000; kM_R253_M_h_c = 0.2556; kM_R253_M_dutp_c = 0.03912; kM_R253_M_ppi_c = 0.2556; kM_R253_M_h2o_c = 0.03912; kM_R253_M_dump_c = 0.2556;
  R_NTP5: M_ctp_c + M_h2o_c => M_h_c + M_pi_c + M_cdp_c; u_R254*(kC_R254*sqrt(kEQ_R254*kM_R254_M_ctp_c*kM_R254_M_h2o_c/kM_R254_M_h_c/kM_R254_M_pi_c/kM_R254_M_cdp_c)*(M_ctp_c/kM_R254_M_ctp_c)*(M_h2o_c/kM_R254_M_h2o_c) - kC_R254/sqrt(kEQ_R254*kM_R254_M_ctp_c*kM_R254_M_h2o_c/kM_R254_M_h_c/kM_R254_M_pi_c/kM_R254_M_cdp_c)*(M_h_c/kM_R254_M_h_c)*(M_pi_c/kM_R254_M_pi_c)*(M_cdp_c/kM_R254_M_cdp_c))/((1 + M_ctp_c/kM_R254_M_ctp_c)*(1 + M_h2o_c/kM_R254_M_h2o_c) + (1 + M_h_c/kM_R254_M_h_c)*(1 + M_pi_c/kM_R254_M_pi_c)*(1 + M_cdp_c/kM_R254_M_cdp_c) - 1);
    u_R254 = NaN; kC_R254 = 26.02; kEQ_R254 = 86010; kM_R254_M_h_c = 0.8254; kM_R254_M_ctp_c = 0.01212; kM_R254_M_pi_c = 0.8254; kM_R254_M_h2o_c = 0.01212; kM_R254_M_cdp_c = 0.8254;
  R_FORt2pp: M_h_p + M_for_p => M_h_c + M_for_c; u_R255*(kC_R255*sqrt(kEQ_R255*kM_R255_M_h_p*kM_R255_M_for_p/kM_R255_M_h_c/kM_R255_M_for_c)*(M_h_p/kM_R255_M_h_p)*(M_for_p/kM_R255_M_for_p) - kC_R255/sqrt(kEQ_R255*kM_R255_M_h_p*kM_R255_M_for_p/kM_R255_M_h_c/kM_R255_M_for_c)*(M_h_c/kM_R255_M_h_c)*(M_for_c/kM_R255_M_for_c))/((1 + M_h_p/kM_R255_M_h_p)*(1 + M_for_p/kM_R255_M_for_p) + (1 + M_h_c/kM_R255_M_h_c)*(1 + M_for_c/kM_R255_M_for_c) - 1);
    u_R255 = NaN; kC_R255 = 10; kEQ_R255 = 1.119; kM_R255_M_h_c = 0.1015; kM_R255_M_h_p = 0.09849; kM_R255_M_for_p = 0.09849; kM_R255_M_for_c = 0.1015;
  R_EX_etoh_e: M_etoh_e => ; u_R256*(kC_R256*sqrt(kEQ_R256*kM_R256_M_etoh_e)*(M_etoh_e/kM_R256_M_etoh_e) - kC_R256/sqrt(kEQ_R256*kM_R256_M_etoh_e))/(1 + M_etoh_e/kM_R256_M_etoh_e + (-1));
    u_R256 = NaN; kC_R256 = 10; kEQ_R256 = 0.01609; kM_R256_M_etoh_e = 0.4315;
  R_GLNS: M_nh4_c + M_atp_c + M_glu__L_c => M_h_c + M_adp_c + M_pi_c + M_gln__L_c; u_R257*(kC_R257*sqrt(kEQ_R257*kM_R257_M_nh4_c*kM_R257_M_atp_c*kM_R257_M_glu__L_c/kM_R257_M_h_c/kM_R257_M_adp_c/kM_R257_M_pi_c/kM_R257_M_gln__L_c)*(M_nh4_c/kM_R257_M_nh4_c)*(M_atp_c/kM_R257_M_atp_c)*(M_glu__L_c/kM_R257_M_glu__L_c) - kC_R257/sqrt(kEQ_R257*kM_R257_M_nh4_c*kM_R257_M_atp_c*kM_R257_M_glu__L_c/kM_R257_M_h_c/kM_R257_M_adp_c/kM_R257_M_pi_c/kM_R257_M_gln__L_c)*(M_h_c/kM_R257_M_h_c)*(M_adp_c/kM_R257_M_adp_c)*(M_pi_c/kM_R257_M_pi_c)*(M_gln__L_c/kM_R257_M_gln__L_c))/((1 + M_nh4_c/kM_R257_M_nh4_c)*(1 + M_atp_c/kM_R257_M_atp_c)*(1 + M_glu__L_c/kM_R257_M_glu__L_c) + (1 + M_h_c/kM_R257_M_h_c)*(1 + M_adp_c/kM_R257_M_adp_c)*(1 + M_pi_c/kM_R257_M_pi_c)*(1 + M_gln__L_c/kM_R257_M_gln__L_c) - 1);
    u_R257 = NaN; kC_R257 = 31.53; kEQ_R257 = 722.4; kM_R257_M_h_c = 0.7564; kM_R257_M_adp_c = 0.7564; kM_R257_M_nh4_c = 0.01322; kM_R257_M_pi_c = 0.7564; kM_R257_M_atp_c = 0.04766; kM_R257_M_glu__L_c = 5.306; kM_R257_M_gln__L_c = 0.7564;
  R_ACGS: M_accoa_c + M_glu__L_c => M_h_c + M_acglu_c + M_coa_c; u_R258*(kC_R258*sqrt(kEQ_R258*kM_R258_M_accoa_c*kM_R258_M_glu__L_c/kM_R258_M_h_c/kM_R258_M_acglu_c/kM_R258_M_coa_c)*(M_accoa_c/kM_R258_M_accoa_c)*(M_glu__L_c/kM_R258_M_glu__L_c) - kC_R258/sqrt(kEQ_R258*kM_R258_M_accoa_c*kM_R258_M_glu__L_c/kM_R258_M_h_c/kM_R258_M_acglu_c/kM_R258_M_coa_c)*(M_h_c/kM_R258_M_h_c)*(M_acglu_c/kM_R258_M_acglu_c)*(M_coa_c/kM_R258_M_coa_c))/((1 + M_accoa_c/kM_R258_M_accoa_c)*(1 + M_glu__L_c/kM_R258_M_glu__L_c) + (1 + M_h_c/kM_R258_M_h_c)*(1 + M_acglu_c/kM_R258_M_acglu_c)*(1 + M_coa_c/kM_R258_M_coa_c) - 1);
    u_R258 = NaN; kC_R258 = 41.38; kEQ_R258 = 11100; kM_R258_M_h_c = 0.8179; kM_R258_M_accoa_c = 0.01223; kM_R258_M_glu__L_c = 0.01223; kM_R258_M_acglu_c = 0.8179; kM_R258_M_coa_c = 0.8179;
  R_SUCOAS: M_atp_c + M_succ_c + M_coa_c -> M_adp_c + M_pi_c + M_succoa_c; u_R259*(kC_R259*sqrt(kEQ_R259*kM_R259_M_atp_c*kM_R259_M_succ_c*kM_R259_M_coa_c/kM_R259_M_adp_c/kM_R259_M_pi_c/kM_R259_M_succoa_c)*(M_atp_c/kM_R259_M_atp_c)*(M_succ_c/kM_R259_M_succ_c)*(M_coa_c/kM_R259_M_coa_c) - kC_R259/sqrt(kEQ_R259*kM_R259_M_atp_c*kM_R259_M_succ_c*kM_R259_M_coa_c/kM_R259_M_adp_c/kM_R259_M_pi_c/kM_R259_M_succoa_c)*(M_adp_c/kM_R259_M_adp_c)*(M_pi_c/kM_R259_M_pi_c)*(M_succoa_c/kM_R259_M_succoa_c))/((1 + M_atp_c/kM_R259_M_atp_c)*(1 + M_succ_c/kM_R259_M_succ_c)*(1 + M_coa_c/kM_R259_M_coa_c) + (1 + M_adp_c/kM_R259_M_adp_c)*(1 + M_pi_c/kM_R259_M_pi_c)*(1 + M_succoa_c/kM_R259_M_succoa_c) - 1);
    u_R259 = NaN; kC_R259 = 10.36; kEQ_R259 = 1.488; kM_R259_M_adp_c = 0.0807; kM_R259_M_pi_c = 0.0807; kM_R259_M_atp_c = 0.01224; kM_R259_M_succ_c = 0.1239; kM_R259_M_coa_c = 8.028; kM_R259_M_succoa_c = 0.0807;
  R_PRAIS: M_fpram_c + M_atp_c => 2 M_h_c + M_adp_c + M_air_c + M_pi_c; u_R260*(kC_R260*sqrt(kEQ_R260*kM_R260_M_fpram_c*kM_R260_M_atp_c/kM_R260_M_h_c^2/kM_R260_M_adp_c/kM_R260_M_air_c/kM_R260_M_pi_c)*(M_fpram_c/kM_R260_M_fpram_c)*(M_atp_c/kM_R260_M_atp_c) - kC_R260/sqrt(kEQ_R260*kM_R260_M_fpram_c*kM_R260_M_atp_c/kM_R260_M_h_c^2/kM_R260_M_adp_c/kM_R260_M_air_c/kM_R260_M_pi_c)*(M_h_c/kM_R260_M_h_c)^2*(M_adp_c/kM_R260_M_adp_c)*(M_air_c/kM_R260_M_air_c)*(M_pi_c/kM_R260_M_pi_c))/((1 + M_fpram_c/kM_R260_M_fpram_c)*(1 + M_atp_c/kM_R260_M_atp_c) + (1 + M_h_c/kM_R260_M_h_c)^2*(1 + M_adp_c/kM_R260_M_adp_c)*(1 + M_air_c/kM_R260_M_air_c)*(1 + M_pi_c/kM_R260_M_pi_c) - 1);
    u_R260 = NaN; kC_R260 = 10; kEQ_R260 = 5.185; kM_R260_M_fpram_c = 0.05017; kM_R260_M_h_c = 0.3973; kM_R260_M_adp_c = 0.1993; kM_R260_M_air_c = 0.1993; kM_R260_M_pi_c = 0.1993; kM_R260_M_atp_c = 0.05017;
  R_AACPS8: M_dca_c + M_atp_c + M_ACP_c => M_ppi_c + M_dcaACP_c + M_amp_c; u_R261*(kC_R261*sqrt(kEQ_R261*kM_R261_M_dca_c*kM_R261_M_atp_c*kM_R261_M_ACP_c/kM_R261_M_ppi_c/kM_R261_M_dcaACP_c/kM_R261_M_amp_c)*(M_dca_c/kM_R261_M_dca_c)*(M_atp_c/kM_R261_M_atp_c)*(M_ACP_c/kM_R261_M_ACP_c) - kC_R261/sqrt(kEQ_R261*kM_R261_M_dca_c*kM_R261_M_atp_c*kM_R261_M_ACP_c/kM_R261_M_ppi_c/kM_R261_M_dcaACP_c/kM_R261_M_amp_c)*(M_ppi_c/kM_R261_M_ppi_c)*(M_dcaACP_c/kM_R261_M_dcaACP_c)*(M_amp_c/kM_R261_M_amp_c))/((1 + M_dca_c/kM_R261_M_dca_c)*(1 + M_atp_c/kM_R261_M_atp_c)*(1 + M_ACP_c/kM_R261_M_ACP_c) + (1 + M_ppi_c/kM_R261_M_ppi_c)*(1 + M_dcaACP_c/kM_R261_M_dcaACP_c)*(1 + M_amp_c/kM_R261_M_amp_c) - 1);
    u_R261 = NaN; kC_R261 = 10; kEQ_R261 = 5529; kM_R261_M_dca_c = 0.03998; kM_R261_M_atp_c = 0.03998; kM_R261_M_ppi_c = 0.2501; kM_R261_M_dcaACP_c = 0.2501; kM_R261_M_amp_c = 0.2501; kM_R261_M_ACP_c = 0.03998;
  R_AACPS9: M_octa_c + M_atp_c + M_ACP_c => M_ppi_c + M_ocACP_c + M_amp_c; u_R262*(kC_R262*sqrt(kEQ_R262*kM_R262_M_octa_c*kM_R262_M_atp_c*kM_R262_M_ACP_c/kM_R262_M_ppi_c/kM_R262_M_ocACP_c/kM_R262_M_amp_c)*(M_octa_c/kM_R262_M_octa_c)*(M_atp_c/kM_R262_M_atp_c)*(M_ACP_c/kM_R262_M_ACP_c) - kC_R262/sqrt(kEQ_R262*kM_R262_M_octa_c*kM_R262_M_atp_c*kM_R262_M_ACP_c/kM_R262_M_ppi_c/kM_R262_M_ocACP_c/kM_R262_M_amp_c)*(M_ppi_c/kM_R262_M_ppi_c)*(M_ocACP_c/kM_R262_M_ocACP_c)*(M_amp_c/kM_R262_M_amp_c))/((1 + M_octa_c/kM_R262_M_octa_c)*(1 + M_atp_c/kM_R262_M_atp_c)*(1 + M_ACP_c/kM_R262_M_ACP_c) + (1 + M_ppi_c/kM_R262_M_ppi_c)*(1 + M_ocACP_c/kM_R262_M_ocACP_c)*(1 + M_amp_c/kM_R262_M_amp_c) - 1);
    u_R262 = NaN; kC_R262 = 10; kEQ_R262 = 5521; kM_R262_M_octa_c = 0.03998; kM_R262_M_atp_c = 0.03998; kM_R262_M_ppi_c = 0.2501; kM_R262_M_ocACP_c = 0.2501; kM_R262_M_amp_c = 0.2501; kM_R262_M_ACP_c = 0.03998;
  R_AACPS6: M_ocdca_c + M_atp_c + M_ACP_c => M_ppi_c + M_ocdcaACP_c + M_amp_c; u_R263*(kC_R263*sqrt(kEQ_R263*kM_R263_M_ocdca_c*kM_R263_M_atp_c*kM_R263_M_ACP_c/kM_R263_M_ppi_c/kM_R263_M_ocdcaACP_c/kM_R263_M_amp_c)*(M_ocdca_c/kM_R263_M_ocdca_c)*(M_atp_c/kM_R263_M_atp_c)*(M_ACP_c/kM_R263_M_ACP_c) - kC_R263/sqrt(kEQ_R263*kM_R263_M_ocdca_c*kM_R263_M_atp_c*kM_R263_M_ACP_c/kM_R263_M_ppi_c/kM_R263_M_ocdcaACP_c/kM_R263_M_amp_c)*(M_ppi_c/kM_R263_M_ppi_c)*(M_ocdcaACP_c/kM_R263_M_ocdcaACP_c)*(M_amp_c/kM_R263_M_amp_c))/((1 + M_ocdca_c/kM_R263_M_ocdca_c)*(1 + M_atp_c/kM_R263_M_atp_c)*(1 + M_ACP_c/kM_R263_M_ACP_c) + (1 + M_ppi_c/kM_R263_M_ppi_c)*(1 + M_ocdcaACP_c/kM_R263_M_ocdcaACP_c)*(1 + M_amp_c/kM_R263_M_amp_c) - 1);
    u_R263 = NaN; kC_R263 = 10; kEQ_R263 = 300.9; kM_R263_M_ocdca_c = 0.05449; kM_R263_M_atp_c = 0.05449; kM_R263_M_ppi_c = 0.1835; kM_R263_M_ocdcaACP_c = 0.1835; kM_R263_M_amp_c = 0.1835; kM_R263_M_ACP_c = 0.05449;
  R_AACPS7: M_atp_c + M_ddca_c + M_ACP_c => M_ppi_c + M_ddcaACP_c + M_amp_c; u_R264*(kC_R264*sqrt(kEQ_R264*kM_R264_M_atp_c*kM_R264_M_ddca_c*kM_R264_M_ACP_c/kM_R264_M_ppi_c/kM_R264_M_ddcaACP_c/kM_R264_M_amp_c)*(M_atp_c/kM_R264_M_atp_c)*(M_ddca_c/kM_R264_M_ddca_c)*(M_ACP_c/kM_R264_M_ACP_c) - kC_R264/sqrt(kEQ_R264*kM_R264_M_atp_c*kM_R264_M_ddca_c*kM_R264_M_ACP_c/kM_R264_M_ppi_c/kM_R264_M_ddcaACP_c/kM_R264_M_amp_c)*(M_ppi_c/kM_R264_M_ppi_c)*(M_ddcaACP_c/kM_R264_M_ddcaACP_c)*(M_amp_c/kM_R264_M_amp_c))/((1 + M_atp_c/kM_R264_M_atp_c)*(1 + M_ddca_c/kM_R264_M_ddca_c)*(1 + M_ACP_c/kM_R264_M_ACP_c) + (1 + M_ppi_c/kM_R264_M_ppi_c)*(1 + M_ddcaACP_c/kM_R264_M_ddcaACP_c)*(1 + M_amp_c/kM_R264_M_amp_c) - 1);
    u_R264 = NaN; kC_R264 = 10; kEQ_R264 = 5537; kM_R264_M_atp_c = 0.03997; kM_R264_M_ppi_c = 0.2502; kM_R264_M_ddcaACP_c = 0.2502; kM_R264_M_ddca_c = 0.03997; kM_R264_M_amp_c = 0.2502; kM_R264_M_ACP_c = 0.03997;
  R_HISTP: M_hisp_c + M_h2o_c => M_pi_c + M_histd_c; u_R265*(kC_R265*sqrt(kEQ_R265*kM_R265_M_hisp_c*kM_R265_M_h2o_c/kM_R265_M_pi_c/kM_R265_M_histd_c)*(M_hisp_c/kM_R265_M_hisp_c)*(M_h2o_c/kM_R265_M_h2o_c) - kC_R265/sqrt(kEQ_R265*kM_R265_M_hisp_c*kM_R265_M_h2o_c/kM_R265_M_pi_c/kM_R265_M_histd_c)*(M_pi_c/kM_R265_M_pi_c)*(M_histd_c/kM_R265_M_histd_c))/((1 + M_hisp_c/kM_R265_M_hisp_c)*(1 + M_h2o_c/kM_R265_M_h2o_c) + (1 + M_pi_c/kM_R265_M_pi_c)*(1 + M_histd_c/kM_R265_M_histd_c) - 1);
    u_R265 = NaN; kC_R265 = 6.229; kEQ_R265 = 2181; kM_R265_M_pi_c = 0.1486; kM_R265_M_hisp_c = 0.004326; kM_R265_M_h2o_c = 0.06729; kM_R265_M_histd_c = 0.1486;
  R_LDH_D: M_nad_c + M_lac__D_c -> M_h_c + M_pyr_c + M_nadh_c; u_R266*(kC_R266*sqrt(kEQ_R266*kM_R266_M_nad_c*kM_R266_M_lac__D_c/kM_R266_M_h_c/kM_R266_M_pyr_c/kM_R266_M_nadh_c)*(M_nad_c/kM_R266_M_nad_c)*(M_lac__D_c/kM_R266_M_lac__D_c) - kC_R266/sqrt(kEQ_R266*kM_R266_M_nad_c*kM_R266_M_lac__D_c/kM_R266_M_h_c/kM_R266_M_pyr_c/kM_R266_M_nadh_c)*(M_h_c/kM_R266_M_h_c)*(M_pyr_c/kM_R266_M_pyr_c)*(M_nadh_c/kM_R266_M_nadh_c))/((1 + M_nad_c/kM_R266_M_nad_c)*(1 + M_lac__D_c/kM_R266_M_lac__D_c) + (1 + M_h_c/kM_R266_M_h_c)*(1 + M_pyr_c/kM_R266_M_pyr_c)*(1 + M_nadh_c/kM_R266_M_nadh_c) - 1);
    u_R266 = NaN; kC_R266 = 5.173; kEQ_R266 = 0.0002626; kM_R266_M_h_c = 0.02487; kM_R266_M_nad_c = 0.4022; kM_R266_M_pyr_c = 0.02487; kM_R266_M_lac__D_c = 0.4022; kM_R266_M_nadh_c = 0.02487;
  R_KAS15: M_h_c + M_accoa_c + M_malACP_c => M_actACP_c + M_coa_c + M_co2_c; u_R267*(kC_R267*sqrt(kEQ_R267*kM_R267_M_h_c*kM_R267_M_accoa_c*kM_R267_M_malACP_c/kM_R267_M_actACP_c/kM_R267_M_coa_c/kM_R267_M_co2_c)*(M_h_c/kM_R267_M_h_c)*(M_accoa_c/kM_R267_M_accoa_c)*(M_malACP_c/kM_R267_M_malACP_c) - kC_R267/sqrt(kEQ_R267*kM_R267_M_h_c*kM_R267_M_accoa_c*kM_R267_M_malACP_c/kM_R267_M_actACP_c/kM_R267_M_coa_c/kM_R267_M_co2_c)*(M_actACP_c/kM_R267_M_actACP_c)*(M_coa_c/kM_R267_M_coa_c)*(M_co2_c/kM_R267_M_co2_c))/((1 + M_h_c/kM_R267_M_h_c)*(1 + M_accoa_c/kM_R267_M_accoa_c)*(1 + M_malACP_c/kM_R267_M_malACP_c) + (1 + M_actACP_c/kM_R267_M_actACP_c)*(1 + M_coa_c/kM_R267_M_coa_c)*(1 + M_co2_c/kM_R267_M_co2_c) - 1);
    u_R267 = NaN; kC_R267 = 8.616; kEQ_R267 = 1.526; kM_R267_M_h_c = 0.1501; kM_R267_M_actACP_c = 0.06661; kM_R267_M_accoa_c = 0.004066; kM_R267_M_malACP_c = 0.1501; kM_R267_M_coa_c = 0.06661; kM_R267_M_co2_c = 0.06661;
  R_T2DECAI: M_tdec2eACP_c -> M_cdec3eACP_c; u_R268*(kC_R268*sqrt(kEQ_R268*kM_R268_M_tdec2eACP_c/kM_R268_M_cdec3eACP_c)*(M_tdec2eACP_c/kM_R268_M_tdec2eACP_c) - kC_R268/sqrt(kEQ_R268*kM_R268_M_tdec2eACP_c/kM_R268_M_cdec3eACP_c)*(M_cdec3eACP_c/kM_R268_M_cdec3eACP_c))/(1 + M_tdec2eACP_c/kM_R268_M_tdec2eACP_c + 1 + M_cdec3eACP_c/kM_R268_M_cdec3eACP_c - 1);
    u_R268 = NaN; kC_R268 = 10; kEQ_R268 = 0.8899; kM_R268_M_tdec2eACP_c = 0.1022; kM_R268_M_cdec3eACP_c = 0.09786;
  R_3OAS161: M_h_c + M_tdeACP_c + M_malACP_c => M_3ocpalm9eACP_c + M_co2_c + M_ACP_c; u_R269*(kC_R269*sqrt(kEQ_R269*kM_R269_M_h_c*kM_R269_M_tdeACP_c*kM_R269_M_malACP_c/kM_R269_M_3ocpalm9eACP_c/kM_R269_M_co2_c/kM_R269_M_ACP_c)*(M_h_c/kM_R269_M_h_c)*(M_tdeACP_c/kM_R269_M_tdeACP_c)*(M_malACP_c/kM_R269_M_malACP_c) - kC_R269/sqrt(kEQ_R269*kM_R269_M_h_c*kM_R269_M_tdeACP_c*kM_R269_M_malACP_c/kM_R269_M_3ocpalm9eACP_c/kM_R269_M_co2_c/kM_R269_M_ACP_c)*(M_3ocpalm9eACP_c/kM_R269_M_3ocpalm9eACP_c)*(M_co2_c/kM_R269_M_co2_c)*(M_ACP_c/kM_R269_M_ACP_c))/((1 + M_h_c/kM_R269_M_h_c)*(1 + M_tdeACP_c/kM_R269_M_tdeACP_c)*(1 + M_malACP_c/kM_R269_M_malACP_c) + (1 + M_3ocpalm9eACP_c/kM_R269_M_3ocpalm9eACP_c)*(1 + M_co2_c/kM_R269_M_co2_c)*(1 + M_ACP_c/kM_R269_M_ACP_c) - 1);
    u_R269 = NaN; kC_R269 = 10; kEQ_R269 = 0.9248; kM_R269_M_h_c = 0.1008; kM_R269_M_tdeACP_c = 0.1008; kM_R269_M_3ocpalm9eACP_c = 0.09917; kM_R269_M_malACP_c = 0.1008; kM_R269_M_co2_c = 0.09917; kM_R269_M_ACP_c = 0.09917;
  R_DHQS: M_2dda7p_c => M_pi_c + M_3dhq_c; u_R270*(kC_R270*sqrt(kEQ_R270*kM_R270_M_2dda7p_c/kM_R270_M_pi_c/kM_R270_M_3dhq_c)*(M_2dda7p_c/kM_R270_M_2dda7p_c) - kC_R270/sqrt(kEQ_R270*kM_R270_M_2dda7p_c/kM_R270_M_pi_c/kM_R270_M_3dhq_c)*(M_pi_c/kM_R270_M_pi_c)*(M_3dhq_c/kM_R270_M_3dhq_c))/(1 + M_2dda7p_c/kM_R270_M_2dda7p_c + (1 + M_pi_c/kM_R270_M_pi_c)*(1 + M_3dhq_c/kM_R270_M_3dhq_c) - 1);
    u_R270 = NaN; kC_R270 = 14.36; kEQ_R270 = 2.211; kM_R270_M_pi_c = 0.09036; kM_R270_M_3dhq_c = 0.09036; kM_R270_M_2dda7p_c = 0.0005624;
  R_EAR161x: M_h_c + M_t3c9palmeACP_c + M_nadh_c => M_nad_c + M_hdeACP_c; u_R271*(kC_R271*sqrt(kEQ_R271*kM_R271_M_h_c*kM_R271_M_t3c9palmeACP_c*kM_R271_M_nadh_c/kM_R271_M_nad_c/kM_R271_M_hdeACP_c)*(M_h_c/kM_R271_M_h_c)*(M_t3c9palmeACP_c/kM_R271_M_t3c9palmeACP_c)*(M_nadh_c/kM_R271_M_nadh_c) - kC_R271/sqrt(kEQ_R271*kM_R271_M_h_c*kM_R271_M_t3c9palmeACP_c*kM_R271_M_nadh_c/kM_R271_M_nad_c/kM_R271_M_hdeACP_c)*(M_nad_c/kM_R271_M_nad_c)*(M_hdeACP_c/kM_R271_M_hdeACP_c))/((1 + M_h_c/kM_R271_M_h_c)*(1 + M_t3c9palmeACP_c/kM_R271_M_t3c9palmeACP_c)*(1 + M_nadh_c/kM_R271_M_nadh_c) + (1 + M_nad_c/kM_R271_M_nad_c)*(1 + M_hdeACP_c/kM_R271_M_hdeACP_c) - 1);
    u_R271 = NaN; kC_R271 = 10; kEQ_R271 = 1.148; kM_R271_M_h_c = 0.1294; kM_R271_M_t3c9palmeACP_c = 0.1294; kM_R271_M_nad_c = 0.07728; kM_R271_M_hdeACP_c = 0.07728; kM_R271_M_nadh_c = 0.1294;
  R_PGCD: M_3pg_c + M_nad_c => M_h_c + M_nadh_c + M_3php_c; u_R272*(kC_R272*sqrt(kEQ_R272*kM_R272_M_3pg_c*kM_R272_M_nad_c/kM_R272_M_h_c/kM_R272_M_nadh_c/kM_R272_M_3php_c)*(M_3pg_c/kM_R272_M_3pg_c)*(M_nad_c/kM_R272_M_nad_c) - kC_R272/sqrt(kEQ_R272*kM_R272_M_3pg_c*kM_R272_M_nad_c/kM_R272_M_h_c/kM_R272_M_nadh_c/kM_R272_M_3php_c)*(M_h_c/kM_R272_M_h_c)*(M_nadh_c/kM_R272_M_nadh_c)*(M_3php_c/kM_R272_M_3php_c))/((1 + M_3pg_c/kM_R272_M_3pg_c)*(1 + M_nad_c/kM_R272_M_nad_c) + (1 + M_h_c/kM_R272_M_h_c)*(1 + M_nadh_c/kM_R272_M_nadh_c)*(1 + M_3php_c/kM_R272_M_3php_c) - 1);
    u_R272 = NaN; kC_R272 = 10.82; kEQ_R272 = 4.015e-6; kM_R272_M_h_c = 0.05428; kM_R272_M_3pg_c = 11.41; kM_R272_M_nad_c = 0.0004843; kM_R272_M_nadh_c = 0.05428; kM_R272_M_3php_c = 8.412e-5;
  R_MALtex: M_mal__L_e -> M_mal__L_p; u_R273*(kC_R273*sqrt(kEQ_R273*kM_R273_M_mal__L_e/kM_R273_M_mal__L_p)*(M_mal__L_e/kM_R273_M_mal__L_e) - kC_R273/sqrt(kEQ_R273*kM_R273_M_mal__L_e/kM_R273_M_mal__L_p)*(M_mal__L_p/kM_R273_M_mal__L_p))/(1 + M_mal__L_e/kM_R273_M_mal__L_e + 1 + M_mal__L_p/kM_R273_M_mal__L_p - 1);
    u_R273 = NaN; kC_R273 = 10; kEQ_R273 = 17.04; kM_R273_M_mal__L_p = 0.1691; kM_R273_M_mal__L_e = 0.05915;
  R_3OAS141: M_h_c + M_cddec5eACP_c + M_malACP_c => M_co2_c + M_3ocmrs7eACP_c + M_ACP_c; u_R274*(kC_R274*sqrt(kEQ_R274*kM_R274_M_h_c*kM_R274_M_cddec5eACP_c*kM_R274_M_malACP_c/kM_R274_M_co2_c/kM_R274_M_3ocmrs7eACP_c/kM_R274_M_ACP_c)*(M_h_c/kM_R274_M_h_c)*(M_cddec5eACP_c/kM_R274_M_cddec5eACP_c)*(M_malACP_c/kM_R274_M_malACP_c) - kC_R274/sqrt(kEQ_R274*kM_R274_M_h_c*kM_R274_M_cddec5eACP_c*kM_R274_M_malACP_c/kM_R274_M_co2_c/kM_R274_M_3ocmrs7eACP_c/kM_R274_M_ACP_c)*(M_co2_c/kM_R274_M_co2_c)*(M_3ocmrs7eACP_c/kM_R274_M_3ocmrs7eACP_c)*(M_ACP_c/kM_R274_M_ACP_c))/((1 + M_h_c/kM_R274_M_h_c)*(1 + M_cddec5eACP_c/kM_R274_M_cddec5eACP_c)*(1 + M_malACP_c/kM_R274_M_malACP_c) + (1 + M_co2_c/kM_R274_M_co2_c)*(1 + M_3ocmrs7eACP_c/kM_R274_M_3ocmrs7eACP_c)*(1 + M_ACP_c/kM_R274_M_ACP_c) - 1);
    u_R274 = NaN; kC_R274 = 10; kEQ_R274 = 0.901; kM_R274_M_h_c = 0.1011; kM_R274_M_cddec5eACP_c = 0.1011; kM_R274_M_malACP_c = 0.1011; kM_R274_M_co2_c = 0.0989; kM_R274_M_3ocmrs7eACP_c = 0.0989; kM_R274_M_ACP_c = 0.0989;
  R_3OAR121: M_3ocddec5eACP_c + M_h_c + M_nadph_c => M_nadp_c + M_3hcddec5eACP_c; u_R275*(kC_R275*sqrt(kEQ_R275*kM_R275_M_3ocddec5eACP_c*kM_R275_M_h_c*kM_R275_M_nadph_c/kM_R275_M_nadp_c/kM_R275_M_3hcddec5eACP_c)*(M_3ocddec5eACP_c/kM_R275_M_3ocddec5eACP_c)*(M_h_c/kM_R275_M_h_c)*(M_nadph_c/kM_R275_M_nadph_c) - kC_R275/sqrt(kEQ_R275*kM_R275_M_3ocddec5eACP_c*kM_R275_M_h_c*kM_R275_M_nadph_c/kM_R275_M_nadp_c/kM_R275_M_3hcddec5eACP_c)*(M_nadp_c/kM_R275_M_nadp_c)*(M_3hcddec5eACP_c/kM_R275_M_3hcddec5eACP_c))/((1 + M_3ocddec5eACP_c/kM_R275_M_3ocddec5eACP_c)*(1 + M_h_c/kM_R275_M_h_c)*(1 + M_nadph_c/kM_R275_M_nadph_c) + (1 + M_nadp_c/kM_R275_M_nadp_c)*(1 + M_3hcddec5eACP_c/kM_R275_M_3hcddec5eACP_c) - 1);
    u_R275 = NaN; kC_R275 = 10; kEQ_R275 = 1.076; kM_R275_M_3ocddec5eACP_c = 0.1304; kM_R275_M_h_c = 0.1304; kM_R275_M_nadp_c = 0.07669; kM_R275_M_3hcddec5eACP_c = 0.07669; kM_R275_M_nadph_c = 0.1304;
  R_ADSL1r: M_dcamp_c -> M_fum_c + M_amp_c; u_R276*(kC_R276*sqrt(kEQ_R276*kM_R276_M_dcamp_c/kM_R276_M_fum_c/kM_R276_M_amp_c)*(M_dcamp_c/kM_R276_M_dcamp_c) - kC_R276/sqrt(kEQ_R276*kM_R276_M_dcamp_c/kM_R276_M_fum_c/kM_R276_M_amp_c)*(M_fum_c/kM_R276_M_fum_c)*(M_amp_c/kM_R276_M_amp_c))/(1 + M_dcamp_c/kM_R276_M_dcamp_c + (1 + M_fum_c/kM_R276_M_fum_c)*(1 + M_amp_c/kM_R276_M_amp_c) - 1);
    u_R276 = NaN; kC_R276 = 1.434; kEQ_R276 = 0.001407; kM_R276_M_fum_c = 0.0294; kM_R276_M_amp_c = 0.0294; kM_R276_M_dcamp_c = 0.3402;
  R_AICART: M_10fthf_c + M_aicar_c -> M_thf_c + M_fprica_c; u_R277*(kC_R277*sqrt(kEQ_R277*kM_R277_M_10fthf_c*kM_R277_M_aicar_c/kM_R277_M_thf_c/kM_R277_M_fprica_c)*(M_10fthf_c/kM_R277_M_10fthf_c)*(M_aicar_c/kM_R277_M_aicar_c) - kC_R277/sqrt(kEQ_R277*kM_R277_M_10fthf_c*kM_R277_M_aicar_c/kM_R277_M_thf_c/kM_R277_M_fprica_c)*(M_thf_c/kM_R277_M_thf_c)*(M_fprica_c/kM_R277_M_fprica_c))/((1 + M_10fthf_c/kM_R277_M_10fthf_c)*(1 + M_aicar_c/kM_R277_M_aicar_c) + (1 + M_thf_c/kM_R277_M_thf_c)*(1 + M_fprica_c/kM_R277_M_fprica_c) - 1);
    u_R277 = NaN; kC_R277 = 3.361; kEQ_R277 = 0.005067; kM_R277_M_10fthf_c = 0.2245; kM_R277_M_aicar_c = 0.2245; kM_R277_M_thf_c = 0.04454; kM_R277_M_fprica_c = 0.04454;
  R_D_LACt2pp: M_h_p + M_lac__D_p -> M_h_c + M_lac__D_c; u_R278*(kC_R278*sqrt(kEQ_R278*kM_R278_M_h_p*kM_R278_M_lac__D_p/kM_R278_M_h_c/kM_R278_M_lac__D_c)*(M_h_p/kM_R278_M_h_p)*(M_lac__D_p/kM_R278_M_lac__D_p) - kC_R278/sqrt(kEQ_R278*kM_R278_M_h_p*kM_R278_M_lac__D_p/kM_R278_M_h_c/kM_R278_M_lac__D_c)*(M_h_c/kM_R278_M_h_c)*(M_lac__D_c/kM_R278_M_lac__D_c))/((1 + M_h_p/kM_R278_M_h_p)*(1 + M_lac__D_p/kM_R278_M_lac__D_p) + (1 + M_h_c/kM_R278_M_h_c)*(1 + M_lac__D_c/kM_R278_M_lac__D_c) - 1);
    u_R278 = NaN; kC_R278 = 10; kEQ_R278 = 53.79; kM_R278_M_h_c = 0.1714; kM_R278_M_h_p = 0.05836; kM_R278_M_lac__D_p = 0.05836; kM_R278_M_lac__D_c = 0.1714;
  R_RIBtex: M_rib__D_e -> M_rib__D_p; u_R279*(kC_R279*sqrt(kEQ_R279*kM_R279_M_rib__D_e/kM_R279_M_rib__D_p)*(M_rib__D_e/kM_R279_M_rib__D_e) - kC_R279/sqrt(kEQ_R279*kM_R279_M_rib__D_e/kM_R279_M_rib__D_p)*(M_rib__D_p/kM_R279_M_rib__D_p))/(1 + M_rib__D_e/kM_R279_M_rib__D_e + 1 + M_rib__D_p/kM_R279_M_rib__D_p - 1);
    u_R279 = NaN; kC_R279 = 10; kEQ_R279 = 4.444; kM_R279_M_rib__D_p = 0.1318; kM_R279_M_rib__D_e = 0.07586;
  R_FRUpts2pp: M_pep_c + M_fru_p => M_f6p_c + M_pyr_c; u_R280*(kC_R280*sqrt(kEQ_R280*kM_R280_M_pep_c*kM_R280_M_fru_p/kM_R280_M_f6p_c/kM_R280_M_pyr_c)*(M_pep_c/kM_R280_M_pep_c)*(M_fru_p/kM_R280_M_fru_p) - kC_R280/sqrt(kEQ_R280*kM_R280_M_pep_c*kM_R280_M_fru_p/kM_R280_M_f6p_c/kM_R280_M_pyr_c)*(M_f6p_c/kM_R280_M_f6p_c)*(M_pyr_c/kM_R280_M_pyr_c))/((1 + M_pep_c/kM_R280_M_pep_c)*(1 + M_fru_p/kM_R280_M_fru_p) + (1 + M_f6p_c/kM_R280_M_f6p_c)*(1 + M_pyr_c/kM_R280_M_pyr_c) - 1);
    u_R280 = NaN; kC_R280 = 10; kEQ_R280 = 0.5006; kM_R280_M_pep_c = 0.1098; kM_R280_M_fru_p = 0.1098; kM_R280_M_f6p_c = 0.09107; kM_R280_M_pyr_c = 0.09107;
  R_FORtex: M_for_e -> M_for_p; u_R281*(kC_R281*sqrt(kEQ_R281*kM_R281_M_for_e/kM_R281_M_for_p)*(M_for_e/kM_R281_M_for_e) - kC_R281/sqrt(kEQ_R281*kM_R281_M_for_e/kM_R281_M_for_p)*(M_for_p/kM_R281_M_for_p))/(1 + M_for_e/kM_R281_M_for_e + 1 + M_for_p/kM_R281_M_for_p - 1);
    u_R281 = NaN; kC_R281 = 10; kEQ_R281 = 0.4124; kM_R281_M_for_p = 0.08487; kM_R281_M_for_e = 0.1178;
  R_PFK: M_atp_c + M_f6p_c => M_h_c + M_adp_c + M_fdp_c; u_R282*(kC_R282*sqrt(kEQ_R282*kM_R282_M_atp_c*kM_R282_M_f6p_c/kM_R282_M_h_c/kM_R282_M_adp_c/kM_R282_M_fdp_c)*(M_atp_c/kM_R282_M_atp_c)*(M_f6p_c/kM_R282_M_f6p_c) - kC_R282/sqrt(kEQ_R282*kM_R282_M_atp_c*kM_R282_M_f6p_c/kM_R282_M_h_c/kM_R282_M_adp_c/kM_R282_M_fdp_c)*(M_h_c/kM_R282_M_h_c)*(M_adp_c/kM_R282_M_adp_c)*(M_fdp_c/kM_R282_M_fdp_c))/((1 + M_atp_c/kM_R282_M_atp_c)*(1 + M_f6p_c/kM_R282_M_f6p_c) + (1 + M_h_c/kM_R282_M_h_c)*(1 + M_adp_c/kM_R282_M_adp_c)*(1 + M_fdp_c/kM_R282_M_fdp_c) - 1);
    u_R282 = NaN; kC_R282 = 10; kEQ_R282 = 1.267; kM_R282_M_h_c = 0.1353; kM_R282_M_adp_c = 0.1353; kM_R282_M_atp_c = 0.07391; kM_R282_M_fdp_c = 0.1353; kM_R282_M_f6p_c = 0.07391;
  R_PGM: M_2pg_c -> M_3pg_c; u_R283*(kC_R283*sqrt(kEQ_R283*kM_R283_M_2pg_c/kM_R283_M_3pg_c)*(M_2pg_c/kM_R283_M_2pg_c) - kC_R283/sqrt(kEQ_R283*kM_R283_M_2pg_c/kM_R283_M_3pg_c)*(M_3pg_c/kM_R283_M_3pg_c))/(1 + M_2pg_c/kM_R283_M_2pg_c + 1 + M_3pg_c/kM_R283_M_3pg_c - 1);
    u_R283 = NaN; kC_R283 = 90.71; kEQ_R283 = 6.18; kM_R283_M_2pg_c = 0.05644; kM_R283_M_3pg_c = 0.1772;
  R_CYTBO3_4pp: 4 M_h_c + 0.5 M_o2_c + M_q8h2_c => 4 M_h_p + M_h2o_c + M_q8_c; u_R284*(kC_R284*sqrt(kEQ_R284*kM_R284_M_h_c^4*kM_R284_M_o2_c^5e-1*kM_R284_M_q8h2_c/kM_R284_M_h_p^4/kM_R284_M_h2o_c/kM_R284_M_q8_c)*(M_h_c/kM_R284_M_h_c)^4*(M_o2_c/kM_R284_M_o2_c)^5e-1*(M_q8h2_c/kM_R284_M_q8h2_c) - kC_R284/sqrt(kEQ_R284*kM_R284_M_h_c^4*kM_R284_M_o2_c^5e-1*kM_R284_M_q8h2_c/kM_R284_M_h_p^4/kM_R284_M_h2o_c/kM_R284_M_q8_c)*(M_h_p/kM_R284_M_h_p)^4*(M_h2o_c/kM_R284_M_h2o_c)*(M_q8_c/kM_R284_M_q8_c))/((1 + M_h_c/kM_R284_M_h_c)^4*(1 + M_o2_c/kM_R284_M_o2_c)^5e-1*(1 + M_q8h2_c/kM_R284_M_q8h2_c) + (1 + M_h_p/kM_R284_M_h_p)^4*(1 + M_h2o_c/kM_R284_M_h2o_c)*(1 + M_q8_c/kM_R284_M_q8_c) - 1);
    u_R284 = NaN; kC_R284 = 10; kEQ_R284 = 4.05; kM_R284_M_h_c = 0.08617; kM_R284_M_o2_c = 0.08617; kM_R284_M_h_p = 0.116; kM_R284_M_q8h2_c = 0.08617; kM_R284_M_h2o_c = 0.116; kM_R284_M_q8_c = 0.116;
  R_EAR141x: M_h_c + M_t3c7mrseACP_c + M_nadh_c => M_nad_c + M_tdeACP_c; u_R285*(kC_R285*sqrt(kEQ_R285*kM_R285_M_h_c*kM_R285_M_t3c7mrseACP_c*kM_R285_M_nadh_c/kM_R285_M_nad_c/kM_R285_M_tdeACP_c)*(M_h_c/kM_R285_M_h_c)*(M_t3c7mrseACP_c/kM_R285_M_t3c7mrseACP_c)*(M_nadh_c/kM_R285_M_nadh_c) - kC_R285/sqrt(kEQ_R285*kM_R285_M_h_c*kM_R285_M_t3c7mrseACP_c*kM_R285_M_nadh_c/kM_R285_M_nad_c/kM_R285_M_tdeACP_c)*(M_nad_c/kM_R285_M_nad_c)*(M_tdeACP_c/kM_R285_M_tdeACP_c))/((1 + M_h_c/kM_R285_M_h_c)*(1 + M_t3c7mrseACP_c/kM_R285_M_t3c7mrseACP_c)*(1 + M_nadh_c/kM_R285_M_nadh_c) + (1 + M_nad_c/kM_R285_M_nad_c)*(1 + M_tdeACP_c/kM_R285_M_tdeACP_c) - 1);
    u_R285 = NaN; kC_R285 = 10; kEQ_R285 = 1.11; kM_R285_M_h_c = 0.1299; kM_R285_M_nad_c = 0.07698; kM_R285_M_tdeACP_c = 0.07698; kM_R285_M_t3c7mrseACP_c = 0.1299; kM_R285_M_nadh_c = 0.1299;
  R_EAR181x: M_h_c + M_t3c11vaceACP_c + M_nadh_c => M_nad_c + M_octeACP_c; u_R286*(kC_R286*sqrt(kEQ_R286*kM_R286_M_h_c*kM_R286_M_t3c11vaceACP_c*kM_R286_M_nadh_c/kM_R286_M_nad_c/kM_R286_M_octeACP_c)*(M_h_c/kM_R286_M_h_c)*(M_t3c11vaceACP_c/kM_R286_M_t3c11vaceACP_c)*(M_nadh_c/kM_R286_M_nadh_c) - kC_R286/sqrt(kEQ_R286*kM_R286_M_h_c*kM_R286_M_t3c11vaceACP_c*kM_R286_M_nadh_c/kM_R286_M_nad_c/kM_R286_M_octeACP_c)*(M_nad_c/kM_R286_M_nad_c)*(M_octeACP_c/kM_R286_M_octeACP_c))/((1 + M_h_c/kM_R286_M_h_c)*(1 + M_t3c11vaceACP_c/kM_R286_M_t3c11vaceACP_c)*(1 + M_nadh_c/kM_R286_M_nadh_c) + (1 + M_nad_c/kM_R286_M_nad_c)*(1 + M_octeACP_c/kM_R286_M_octeACP_c) - 1);
    u_R286 = NaN; kC_R286 = 10; kEQ_R286 = 1.13; kM_R286_M_h_c = 0.1296; kM_R286_M_nad_c = 0.07714; kM_R286_M_octeACP_c = 0.07714; kM_R286_M_t3c11vaceACP_c = 0.1296; kM_R286_M_nadh_c = 0.1296;
  R_TPI: M_dhap_c -> M_g3p_c; u_R287*(kC_R287*sqrt(kEQ_R287*kM_R287_M_dhap_c/kM_R287_M_g3p_c)*(M_dhap_c/kM_R287_M_dhap_c) - kC_R287/sqrt(kEQ_R287*kM_R287_M_dhap_c/kM_R287_M_g3p_c)*(M_g3p_c/kM_R287_M_g3p_c))/(1 + M_dhap_c/kM_R287_M_dhap_c + 1 + M_g3p_c/kM_R287_M_g3p_c - 1);
    u_R287 = NaN; kC_R287 = 124; kEQ_R287 = 0.09854; kM_R287_M_dhap_c = 0.2041; kM_R287_M_g3p_c = 0.04899;
  R_RPI: M_r5p_c -> M_ru5p__D_c; u_R288*(kC_R288*sqrt(kEQ_R288*kM_R288_M_r5p_c/kM_R288_M_ru5p__D_c)*(M_r5p_c/kM_R288_M_r5p_c) - kC_R288/sqrt(kEQ_R288*kM_R288_M_r5p_c/kM_R288_M_ru5p__D_c)*(M_ru5p__D_c/kM_R288_M_ru5p__D_c))/(1 + M_r5p_c/kM_R288_M_r5p_c + 1 + M_ru5p__D_c/kM_R288_M_ru5p__D_c - 1);
    u_R288 = NaN; kC_R288 = 10; kEQ_R288 = 0.2296; kM_R288_M_r5p_c = 0.1313; kM_R288_M_ru5p__D_c = 0.07615;
  R_3OAR120: M_h_c + M_nadph_c + M_3oddecACP_c -> M_nadp_c + M_3hddecACP_c; u_R289*(kC_R289*sqrt(kEQ_R289*kM_R289_M_h_c*kM_R289_M_nadph_c*kM_R289_M_3oddecACP_c/kM_R289_M_nadp_c/kM_R289_M_3hddecACP_c)*(M_h_c/kM_R289_M_h_c)*(M_nadph_c/kM_R289_M_nadph_c)*(M_3oddecACP_c/kM_R289_M_3oddecACP_c) - kC_R289/sqrt(kEQ_R289*kM_R289_M_h_c*kM_R289_M_nadph_c*kM_R289_M_3oddecACP_c/kM_R289_M_nadp_c/kM_R289_M_3hddecACP_c)*(M_nadp_c/kM_R289_M_nadp_c)*(M_3hddecACP_c/kM_R289_M_3hddecACP_c))/((1 + M_h_c/kM_R289_M_h_c)*(1 + M_nadph_c/kM_R289_M_nadph_c)*(1 + M_3oddecACP_c/kM_R289_M_3oddecACP_c) + (1 + M_nadp_c/kM_R289_M_nadp_c)*(1 + M_3hddecACP_c/kM_R289_M_3hddecACP_c) - 1);
    u_R289 = NaN; kC_R289 = 1.882; kEQ_R289 = 1.254; kM_R289_M_h_c = 0.1441; kM_R289_M_nadp_c = 0.06939; kM_R289_M_nadph_c = 0.1441; kM_R289_M_3hddecACP_c = 0.06939; kM_R289_M_3oddecACP_c = 0.1441;
  R_3HAD80: M_3hoctACP_c => M_toct2eACP_c + M_h2o_c; u_R290*(kC_R290*sqrt(kEQ_R290*kM_R290_M_3hoctACP_c/kM_R290_M_toct2eACP_c/kM_R290_M_h2o_c)*(M_3hoctACP_c/kM_R290_M_3hoctACP_c) - kC_R290/sqrt(kEQ_R290*kM_R290_M_3hoctACP_c/kM_R290_M_toct2eACP_c/kM_R290_M_h2o_c)*(M_toct2eACP_c/kM_R290_M_toct2eACP_c)*(M_h2o_c/kM_R290_M_h2o_c))/(1 + M_3hoctACP_c/kM_R290_M_3hoctACP_c + (1 + M_toct2eACP_c/kM_R290_M_toct2eACP_c)*(1 + M_h2o_c/kM_R290_M_h2o_c) - 1);
    u_R290 = NaN; kC_R290 = 3.668; kEQ_R290 = 1.011; kM_R290_M_toct2eACP_c = 0.07375; kM_R290_M_3hoctACP_c = 0.1356; kM_R290_M_h2o_c = 0.07375;
  R_3HAD120: M_3hddecACP_c => M_h2o_c + M_tddec2eACP_c; u_R291*(kC_R291*sqrt(kEQ_R291*kM_R291_M_3hddecACP_c/kM_R291_M_h2o_c/kM_R291_M_tddec2eACP_c)*(M_3hddecACP_c/kM_R291_M_3hddecACP_c) - kC_R291/sqrt(kEQ_R291*kM_R291_M_3hddecACP_c/kM_R291_M_h2o_c/kM_R291_M_tddec2eACP_c)*(M_h2o_c/kM_R291_M_h2o_c)*(M_tddec2eACP_c/kM_R291_M_tddec2eACP_c))/(1 + M_3hddecACP_c/kM_R291_M_3hddecACP_c + (1 + M_h2o_c/kM_R291_M_h2o_c)*(1 + M_tddec2eACP_c/kM_R291_M_tddec2eACP_c) - 1);
    u_R291 = NaN; kC_R291 = 3.732; kEQ_R291 = 1.172; kM_R291_M_h2o_c = 0.07635; kM_R291_M_tddec2eACP_c = 0.07635; kM_R291_M_3hddecACP_c = 0.131;
  R_EAR180x: M_h_c + M_toctd2eACP_c + M_nadh_c => M_nad_c + M_ocdcaACP_c; u_R292*(kC_R292*sqrt(kEQ_R292*kM_R292_M_h_c*kM_R292_M_toctd2eACP_c*kM_R292_M_nadh_c/kM_R292_M_nad_c/kM_R292_M_ocdcaACP_c)*(M_h_c/kM_R292_M_h_c)*(M_toctd2eACP_c/kM_R292_M_toctd2eACP_c)*(M_nadh_c/kM_R292_M_nadh_c) - kC_R292/sqrt(kEQ_R292*kM_R292_M_h_c*kM_R292_M_toctd2eACP_c*kM_R292_M_nadh_c/kM_R292_M_nad_c/kM_R292_M_ocdcaACP_c)*(M_nad_c/kM_R292_M_nad_c)*(M_ocdcaACP_c/kM_R292_M_ocdcaACP_c))/((1 + M_h_c/kM_R292_M_h_c)*(1 + M_toctd2eACP_c/kM_R292_M_toctd2eACP_c)*(1 + M_nadh_c/kM_R292_M_nadh_c) + (1 + M_nad_c/kM_R292_M_nad_c)*(1 + M_ocdcaACP_c/kM_R292_M_ocdcaACP_c) - 1);
    u_R292 = NaN; kC_R292 = 10; kEQ_R292 = 1.155; kM_R292_M_h_c = 0.1293; kM_R292_M_nad_c = 0.07734; kM_R292_M_toctd2eACP_c = 0.1293; kM_R292_M_ocdcaACP_c = 0.07734; kM_R292_M_nadh_c = 0.1293;
  R_AKGtex: M_akg_e -> M_akg_p; u_R293*(kC_R293*sqrt(kEQ_R293*kM_R293_M_akg_e/kM_R293_M_akg_p)*(M_akg_e/kM_R293_M_akg_e) - kC_R293/sqrt(kEQ_R293*kM_R293_M_akg_e/kM_R293_M_akg_p)*(M_akg_p/kM_R293_M_akg_p))/(1 + M_akg_e/kM_R293_M_akg_e + 1 + M_akg_p/kM_R293_M_akg_p - 1);
    u_R293 = NaN; kC_R293 = 10; kEQ_R293 = 0.3447; kM_R293_M_akg_e = 0.1218; kM_R293_M_akg_p = 0.0821;
  R_SO4t2pp: M_h_p + M_so4_p => M_h_c + M_so4_c; u_R294*(kC_R294*sqrt(kEQ_R294*kM_R294_M_h_p*kM_R294_M_so4_p/kM_R294_M_h_c/kM_R294_M_so4_c)*(M_h_p/kM_R294_M_h_p)*(M_so4_p/kM_R294_M_so4_p) - kC_R294/sqrt(kEQ_R294*kM_R294_M_h_p*kM_R294_M_so4_p/kM_R294_M_h_c/kM_R294_M_so4_c)*(M_h_c/kM_R294_M_h_c)*(M_so4_c/kM_R294_M_so4_c))/((1 + M_h_p/kM_R294_M_h_p)*(1 + M_so4_p/kM_R294_M_so4_p) + (1 + M_h_c/kM_R294_M_h_c)*(1 + M_so4_c/kM_R294_M_so4_c) - 1);
    u_R294 = NaN; kC_R294 = 10; kEQ_R294 = 0.006386; kM_R294_M_h_c = 0.05051; kM_R294_M_h_p = 0.198; kM_R294_M_so4_c = 0.05051; kM_R294_M_so4_p = 0.198;
  R_EAR180y: M_h_c + M_toctd2eACP_c + M_nadph_c => M_nadp_c + M_ocdcaACP_c; u_R295*(kC_R295*sqrt(kEQ_R295*kM_R295_M_h_c*kM_R295_M_toctd2eACP_c*kM_R295_M_nadph_c/kM_R295_M_nadp_c/kM_R295_M_ocdcaACP_c)*(M_h_c/kM_R295_M_h_c)*(M_toctd2eACP_c/kM_R295_M_toctd2eACP_c)*(M_nadph_c/kM_R295_M_nadph_c) - kC_R295/sqrt(kEQ_R295*kM_R295_M_h_c*kM_R295_M_toctd2eACP_c*kM_R295_M_nadph_c/kM_R295_M_nadp_c/kM_R295_M_ocdcaACP_c)*(M_nadp_c/kM_R295_M_nadp_c)*(M_ocdcaACP_c/kM_R295_M_ocdcaACP_c))/((1 + M_h_c/kM_R295_M_h_c)*(1 + M_toctd2eACP_c/kM_R295_M_toctd2eACP_c)*(1 + M_nadph_c/kM_R295_M_nadph_c) + (1 + M_nadp_c/kM_R295_M_nadp_c)*(1 + M_ocdcaACP_c/kM_R295_M_ocdcaACP_c) - 1);
    u_R295 = NaN; kC_R295 = 10; kEQ_R295 = 1.167; kM_R295_M_h_c = 0.1291; kM_R295_M_toctd2eACP_c = 0.1291; kM_R295_M_nadp_c = 0.07743; kM_R295_M_ocdcaACP_c = 0.07743; kM_R295_M_nadph_c = 0.1291;
  R_ACONTb: M_h2o_c + M_acon_C_c -> M_icit_c; u_R296*(kC_R296*sqrt(kEQ_R296*kM_R296_M_h2o_c*kM_R296_M_acon_C_c/kM_R296_M_icit_c)*(M_h2o_c/kM_R296_M_h2o_c)*(M_acon_C_c/kM_R296_M_acon_C_c) - kC_R296/sqrt(kEQ_R296*kM_R296_M_h2o_c*kM_R296_M_acon_C_c/kM_R296_M_icit_c)*(M_icit_c/kM_R296_M_icit_c))/((1 + M_h2o_c/kM_R296_M_h2o_c)*(1 + M_acon_C_c/kM_R296_M_acon_C_c) + 1 + M_icit_c/kM_R296_M_icit_c - 1);
    u_R296 = NaN; kC_R296 = 22.58; kEQ_R296 = 1.64; kM_R296_M_h2o_c = 0.5855; kM_R296_M_acon_C_c = 0.004332; kM_R296_M_icit_c = 0.01708;
  R_3HAD161: M_3hcpalm9eACP_c => M_t3c9palmeACP_c + M_h2o_c; u_R297*(kC_R297*sqrt(kEQ_R297*kM_R297_M_3hcpalm9eACP_c/kM_R297_M_t3c9palmeACP_c/kM_R297_M_h2o_c)*(M_3hcpalm9eACP_c/kM_R297_M_3hcpalm9eACP_c) - kC_R297/sqrt(kEQ_R297*kM_R297_M_3hcpalm9eACP_c/kM_R297_M_t3c9palmeACP_c/kM_R297_M_h2o_c)*(M_t3c9palmeACP_c/kM_R297_M_t3c9palmeACP_c)*(M_h2o_c/kM_R297_M_h2o_c))/(1 + M_3hcpalm9eACP_c/kM_R297_M_3hcpalm9eACP_c + (1 + M_t3c9palmeACP_c/kM_R297_M_t3c9palmeACP_c)*(1 + M_h2o_c/kM_R297_M_h2o_c) - 1);
    u_R297 = NaN; kC_R297 = 10; kEQ_R297 = 0.7385; kM_R297_M_t3c9palmeACP_c = 0.1367; kM_R297_M_3hcpalm9eACP_c = 0.07317; kM_R297_M_h2o_c = 0.1367;
  R_SUCDi: M_q8_c + M_succ_c => M_q8h2_c + M_fum_c; u_R298*(kC_R298*sqrt(kEQ_R298*kM_R298_M_q8_c*kM_R298_M_succ_c/kM_R298_M_q8h2_c/kM_R298_M_fum_c)*(M_q8_c/kM_R298_M_q8_c)*(M_succ_c/kM_R298_M_succ_c) - kC_R298/sqrt(kEQ_R298*kM_R298_M_q8_c*kM_R298_M_succ_c/kM_R298_M_q8h2_c/kM_R298_M_fum_c)*(M_q8h2_c/kM_R298_M_q8h2_c)*(M_fum_c/kM_R298_M_fum_c))/((1 + M_q8_c/kM_R298_M_q8_c)*(1 + M_succ_c/kM_R298_M_succ_c) + (1 + M_q8h2_c/kM_R298_M_q8h2_c)*(1 + M_fum_c/kM_R298_M_fum_c) - 1);
    u_R298 = NaN; kC_R298 = 10; kEQ_R298 = 0.9618; kM_R298_M_q8h2_c = 0.09948; kM_R298_M_fum_c = 0.09948; kM_R298_M_q8_c = 0.1005; kM_R298_M_succ_c = 0.1005;
  R_ASNS1: M_asp__L_c + M_atp_c + M_gln__L_c + M_h2o_c => M_h_c + M_ppi_c + M_glu__L_c + M_amp_c + M_asn__L_c; u_R299*(kC_R299*sqrt(kEQ_R299*kM_R299_M_asp__L_c*kM_R299_M_atp_c*kM_R299_M_gln__L_c*kM_R299_M_h2o_c/kM_R299_M_h_c/kM_R299_M_ppi_c/kM_R299_M_glu__L_c/kM_R299_M_amp_c/kM_R299_M_asn__L_c)*(M_asp__L_c/kM_R299_M_asp__L_c)*(M_atp_c/kM_R299_M_atp_c)*(M_gln__L_c/kM_R299_M_gln__L_c)*(M_h2o_c/kM_R299_M_h2o_c) - kC_R299/sqrt(kEQ_R299*kM_R299_M_asp__L_c*kM_R299_M_atp_c*kM_R299_M_gln__L_c*kM_R299_M_h2o_c/kM_R299_M_h_c/kM_R299_M_ppi_c/kM_R299_M_glu__L_c/kM_R299_M_amp_c/kM_R299_M_asn__L_c)*(M_h_c/kM_R299_M_h_c)*(M_ppi_c/kM_R299_M_ppi_c)*(M_glu__L_c/kM_R299_M_glu__L_c)*(M_amp_c/kM_R299_M_amp_c)*(M_asn__L_c/kM_R299_M_asn__L_c))/((1 + M_asp__L_c/kM_R299_M_asp__L_c)*(1 + M_atp_c/kM_R299_M_atp_c)*(1 + M_gln__L_c/kM_R299_M_gln__L_c)*(1 + M_h2o_c/kM_R299_M_h2o_c) + (1 + M_h_c/kM_R299_M_h_c)*(1 + M_ppi_c/kM_R299_M_ppi_c)*(1 + M_glu__L_c/kM_R299_M_glu__L_c)*(1 + M_amp_c/kM_R299_M_amp_c)*(1 + M_asn__L_c/kM_R299_M_asn__L_c) - 1);
    u_R299 = NaN; kC_R299 = 15.3; kEQ_R299 = 2075000; kM_R299_M_h_c = 0.7802; kM_R299_M_asp__L_c = 4.182; kM_R299_M_atp_c = 0.03597; kM_R299_M_ppi_c = 0.7802; kM_R299_M_glu__L_c = 0.7802; kM_R299_M_gln__L_c = 0.01282; kM_R299_M_h2o_c = 0.01282; kM_R299_M_amp_c = 0.7802; kM_R299_M_asn__L_c = 0.7802;
  R_EAR80y: M_h_c + M_toct2eACP_c + M_nadph_c => M_nadp_c + M_ocACP_c; u_R300*(kC_R300*sqrt(kEQ_R300*kM_R300_M_h_c*kM_R300_M_toct2eACP_c*kM_R300_M_nadph_c/kM_R300_M_nadp_c/kM_R300_M_ocACP_c)*(M_h_c/kM_R300_M_h_c)*(M_toct2eACP_c/kM_R300_M_toct2eACP_c)*(M_nadph_c/kM_R300_M_nadph_c) - kC_R300/sqrt(kEQ_R300*kM_R300_M_h_c*kM_R300_M_toct2eACP_c*kM_R300_M_nadph_c/kM_R300_M_nadp_c/kM_R300_M_ocACP_c)*(M_nadp_c/kM_R300_M_nadp_c)*(M_ocACP_c/kM_R300_M_ocACP_c))/((1 + M_h_c/kM_R300_M_h_c)*(1 + M_toct2eACP_c/kM_R300_M_toct2eACP_c)*(1 + M_nadph_c/kM_R300_M_nadph_c) + (1 + M_nadp_c/kM_R300_M_nadp_c)*(1 + M_ocACP_c/kM_R300_M_ocACP_c) - 1);
    u_R300 = NaN; kC_R300 = 10; kEQ_R300 = 1.1; kM_R300_M_h_c = 0.1301; kM_R300_M_toct2eACP_c = 0.1301; kM_R300_M_nadp_c = 0.07689; kM_R300_M_ocACP_c = 0.07689; kM_R300_M_nadph_c = 0.1301;
  R_EAR120y: M_h_c + M_tddec2eACP_c + M_nadph_c => M_nadp_c + M_ddcaACP_c; u_R301*(kC_R301*sqrt(kEQ_R301*kM_R301_M_h_c*kM_R301_M_tddec2eACP_c*kM_R301_M_nadph_c/kM_R301_M_nadp_c/kM_R301_M_ddcaACP_c)*(M_h_c/kM_R301_M_h_c)*(M_tddec2eACP_c/kM_R301_M_tddec2eACP_c)*(M_nadph_c/kM_R301_M_nadph_c) - kC_R301/sqrt(kEQ_R301*kM_R301_M_h_c*kM_R301_M_tddec2eACP_c*kM_R301_M_nadph_c/kM_R301_M_nadp_c/kM_R301_M_ddcaACP_c)*(M_nadp_c/kM_R301_M_nadp_c)*(M_ddcaACP_c/kM_R301_M_ddcaACP_c))/((1 + M_h_c/kM_R301_M_h_c)*(1 + M_tddec2eACP_c/kM_R301_M_tddec2eACP_c)*(1 + M_nadph_c/kM_R301_M_nadph_c) + (1 + M_nadp_c/kM_R301_M_nadp_c)*(1 + M_ddcaACP_c/kM_R301_M_ddcaACP_c) - 1);
    u_R301 = NaN; kC_R301 = 10; kEQ_R301 = 1.194; kM_R301_M_h_c = 0.1288; kM_R301_M_nadp_c = 0.07765; kM_R301_M_ddcaACP_c = 0.07765; kM_R301_M_tddec2eACP_c = 0.1288; kM_R301_M_nadph_c = 0.1288;
  R_3OAR181: M_h_c + M_3ocvac11eACP_c + M_nadph_c => M_nadp_c + M_3hcvac11eACP_c; u_R302*(kC_R302*sqrt(kEQ_R302*kM_R302_M_h_c*kM_R302_M_3ocvac11eACP_c*kM_R302_M_nadph_c/kM_R302_M_nadp_c/kM_R302_M_3hcvac11eACP_c)*(M_h_c/kM_R302_M_h_c)*(M_3ocvac11eACP_c/kM_R302_M_3ocvac11eACP_c)*(M_nadph_c/kM_R302_M_nadph_c) - kC_R302/sqrt(kEQ_R302*kM_R302_M_h_c*kM_R302_M_3ocvac11eACP_c*kM_R302_M_nadph_c/kM_R302_M_nadp_c/kM_R302_M_3hcvac11eACP_c)*(M_nadp_c/kM_R302_M_nadp_c)*(M_3hcvac11eACP_c/kM_R302_M_3hcvac11eACP_c))/((1 + M_h_c/kM_R302_M_h_c)*(1 + M_3ocvac11eACP_c/kM_R302_M_3ocvac11eACP_c)*(1 + M_nadph_c/kM_R302_M_nadph_c) + (1 + M_nadp_c/kM_R302_M_nadp_c)*(1 + M_3hcvac11eACP_c/kM_R302_M_3hcvac11eACP_c) - 1);
    u_R302 = NaN; kC_R302 = 10; kEQ_R302 = 1.104; kM_R302_M_h_c = 0.13; kM_R302_M_3ocvac11eACP_c = 0.13; kM_R302_M_nadp_c = 0.07693; kM_R302_M_nadph_c = 0.13; kM_R302_M_3hcvac11eACP_c = 0.07693;
  R_3HAD121: M_3hcddec5eACP_c => M_t3c5ddeceACP_c + M_h2o_c; u_R303*(kC_R303*sqrt(kEQ_R303*kM_R303_M_3hcddec5eACP_c/kM_R303_M_t3c5ddeceACP_c/kM_R303_M_h2o_c)*(M_3hcddec5eACP_c/kM_R303_M_3hcddec5eACP_c) - kC_R303/sqrt(kEQ_R303*kM_R303_M_3hcddec5eACP_c/kM_R303_M_t3c5ddeceACP_c/kM_R303_M_h2o_c)*(M_t3c5ddeceACP_c/kM_R303_M_t3c5ddeceACP_c)*(M_h2o_c/kM_R303_M_h2o_c))/(1 + M_3hcddec5eACP_c/kM_R303_M_3hcddec5eACP_c + (1 + M_t3c5ddeceACP_c/kM_R303_M_t3c5ddeceACP_c)*(1 + M_h2o_c/kM_R303_M_h2o_c) - 1);
    u_R303 = NaN; kC_R303 = 10; kEQ_R303 = 0.7021; kM_R303_M_t3c5ddeceACP_c = 0.1356; kM_R303_M_h2o_c = 0.1356; kM_R303_M_3hcddec5eACP_c = 0.07375;
  R_EX_o2_e: M_o2_e -> ; u_R304*(kC_R304*sqrt(kEQ_R304*kM_R304_M_o2_e)*(M_o2_e/kM_R304_M_o2_e) - kC_R304/sqrt(kEQ_R304*kM_R304_M_o2_e))/(1 + M_o2_e/kM_R304_M_o2_e + (-1));
    u_R304 = NaN; kC_R304 = 10; kEQ_R304 = 0.2601; kM_R304_M_o2_e = 0.2292;
  R_EAR140x: M_h_c + M_tmrs2eACP_c + M_nadh_c => M_nad_c + M_myrsACP_c; u_R305*(kC_R305*sqrt(kEQ_R305*kM_R305_M_h_c*kM_R305_M_tmrs2eACP_c*kM_R305_M_nadh_c/kM_R305_M_nad_c/kM_R305_M_myrsACP_c)*(M_h_c/kM_R305_M_h_c)*(M_tmrs2eACP_c/kM_R305_M_tmrs2eACP_c)*(M_nadh_c/kM_R305_M_nadh_c) - kC_R305/sqrt(kEQ_R305*kM_R305_M_h_c*kM_R305_M_tmrs2eACP_c*kM_R305_M_nadh_c/kM_R305_M_nad_c/kM_R305_M_myrsACP_c)*(M_nad_c/kM_R305_M_nad_c)*(M_myrsACP_c/kM_R305_M_myrsACP_c))/((1 + M_h_c/kM_R305_M_h_c)*(1 + M_tmrs2eACP_c/kM_R305_M_tmrs2eACP_c)*(1 + M_nadh_c/kM_R305_M_nadh_c) + (1 + M_nad_c/kM_R305_M_nad_c)*(1 + M_myrsACP_c/kM_R305_M_myrsACP_c) - 1);
    u_R305 = NaN; kC_R305 = 10; kEQ_R305 = 1.143; kM_R305_M_h_c = 0.1295; kM_R305_M_nad_c = 0.07725; kM_R305_M_tmrs2eACP_c = 0.1295; kM_R305_M_nadh_c = 0.1295; kM_R305_M_myrsACP_c = 0.07725;
  R_3OAS181: M_h_c + M_hdeACP_c + M_malACP_c => M_3ocvac11eACP_c + M_co2_c + M_ACP_c; u_R306*(kC_R306*sqrt(kEQ_R306*kM_R306_M_h_c*kM_R306_M_hdeACP_c*kM_R306_M_malACP_c/kM_R306_M_3ocvac11eACP_c/kM_R306_M_co2_c/kM_R306_M_ACP_c)*(M_h_c/kM_R306_M_h_c)*(M_hdeACP_c/kM_R306_M_hdeACP_c)*(M_malACP_c/kM_R306_M_malACP_c) - kC_R306/sqrt(kEQ_R306*kM_R306_M_h_c*kM_R306_M_hdeACP_c*kM_R306_M_malACP_c/kM_R306_M_3ocvac11eACP_c/kM_R306_M_co2_c/kM_R306_M_ACP_c)*(M_3ocvac11eACP_c/kM_R306_M_3ocvac11eACP_c)*(M_co2_c/kM_R306_M_co2_c)*(M_ACP_c/kM_R306_M_ACP_c))/((1 + M_h_c/kM_R306_M_h_c)*(1 + M_hdeACP_c/kM_R306_M_hdeACP_c)*(1 + M_malACP_c/kM_R306_M_malACP_c) + (1 + M_3ocvac11eACP_c/kM_R306_M_3ocvac11eACP_c)*(1 + M_co2_c/kM_R306_M_co2_c)*(1 + M_ACP_c/kM_R306_M_ACP_c) - 1);
    u_R306 = NaN; kC_R306 = 10; kEQ_R306 = 0.9031; kM_R306_M_h_c = 0.1011; kM_R306_M_3ocvac11eACP_c = 0.09892; kM_R306_M_hdeACP_c = 0.1011; kM_R306_M_malACP_c = 0.1011; kM_R306_M_co2_c = 0.09892; kM_R306_M_ACP_c = 0.09892;
  R_3OAS140: M_h_c + M_ddcaACP_c + M_malACP_c => M_3omrsACP_c + M_co2_c + M_ACP_c; u_R307*(kC_R307*sqrt(kEQ_R307*kM_R307_M_h_c*kM_R307_M_ddcaACP_c*kM_R307_M_malACP_c/kM_R307_M_3omrsACP_c/kM_R307_M_co2_c/kM_R307_M_ACP_c)*(M_h_c/kM_R307_M_h_c)*(M_ddcaACP_c/kM_R307_M_ddcaACP_c)*(M_malACP_c/kM_R307_M_malACP_c) - kC_R307/sqrt(kEQ_R307*kM_R307_M_h_c*kM_R307_M_ddcaACP_c*kM_R307_M_malACP_c/kM_R307_M_3omrsACP_c/kM_R307_M_co2_c/kM_R307_M_ACP_c)*(M_3omrsACP_c/kM_R307_M_3omrsACP_c)*(M_co2_c/kM_R307_M_co2_c)*(M_ACP_c/kM_R307_M_ACP_c))/((1 + M_h_c/kM_R307_M_h_c)*(1 + M_ddcaACP_c/kM_R307_M_ddcaACP_c)*(1 + M_malACP_c/kM_R307_M_malACP_c) + (1 + M_3omrsACP_c/kM_R307_M_3omrsACP_c)*(1 + M_co2_c/kM_R307_M_co2_c)*(1 + M_ACP_c/kM_R307_M_ACP_c) - 1);
    u_R307 = NaN; kC_R307 = 10; kEQ_R307 = 0.9852; kM_R307_M_h_c = 0.1002; kM_R307_M_ddcaACP_c = 0.1002; kM_R307_M_malACP_c = 0.1002; kM_R307_M_3omrsACP_c = 0.09984; kM_R307_M_co2_c = 0.09984; kM_R307_M_ACP_c = 0.09984;
  R_3OAR140: M_h_c + M_nadph_c + M_3omrsACP_c -> M_nadp_c + M_3hmrsACP_c; u_R308*(kC_R308*sqrt(kEQ_R308*kM_R308_M_h_c*kM_R308_M_nadph_c*kM_R308_M_3omrsACP_c/kM_R308_M_nadp_c/kM_R308_M_3hmrsACP_c)*(M_h_c/kM_R308_M_h_c)*(M_nadph_c/kM_R308_M_nadph_c)*(M_3omrsACP_c/kM_R308_M_3omrsACP_c) - kC_R308/sqrt(kEQ_R308*kM_R308_M_h_c*kM_R308_M_nadph_c*kM_R308_M_3omrsACP_c/kM_R308_M_nadp_c/kM_R308_M_3hmrsACP_c)*(M_nadp_c/kM_R308_M_nadp_c)*(M_3hmrsACP_c/kM_R308_M_3hmrsACP_c))/((1 + M_h_c/kM_R308_M_h_c)*(1 + M_nadph_c/kM_R308_M_nadph_c)*(1 + M_3omrsACP_c/kM_R308_M_3omrsACP_c) + (1 + M_nadp_c/kM_R308_M_nadp_c)*(1 + M_3hmrsACP_c/kM_R308_M_3hmrsACP_c) - 1);
    u_R308 = NaN; kC_R308 = 1.811; kEQ_R308 = 1.313; kM_R308_M_h_c = 0.1451; kM_R308_M_nadp_c = 0.06892; kM_R308_M_nadph_c = 0.1451; kM_R308_M_3omrsACP_c = 0.1451; kM_R308_M_3hmrsACP_c = 0.06892;
  R_EAR160y: M_h_c + M_tpalm2eACP_c + M_nadph_c => M_nadp_c + M_palmACP_c; u_R309*(kC_R309*sqrt(kEQ_R309*kM_R309_M_h_c*kM_R309_M_tpalm2eACP_c*kM_R309_M_nadph_c/kM_R309_M_nadp_c/kM_R309_M_palmACP_c)*(M_h_c/kM_R309_M_h_c)*(M_tpalm2eACP_c/kM_R309_M_tpalm2eACP_c)*(M_nadph_c/kM_R309_M_nadph_c) - kC_R309/sqrt(kEQ_R309*kM_R309_M_h_c*kM_R309_M_tpalm2eACP_c*kM_R309_M_nadph_c/kM_R309_M_nadp_c/kM_R309_M_palmACP_c)*(M_nadp_c/kM_R309_M_nadp_c)*(M_palmACP_c/kM_R309_M_palmACP_c))/((1 + M_h_c/kM_R309_M_h_c)*(1 + M_tpalm2eACP_c/kM_R309_M_tpalm2eACP_c)*(1 + M_nadph_c/kM_R309_M_nadph_c) + (1 + M_nadp_c/kM_R309_M_nadp_c)*(1 + M_palmACP_c/kM_R309_M_palmACP_c) - 1);
    u_R309 = NaN; kC_R309 = 10; kEQ_R309 = 1.189; kM_R309_M_h_c = 0.1289; kM_R309_M_nadp_c = 0.07761; kM_R309_M_tpalm2eACP_c = 0.1289; kM_R309_M_nadph_c = 0.1289; kM_R309_M_palmACP_c = 0.07761;
  R_3OAR160: M_h_c + M_nadph_c + M_3opalmACP_c -> M_nadp_c + M_3hpalmACP_c; u_R310*(kC_R310*sqrt(kEQ_R310*kM_R310_M_h_c*kM_R310_M_nadph_c*kM_R310_M_3opalmACP_c/kM_R310_M_nadp_c/kM_R310_M_3hpalmACP_c)*(M_h_c/kM_R310_M_h_c)*(M_nadph_c/kM_R310_M_nadph_c)*(M_3opalmACP_c/kM_R310_M_3opalmACP_c) - kC_R310/sqrt(kEQ_R310*kM_R310_M_h_c*kM_R310_M_nadph_c*kM_R310_M_3opalmACP_c/kM_R310_M_nadp_c/kM_R310_M_3hpalmACP_c)*(M_nadp_c/kM_R310_M_nadp_c)*(M_3hpalmACP_c/kM_R310_M_3hpalmACP_c))/((1 + M_h_c/kM_R310_M_h_c)*(1 + M_nadph_c/kM_R310_M_nadph_c)*(1 + M_3opalmACP_c/kM_R310_M_3opalmACP_c) + (1 + M_nadp_c/kM_R310_M_nadp_c)*(1 + M_3hpalmACP_c/kM_R310_M_3hpalmACP_c) - 1);
    u_R310 = NaN; kC_R310 = 1.445; kEQ_R310 = 1.321; kM_R310_M_h_c = 0.1589; kM_R310_M_nadp_c = 0.06293; kM_R310_M_3hpalmACP_c = 0.06293; kM_R310_M_nadph_c = 0.1589; kM_R310_M_3opalmACP_c = 0.1589;
  R_3HAD181: M_3hcvac11eACP_c => M_t3c11vaceACP_c + M_h2o_c; u_R311*(kC_R311*sqrt(kEQ_R311*kM_R311_M_3hcvac11eACP_c/kM_R311_M_t3c11vaceACP_c/kM_R311_M_h2o_c)*(M_3hcvac11eACP_c/kM_R311_M_3hcvac11eACP_c) - kC_R311/sqrt(kEQ_R311*kM_R311_M_3hcvac11eACP_c/kM_R311_M_t3c11vaceACP_c/kM_R311_M_h2o_c)*(M_t3c11vaceACP_c/kM_R311_M_t3c11vaceACP_c)*(M_h2o_c/kM_R311_M_h2o_c))/(1 + M_3hcvac11eACP_c/kM_R311_M_3hcvac11eACP_c + (1 + M_t3c11vaceACP_c/kM_R311_M_t3c11vaceACP_c)*(1 + M_h2o_c/kM_R311_M_h2o_c) - 1);
    u_R311 = NaN; kC_R311 = 10; kEQ_R311 = 0.7254; kM_R311_M_t3c11vaceACP_c = 0.1363; kM_R311_M_h2o_c = 0.1363; kM_R311_M_3hcvac11eACP_c = 0.07337;
  R_EAR100y: M_h_c + M_tdec2eACP_c + M_nadph_c => M_nadp_c + M_dcaACP_c; u_R312*(kC_R312*sqrt(kEQ_R312*kM_R312_M_h_c*kM_R312_M_tdec2eACP_c*kM_R312_M_nadph_c/kM_R312_M_nadp_c/kM_R312_M_dcaACP_c)*(M_h_c/kM_R312_M_h_c)*(M_tdec2eACP_c/kM_R312_M_tdec2eACP_c)*(M_nadph_c/kM_R312_M_nadph_c) - kC_R312/sqrt(kEQ_R312*kM_R312_M_h_c*kM_R312_M_tdec2eACP_c*kM_R312_M_nadph_c/kM_R312_M_nadp_c/kM_R312_M_dcaACP_c)*(M_nadp_c/kM_R312_M_nadp_c)*(M_dcaACP_c/kM_R312_M_dcaACP_c))/((1 + M_h_c/kM_R312_M_h_c)*(1 + M_tdec2eACP_c/kM_R312_M_tdec2eACP_c)*(1 + M_nadph_c/kM_R312_M_nadph_c) + (1 + M_nadp_c/kM_R312_M_nadp_c)*(1 + M_dcaACP_c/kM_R312_M_dcaACP_c) - 1);
    u_R312 = NaN; kC_R312 = 10; kEQ_R312 = 1.177; kM_R312_M_h_c = 0.129; kM_R312_M_tdec2eACP_c = 0.129; kM_R312_M_nadp_c = 0.07752; kM_R312_M_dcaACP_c = 0.07752; kM_R312_M_nadph_c = 0.129;
  R_3OAR141: M_h_c + M_nadph_c + M_3ocmrs7eACP_c => M_nadp_c + M_3hcmrs7eACP_c; u_R313*(kC_R313*sqrt(kEQ_R313*kM_R313_M_h_c*kM_R313_M_nadph_c*kM_R313_M_3ocmrs7eACP_c/kM_R313_M_nadp_c/kM_R313_M_3hcmrs7eACP_c)*(M_h_c/kM_R313_M_h_c)*(M_nadph_c/kM_R313_M_nadph_c)*(M_3ocmrs7eACP_c/kM_R313_M_3ocmrs7eACP_c) - kC_R313/sqrt(kEQ_R313*kM_R313_M_h_c*kM_R313_M_nadph_c*kM_R313_M_3ocmrs7eACP_c/kM_R313_M_nadp_c/kM_R313_M_3hcmrs7eACP_c)*(M_nadp_c/kM_R313_M_nadp_c)*(M_3hcmrs7eACP_c/kM_R313_M_3hcmrs7eACP_c))/((1 + M_h_c/kM_R313_M_h_c)*(1 + M_nadph_c/kM_R313_M_nadph_c)*(1 + M_3ocmrs7eACP_c/kM_R313_M_3ocmrs7eACP_c) + (1 + M_nadp_c/kM_R313_M_nadp_c)*(1 + M_3hcmrs7eACP_c/kM_R313_M_3hcmrs7eACP_c) - 1);
    u_R313 = NaN; kC_R313 = 10; kEQ_R313 = 1.096; kM_R313_M_h_c = 0.1301; kM_R313_M_nadp_c = 0.07686; kM_R313_M_nadph_c = 0.1301; kM_R313_M_3hcmrs7eACP_c = 0.07686; kM_R313_M_3ocmrs7eACP_c = 0.1301;
  R_3OAR161: M_h_c + M_3ocpalm9eACP_c + M_nadph_c => M_3hcpalm9eACP_c + M_nadp_c; u_R314*(kC_R314*sqrt(kEQ_R314*kM_R314_M_h_c*kM_R314_M_3ocpalm9eACP_c*kM_R314_M_nadph_c/kM_R314_M_3hcpalm9eACP_c/kM_R314_M_nadp_c)*(M_h_c/kM_R314_M_h_c)*(M_3ocpalm9eACP_c/kM_R314_M_3ocpalm9eACP_c)*(M_nadph_c/kM_R314_M_nadph_c) - kC_R314/sqrt(kEQ_R314*kM_R314_M_h_c*kM_R314_M_3ocpalm9eACP_c*kM_R314_M_nadph_c/kM_R314_M_3hcpalm9eACP_c/kM_R314_M_nadp_c)*(M_3hcpalm9eACP_c/kM_R314_M_3hcpalm9eACP_c)*(M_nadp_c/kM_R314_M_nadp_c))/((1 + M_h_c/kM_R314_M_h_c)*(1 + M_3ocpalm9eACP_c/kM_R314_M_3ocpalm9eACP_c)*(1 + M_nadph_c/kM_R314_M_nadph_c) + (1 + M_3hcpalm9eACP_c/kM_R314_M_3hcpalm9eACP_c)*(1 + M_nadp_c/kM_R314_M_nadp_c) - 1);
    u_R314 = NaN; kC_R314 = 10; kEQ_R314 = 1.128; kM_R314_M_h_c = 0.1297; kM_R314_M_3hcpalm9eACP_c = 0.07712; kM_R314_M_3ocpalm9eACP_c = 0.1297; kM_R314_M_nadp_c = 0.07712; kM_R314_M_nadph_c = 0.1297;
  R_3HAD141: M_3hcmrs7eACP_c => M_t3c7mrseACP_c + M_h2o_c; u_R315*(kC_R315*sqrt(kEQ_R315*kM_R315_M_3hcmrs7eACP_c/kM_R315_M_t3c7mrseACP_c/kM_R315_M_h2o_c)*(M_3hcmrs7eACP_c/kM_R315_M_3hcmrs7eACP_c) - kC_R315/sqrt(kEQ_R315*kM_R315_M_3hcmrs7eACP_c/kM_R315_M_t3c7mrseACP_c/kM_R315_M_h2o_c)*(M_t3c7mrseACP_c/kM_R315_M_t3c7mrseACP_c)*(M_h2o_c/kM_R315_M_h2o_c))/(1 + M_3hcmrs7eACP_c/kM_R315_M_3hcmrs7eACP_c + (1 + M_t3c7mrseACP_c/kM_R315_M_t3c7mrseACP_c)*(1 + M_h2o_c/kM_R315_M_h2o_c) - 1);
    u_R315 = NaN; kC_R315 = 10; kEQ_R315 = 0.7165; kM_R315_M_t3c7mrseACP_c = 0.136; kM_R315_M_h2o_c = 0.136; kM_R315_M_3hcmrs7eACP_c = 0.07351;
  R_EAR121x: M_h_c + M_t3c5ddeceACP_c + M_nadh_c => M_nad_c + M_cddec5eACP_c; u_R316*(kC_R316*sqrt(kEQ_R316*kM_R316_M_h_c*kM_R316_M_t3c5ddeceACP_c*kM_R316_M_nadh_c/kM_R316_M_nad_c/kM_R316_M_cddec5eACP_c)*(M_h_c/kM_R316_M_h_c)*(M_t3c5ddeceACP_c/kM_R316_M_t3c5ddeceACP_c)*(M_nadh_c/kM_R316_M_nadh_c) - kC_R316/sqrt(kEQ_R316*kM_R316_M_h_c*kM_R316_M_t3c5ddeceACP_c*kM_R316_M_nadh_c/kM_R316_M_nad_c/kM_R316_M_cddec5eACP_c)*(M_nad_c/kM_R316_M_nad_c)*(M_cddec5eACP_c/kM_R316_M_cddec5eACP_c))/((1 + M_h_c/kM_R316_M_h_c)*(1 + M_t3c5ddeceACP_c/kM_R316_M_t3c5ddeceACP_c)*(1 + M_nadh_c/kM_R316_M_nadh_c) + (1 + M_nad_c/kM_R316_M_nad_c)*(1 + M_cddec5eACP_c/kM_R316_M_cddec5eACP_c) - 1);
    u_R316 = NaN; kC_R316 = 10; kEQ_R316 = 1.085; kM_R316_M_h_c = 0.1303; kM_R316_M_nad_c = 0.07676; kM_R316_M_t3c5ddeceACP_c = 0.1303; kM_R316_M_cddec5eACP_c = 0.07676; kM_R316_M_nadh_c = 0.1303;
  R_ACONTa: M_cit_c -> M_h2o_c + M_acon_C_c; u_R317*(kC_R317*sqrt(kEQ_R317*kM_R317_M_cit_c/kM_R317_M_h2o_c/kM_R317_M_acon_C_c)*(M_cit_c/kM_R317_M_cit_c) - kC_R317/sqrt(kEQ_R317*kM_R317_M_cit_c/kM_R317_M_h2o_c/kM_R317_M_acon_C_c)*(M_h2o_c/kM_R317_M_h2o_c)*(M_acon_C_c/kM_R317_M_acon_C_c))/(1 + M_cit_c/kM_R317_M_cit_c + (1 + M_h2o_c/kM_R317_M_h2o_c)*(1 + M_acon_C_c/kM_R317_M_acon_C_c) - 1);
    u_R317 = NaN; kC_R317 = 18.49; kEQ_R317 = 0.02827; kM_R317_M_h2o_c = 0.8458; kM_R317_M_cit_c = 0.01182; kM_R317_M_acon_C_c = 0.004646;
  R_3HAD40: M_3haACP_c => M_h2o_c + M_but2eACP_c; u_R318*(kC_R318*sqrt(kEQ_R318*kM_R318_M_3haACP_c/kM_R318_M_h2o_c/kM_R318_M_but2eACP_c)*(M_3haACP_c/kM_R318_M_3haACP_c) - kC_R318/sqrt(kEQ_R318*kM_R318_M_3haACP_c/kM_R318_M_h2o_c/kM_R318_M_but2eACP_c)*(M_h2o_c/kM_R318_M_h2o_c)*(M_but2eACP_c/kM_R318_M_but2eACP_c))/(1 + M_3haACP_c/kM_R318_M_3haACP_c + (1 + M_h2o_c/kM_R318_M_h2o_c)*(1 + M_but2eACP_c/kM_R318_M_but2eACP_c) - 1);
    u_R318 = NaN; kC_R318 = 10; kEQ_R318 = 0.6602; kM_R318_M_h2o_c = 0.1343; kM_R318_M_but2eACP_c = 0.1343; kM_R318_M_3haACP_c = 0.07446;
  R_3OAS60: M_h_c + M_butACP_c + M_malACP_c => M_3ohexACP_c + M_co2_c + M_ACP_c; u_R319*(kC_R319*sqrt(kEQ_R319*kM_R319_M_h_c*kM_R319_M_butACP_c*kM_R319_M_malACP_c/kM_R319_M_3ohexACP_c/kM_R319_M_co2_c/kM_R319_M_ACP_c)*(M_h_c/kM_R319_M_h_c)*(M_butACP_c/kM_R319_M_butACP_c)*(M_malACP_c/kM_R319_M_malACP_c) - kC_R319/sqrt(kEQ_R319*kM_R319_M_h_c*kM_R319_M_butACP_c*kM_R319_M_malACP_c/kM_R319_M_3ohexACP_c/kM_R319_M_co2_c/kM_R319_M_ACP_c)*(M_3ohexACP_c/kM_R319_M_3ohexACP_c)*(M_co2_c/kM_R319_M_co2_c)*(M_ACP_c/kM_R319_M_ACP_c))/((1 + M_h_c/kM_R319_M_h_c)*(1 + M_butACP_c/kM_R319_M_butACP_c)*(1 + M_malACP_c/kM_R319_M_malACP_c) + (1 + M_3ohexACP_c/kM_R319_M_3ohexACP_c)*(1 + M_co2_c/kM_R319_M_co2_c)*(1 + M_ACP_c/kM_R319_M_ACP_c) - 1);
    u_R319 = NaN; kC_R319 = 10; kEQ_R319 = 0.8294; kM_R319_M_3ohexACP_c = 0.09803; kM_R319_M_h_c = 0.102; kM_R319_M_butACP_c = 0.102; kM_R319_M_malACP_c = 0.102; kM_R319_M_co2_c = 0.09803; kM_R319_M_ACP_c = 0.09803;
  R_3OAS160: M_h_c + M_malACP_c + M_myrsACP_c => M_3opalmACP_c + M_co2_c + M_ACP_c; u_R320*(kC_R320*sqrt(kEQ_R320*kM_R320_M_h_c*kM_R320_M_malACP_c*kM_R320_M_myrsACP_c/kM_R320_M_3opalmACP_c/kM_R320_M_co2_c/kM_R320_M_ACP_c)*(M_h_c/kM_R320_M_h_c)*(M_malACP_c/kM_R320_M_malACP_c)*(M_myrsACP_c/kM_R320_M_myrsACP_c) - kC_R320/sqrt(kEQ_R320*kM_R320_M_h_c*kM_R320_M_malACP_c*kM_R320_M_myrsACP_c/kM_R320_M_3opalmACP_c/kM_R320_M_co2_c/kM_R320_M_ACP_c)*(M_3opalmACP_c/kM_R320_M_3opalmACP_c)*(M_co2_c/kM_R320_M_co2_c)*(M_ACP_c/kM_R320_M_ACP_c))/((1 + M_h_c/kM_R320_M_h_c)*(1 + M_malACP_c/kM_R320_M_malACP_c)*(1 + M_myrsACP_c/kM_R320_M_myrsACP_c) + (1 + M_3opalmACP_c/kM_R320_M_3opalmACP_c)*(1 + M_co2_c/kM_R320_M_co2_c)*(1 + M_ACP_c/kM_R320_M_ACP_c) - 1);
    u_R320 = NaN; kC_R320 = 10; kEQ_R320 = 0.927; kM_R320_M_h_c = 0.1008; kM_R320_M_malACP_c = 0.1008; kM_R320_M_3opalmACP_c = 0.0992; kM_R320_M_co2_c = 0.0992; kM_R320_M_myrsACP_c = 0.1008; kM_R320_M_ACP_c = 0.0992;
  R_3OAR60: M_3ohexACP_c + M_h_c + M_nadph_c -> M_nadp_c + M_3hhexACP_c; u_R321*(kC_R321*sqrt(kEQ_R321*kM_R321_M_3ohexACP_c*kM_R321_M_h_c*kM_R321_M_nadph_c/kM_R321_M_nadp_c/kM_R321_M_3hhexACP_c)*(M_3ohexACP_c/kM_R321_M_3ohexACP_c)*(M_h_c/kM_R321_M_h_c)*(M_nadph_c/kM_R321_M_nadph_c) - kC_R321/sqrt(kEQ_R321*kM_R321_M_3ohexACP_c*kM_R321_M_h_c*kM_R321_M_nadph_c/kM_R321_M_nadp_c/kM_R321_M_3hhexACP_c)*(M_nadp_c/kM_R321_M_nadp_c)*(M_3hhexACP_c/kM_R321_M_3hhexACP_c))/((1 + M_3ohexACP_c/kM_R321_M_3ohexACP_c)*(1 + M_h_c/kM_R321_M_h_c)*(1 + M_nadph_c/kM_R321_M_nadph_c) + (1 + M_nadp_c/kM_R321_M_nadp_c)*(1 + M_3hhexACP_c/kM_R321_M_3hhexACP_c) - 1);
    u_R321 = NaN; kC_R321 = 3.001; kEQ_R321 = 0.9649; kM_R321_M_3ohexACP_c = 0.1254; kM_R321_M_h_c = 0.1254; kM_R321_M_nadp_c = 0.07972; kM_R321_M_3hhexACP_c = 0.07972; kM_R321_M_nadph_c = 0.1254;
  R_3OAR80: M_h_c + M_nadph_c + M_3ooctACP_c -> M_3hoctACP_c + M_nadp_c; u_R322*(kC_R322*sqrt(kEQ_R322*kM_R322_M_h_c*kM_R322_M_nadph_c*kM_R322_M_3ooctACP_c/kM_R322_M_3hoctACP_c/kM_R322_M_nadp_c)*(M_h_c/kM_R322_M_h_c)*(M_nadph_c/kM_R322_M_nadph_c)*(M_3ooctACP_c/kM_R322_M_3ooctACP_c) - kC_R322/sqrt(kEQ_R322*kM_R322_M_h_c*kM_R322_M_nadph_c*kM_R322_M_3ooctACP_c/kM_R322_M_3hoctACP_c/kM_R322_M_nadp_c)*(M_3hoctACP_c/kM_R322_M_3hoctACP_c)*(M_nadp_c/kM_R322_M_nadp_c))/((1 + M_h_c/kM_R322_M_h_c)*(1 + M_nadph_c/kM_R322_M_nadph_c)*(1 + M_3ooctACP_c/kM_R322_M_3ooctACP_c) + (1 + M_3hoctACP_c/kM_R322_M_3hoctACP_c)*(1 + M_nadp_c/kM_R322_M_nadp_c) - 1);
    u_R322 = NaN; kC_R322 = 3.001; kEQ_R322 = 0.9562; kM_R322_M_h_c = 0.1257; kM_R322_M_3hoctACP_c = 0.07957; kM_R322_M_nadp_c = 0.07957; kM_R322_M_nadph_c = 0.1257; kM_R322_M_3ooctACP_c = 0.1257;
  R_EAR100x: M_h_c + M_tdec2eACP_c + M_nadh_c => M_nad_c + M_dcaACP_c; u_R323*(kC_R323*sqrt(kEQ_R323*kM_R323_M_h_c*kM_R323_M_tdec2eACP_c*kM_R323_M_nadh_c/kM_R323_M_nad_c/kM_R323_M_dcaACP_c)*(M_h_c/kM_R323_M_h_c)*(M_tdec2eACP_c/kM_R323_M_tdec2eACP_c)*(M_nadh_c/kM_R323_M_nadh_c) - kC_R323/sqrt(kEQ_R323*kM_R323_M_h_c*kM_R323_M_tdec2eACP_c*kM_R323_M_nadh_c/kM_R323_M_nad_c/kM_R323_M_dcaACP_c)*(M_nad_c/kM_R323_M_nad_c)*(M_dcaACP_c/kM_R323_M_dcaACP_c))/((1 + M_h_c/kM_R323_M_h_c)*(1 + M_tdec2eACP_c/kM_R323_M_tdec2eACP_c)*(1 + M_nadh_c/kM_R323_M_nadh_c) + (1 + M_nad_c/kM_R323_M_nad_c)*(1 + M_dcaACP_c/kM_R323_M_dcaACP_c) - 1);
    u_R323 = NaN; kC_R323 = 10; kEQ_R323 = 1.165; kM_R323_M_h_c = 0.1292; kM_R323_M_nad_c = 0.07742; kM_R323_M_tdec2eACP_c = 0.1292; kM_R323_M_dcaACP_c = 0.07742; kM_R323_M_nadh_c = 0.1292;
  R_EAR120x: M_h_c + M_tddec2eACP_c + M_nadh_c => M_nad_c + M_ddcaACP_c; u_R324*(kC_R324*sqrt(kEQ_R324*kM_R324_M_h_c*kM_R324_M_tddec2eACP_c*kM_R324_M_nadh_c/kM_R324_M_nad_c/kM_R324_M_ddcaACP_c)*(M_h_c/kM_R324_M_h_c)*(M_tddec2eACP_c/kM_R324_M_tddec2eACP_c)*(M_nadh_c/kM_R324_M_nadh_c) - kC_R324/sqrt(kEQ_R324*kM_R324_M_h_c*kM_R324_M_tddec2eACP_c*kM_R324_M_nadh_c/kM_R324_M_nad_c/kM_R324_M_ddcaACP_c)*(M_nad_c/kM_R324_M_nad_c)*(M_ddcaACP_c/kM_R324_M_ddcaACP_c))/((1 + M_h_c/kM_R324_M_h_c)*(1 + M_tddec2eACP_c/kM_R324_M_tddec2eACP_c)*(1 + M_nadh_c/kM_R324_M_nadh_c) + (1 + M_nad_c/kM_R324_M_nad_c)*(1 + M_ddcaACP_c/kM_R324_M_ddcaACP_c) - 1);
    u_R324 = NaN; kC_R324 = 10; kEQ_R324 = 1.182; kM_R324_M_h_c = 0.1289; kM_R324_M_nad_c = 0.07755; kM_R324_M_ddcaACP_c = 0.07755; kM_R324_M_tddec2eACP_c = 0.1289; kM_R324_M_nadh_c = 0.1289;
  R_EAR160x: M_h_c + M_tpalm2eACP_c + M_nadh_c => M_nad_c + M_palmACP_c; u_R325*(kC_R325*sqrt(kEQ_R325*kM_R325_M_h_c*kM_R325_M_tpalm2eACP_c*kM_R325_M_nadh_c/kM_R325_M_nad_c/kM_R325_M_palmACP_c)*(M_h_c/kM_R325_M_h_c)*(M_tpalm2eACP_c/kM_R325_M_tpalm2eACP_c)*(M_nadh_c/kM_R325_M_nadh_c) - kC_R325/sqrt(kEQ_R325*kM_R325_M_h_c*kM_R325_M_tpalm2eACP_c*kM_R325_M_nadh_c/kM_R325_M_nad_c/kM_R325_M_palmACP_c)*(M_nad_c/kM_R325_M_nad_c)*(M_palmACP_c/kM_R325_M_palmACP_c))/((1 + M_h_c/kM_R325_M_h_c)*(1 + M_tpalm2eACP_c/kM_R325_M_tpalm2eACP_c)*(1 + M_nadh_c/kM_R325_M_nadh_c) + (1 + M_nad_c/kM_R325_M_nad_c)*(1 + M_palmACP_c/kM_R325_M_palmACP_c) - 1);
    u_R325 = NaN; kC_R325 = 10; kEQ_R325 = 1.177; kM_R325_M_h_c = 0.129; kM_R325_M_nad_c = 0.07751; kM_R325_M_tpalm2eACP_c = 0.129; kM_R325_M_nadh_c = 0.129; kM_R325_M_palmACP_c = 0.07751;
  R_EAR140y: M_h_c + M_tmrs2eACP_c + M_nadph_c => M_nadp_c + M_myrsACP_c; u_R326*(kC_R326*sqrt(kEQ_R326*kM_R326_M_h_c*kM_R326_M_tmrs2eACP_c*kM_R326_M_nadph_c/kM_R326_M_nadp_c/kM_R326_M_myrsACP_c)*(M_h_c/kM_R326_M_h_c)*(M_tmrs2eACP_c/kM_R326_M_tmrs2eACP_c)*(M_nadph_c/kM_R326_M_nadph_c) - kC_R326/sqrt(kEQ_R326*kM_R326_M_h_c*kM_R326_M_tmrs2eACP_c*kM_R326_M_nadph_c/kM_R326_M_nadp_c/kM_R326_M_myrsACP_c)*(M_nadp_c/kM_R326_M_nadp_c)*(M_myrsACP_c/kM_R326_M_myrsACP_c))/((1 + M_h_c/kM_R326_M_h_c)*(1 + M_tmrs2eACP_c/kM_R326_M_tmrs2eACP_c)*(1 + M_nadph_c/kM_R326_M_nadph_c) + (1 + M_nadp_c/kM_R326_M_nadp_c)*(1 + M_myrsACP_c/kM_R326_M_myrsACP_c) - 1);
    u_R326 = NaN; kC_R326 = 10; kEQ_R326 = 1.155; kM_R326_M_h_c = 0.1293; kM_R326_M_nadp_c = 0.07734; kM_R326_M_tmrs2eACP_c = 0.1293; kM_R326_M_nadph_c = 0.1293; kM_R326_M_myrsACP_c = 0.07734;
  R_3OAS121: M_h_c + M_malACP_c + M_cdec3eACP_c => M_3ocddec5eACP_c + M_co2_c + M_ACP_c; u_R327*(kC_R327*sqrt(kEQ_R327*kM_R327_M_h_c*kM_R327_M_malACP_c*kM_R327_M_cdec3eACP_c/kM_R327_M_3ocddec5eACP_c/kM_R327_M_co2_c/kM_R327_M_ACP_c)*(M_h_c/kM_R327_M_h_c)*(M_malACP_c/kM_R327_M_malACP_c)*(M_cdec3eACP_c/kM_R327_M_cdec3eACP_c) - kC_R327/sqrt(kEQ_R327*kM_R327_M_h_c*kM_R327_M_malACP_c*kM_R327_M_cdec3eACP_c/kM_R327_M_3ocddec5eACP_c/kM_R327_M_co2_c/kM_R327_M_ACP_c)*(M_3ocddec5eACP_c/kM_R327_M_3ocddec5eACP_c)*(M_co2_c/kM_R327_M_co2_c)*(M_ACP_c/kM_R327_M_ACP_c))/((1 + M_h_c/kM_R327_M_h_c)*(1 + M_malACP_c/kM_R327_M_malACP_c)*(1 + M_cdec3eACP_c/kM_R327_M_cdec3eACP_c) + (1 + M_3ocddec5eACP_c/kM_R327_M_3ocddec5eACP_c)*(1 + M_co2_c/kM_R327_M_co2_c)*(1 + M_ACP_c/kM_R327_M_ACP_c) - 1);
    u_R327 = NaN; kC_R327 = 10; kEQ_R327 = 0.8868; kM_R327_M_3ocddec5eACP_c = 0.09873; kM_R327_M_h_c = 0.1013; kM_R327_M_malACP_c = 0.1013; kM_R327_M_cdec3eACP_c = 0.1013; kM_R327_M_co2_c = 0.09873; kM_R327_M_ACP_c = 0.09873;
  R_3OAS80: M_h_c + M_hexACP_c + M_malACP_c => M_co2_c + M_3ooctACP_c + M_ACP_c; u_R328*(kC_R328*sqrt(kEQ_R328*kM_R328_M_h_c*kM_R328_M_hexACP_c*kM_R328_M_malACP_c/kM_R328_M_co2_c/kM_R328_M_3ooctACP_c/kM_R328_M_ACP_c)*(M_h_c/kM_R328_M_h_c)*(M_hexACP_c/kM_R328_M_hexACP_c)*(M_malACP_c/kM_R328_M_malACP_c) - kC_R328/sqrt(kEQ_R328*kM_R328_M_h_c*kM_R328_M_hexACP_c*kM_R328_M_malACP_c/kM_R328_M_co2_c/kM_R328_M_3ooctACP_c/kM_R328_M_ACP_c)*(M_co2_c/kM_R328_M_co2_c)*(M_3ooctACP_c/kM_R328_M_3ooctACP_c)*(M_ACP_c/kM_R328_M_ACP_c))/((1 + M_h_c/kM_R328_M_h_c)*(1 + M_hexACP_c/kM_R328_M_hexACP_c)*(1 + M_malACP_c/kM_R328_M_malACP_c) + (1 + M_co2_c/kM_R328_M_co2_c)*(1 + M_3ooctACP_c/kM_R328_M_3ooctACP_c)*(1 + M_ACP_c/kM_R328_M_ACP_c) - 1);
    u_R328 = NaN; kC_R328 = 10; kEQ_R328 = 0.8193; kM_R328_M_h_c = 0.1021; kM_R328_M_hexACP_c = 0.1021; kM_R328_M_malACP_c = 0.1021; kM_R328_M_co2_c = 0.0979; kM_R328_M_3ooctACP_c = 0.0979; kM_R328_M_ACP_c = 0.0979;
  R_3OAS100: M_h_c + M_ocACP_c + M_malACP_c => M_3odecACP_c + M_co2_c + M_ACP_c; u_R329*(kC_R329*sqrt(kEQ_R329*kM_R329_M_h_c*kM_R329_M_ocACP_c*kM_R329_M_malACP_c/kM_R329_M_3odecACP_c/kM_R329_M_co2_c/kM_R329_M_ACP_c)*(M_h_c/kM_R329_M_h_c)*(M_ocACP_c/kM_R329_M_ocACP_c)*(M_malACP_c/kM_R329_M_malACP_c) - kC_R329/sqrt(kEQ_R329*kM_R329_M_h_c*kM_R329_M_ocACP_c*kM_R329_M_malACP_c/kM_R329_M_3odecACP_c/kM_R329_M_co2_c/kM_R329_M_ACP_c)*(M_3odecACP_c/kM_R329_M_3odecACP_c)*(M_co2_c/kM_R329_M_co2_c)*(M_ACP_c/kM_R329_M_ACP_c))/((1 + M_h_c/kM_R329_M_h_c)*(1 + M_ocACP_c/kM_R329_M_ocACP_c)*(1 + M_malACP_c/kM_R329_M_malACP_c) + (1 + M_3odecACP_c/kM_R329_M_3odecACP_c)*(1 + M_co2_c/kM_R329_M_co2_c)*(1 + M_ACP_c/kM_R329_M_ACP_c) - 1);
    u_R329 = NaN; kC_R329 = 10; kEQ_R329 = 0.825; kM_R329_M_h_c = 0.1021; kM_R329_M_3odecACP_c = 0.09797; kM_R329_M_ocACP_c = 0.1021; kM_R329_M_malACP_c = 0.1021; kM_R329_M_co2_c = 0.09797; kM_R329_M_ACP_c = 0.09797;
  R_3OAS120: M_h_c + M_dcaACP_c + M_malACP_c => M_3oddecACP_c + M_co2_c + M_ACP_c; u_R330*(kC_R330*sqrt(kEQ_R330*kM_R330_M_h_c*kM_R330_M_dcaACP_c*kM_R330_M_malACP_c/kM_R330_M_3oddecACP_c/kM_R330_M_co2_c/kM_R330_M_ACP_c)*(M_h_c/kM_R330_M_h_c)*(M_dcaACP_c/kM_R330_M_dcaACP_c)*(M_malACP_c/kM_R330_M_malACP_c) - kC_R330/sqrt(kEQ_R330*kM_R330_M_h_c*kM_R330_M_dcaACP_c*kM_R330_M_malACP_c/kM_R330_M_3oddecACP_c/kM_R330_M_co2_c/kM_R330_M_ACP_c)*(M_3oddecACP_c/kM_R330_M_3oddecACP_c)*(M_co2_c/kM_R330_M_co2_c)*(M_ACP_c/kM_R330_M_ACP_c))/((1 + M_h_c/kM_R330_M_h_c)*(1 + M_dcaACP_c/kM_R330_M_dcaACP_c)*(1 + M_malACP_c/kM_R330_M_malACP_c) + (1 + M_3oddecACP_c/kM_R330_M_3oddecACP_c)*(1 + M_co2_c/kM_R330_M_co2_c)*(1 + M_ACP_c/kM_R330_M_ACP_c) - 1);
    u_R330 = NaN; kC_R330 = 10; kEQ_R330 = 0.9519; kM_R330_M_h_c = 0.1005; kM_R330_M_dcaACP_c = 0.1005; kM_R330_M_malACP_c = 0.1005; kM_R330_M_3oddecACP_c = 0.09948; kM_R330_M_co2_c = 0.09948; kM_R330_M_ACP_c = 0.09948;
  R_3OAR40: M_h_c + M_actACP_c + M_nadph_c -> M_nadp_c + M_3haACP_c; u_R331*(kC_R331*sqrt(kEQ_R331*kM_R331_M_h_c*kM_R331_M_actACP_c*kM_R331_M_nadph_c/kM_R331_M_nadp_c/kM_R331_M_3haACP_c)*(M_h_c/kM_R331_M_h_c)*(M_actACP_c/kM_R331_M_actACP_c)*(M_nadph_c/kM_R331_M_nadph_c) - kC_R331/sqrt(kEQ_R331*kM_R331_M_h_c*kM_R331_M_actACP_c*kM_R331_M_nadph_c/kM_R331_M_nadp_c/kM_R331_M_3haACP_c)*(M_nadp_c/kM_R331_M_nadp_c)*(M_3haACP_c/kM_R331_M_3haACP_c))/((1 + M_h_c/kM_R331_M_h_c)*(1 + M_actACP_c/kM_R331_M_actACP_c)*(1 + M_nadph_c/kM_R331_M_nadph_c) + (1 + M_nadp_c/kM_R331_M_nadp_c)*(1 + M_3haACP_c/kM_R331_M_3haACP_c) - 1);
    u_R331 = NaN; kC_R331 = 10; kEQ_R331 = 1.02; kM_R331_M_h_c = 0.1312; kM_R331_M_actACP_c = 0.1312; kM_R331_M_nadp_c = 0.0762; kM_R331_M_nadph_c = 0.1312; kM_R331_M_3haACP_c = 0.0762;
  R_3OAR100: M_h_c + M_3odecACP_c + M_nadph_c -> M_nadp_c + M_3hdecACP_c; u_R332*(kC_R332*sqrt(kEQ_R332*kM_R332_M_h_c*kM_R332_M_3odecACP_c*kM_R332_M_nadph_c/kM_R332_M_nadp_c/kM_R332_M_3hdecACP_c)*(M_h_c/kM_R332_M_h_c)*(M_3odecACP_c/kM_R332_M_3odecACP_c)*(M_nadph_c/kM_R332_M_nadph_c) - kC_R332/sqrt(kEQ_R332*kM_R332_M_h_c*kM_R332_M_3odecACP_c*kM_R332_M_nadph_c/kM_R332_M_nadp_c/kM_R332_M_3hdecACP_c)*(M_nadp_c/kM_R332_M_nadp_c)*(M_3hdecACP_c/kM_R332_M_3hdecACP_c))/((1 + M_h_c/kM_R332_M_h_c)*(1 + M_3odecACP_c/kM_R332_M_3odecACP_c)*(1 + M_nadph_c/kM_R332_M_nadph_c) + (1 + M_nadp_c/kM_R332_M_nadp_c)*(1 + M_3hdecACP_c/kM_R332_M_3hdecACP_c) - 1);
    u_R332 = NaN; kC_R332 = 3.001; kEQ_R332 = 0.9648; kM_R332_M_h_c = 0.1254; kM_R332_M_3odecACP_c = 0.1254; kM_R332_M_nadp_c = 0.07971; kM_R332_M_nadph_c = 0.1254; kM_R332_M_3hdecACP_c = 0.07971;
  R_3HAD60: M_3hhexACP_c => M_the2eACP_c + M_h2o_c; u_R333*(kC_R333*sqrt(kEQ_R333*kM_R333_M_3hhexACP_c/kM_R333_M_the2eACP_c/kM_R333_M_h2o_c)*(M_3hhexACP_c/kM_R333_M_3hhexACP_c) - kC_R333/sqrt(kEQ_R333*kM_R333_M_3hhexACP_c/kM_R333_M_the2eACP_c/kM_R333_M_h2o_c)*(M_the2eACP_c/kM_R333_M_the2eACP_c)*(M_h2o_c/kM_R333_M_h2o_c))/(1 + M_3hhexACP_c/kM_R333_M_3hhexACP_c + (1 + M_the2eACP_c/kM_R333_M_the2eACP_c)*(1 + M_h2o_c/kM_R333_M_h2o_c) - 1);
    u_R333 = NaN; kC_R333 = 4.052; kEQ_R333 = 0.9738; kM_R333_M_the2eACP_c = 0.07832; kM_R333_M_3hhexACP_c = 0.1277; kM_R333_M_h2o_c = 0.07832;
  R_3HAD100: M_3hdecACP_c => M_tdec2eACP_c + M_h2o_c; u_R334*(kC_R334*sqrt(kEQ_R334*kM_R334_M_3hdecACP_c/kM_R334_M_tdec2eACP_c/kM_R334_M_h2o_c)*(M_3hdecACP_c/kM_R334_M_3hdecACP_c) - kC_R334/sqrt(kEQ_R334*kM_R334_M_3hdecACP_c/kM_R334_M_tdec2eACP_c/kM_R334_M_h2o_c)*(M_tdec2eACP_c/kM_R334_M_tdec2eACP_c)*(M_h2o_c/kM_R334_M_h2o_c))/(1 + M_3hdecACP_c/kM_R334_M_3hdecACP_c + (1 + M_tdec2eACP_c/kM_R334_M_tdec2eACP_c)*(1 + M_h2o_c/kM_R334_M_h2o_c) - 1);
    u_R334 = NaN; kC_R334 = 3.673; kEQ_R334 = 1.023; kM_R334_M_tdec2eACP_c = 0.07394; kM_R334_M_h2o_c = 0.07394; kM_R334_M_3hdecACP_c = 0.1352;
  R_3HAD140: M_3hmrsACP_c => M_h2o_c + M_tmrs2eACP_c; u_R335*(kC_R335*sqrt(kEQ_R335*kM_R335_M_3hmrsACP_c/kM_R335_M_h2o_c/kM_R335_M_tmrs2eACP_c)*(M_3hmrsACP_c/kM_R335_M_3hmrsACP_c) - kC_R335/sqrt(kEQ_R335*kM_R335_M_3hmrsACP_c/kM_R335_M_h2o_c/kM_R335_M_tmrs2eACP_c)*(M_h2o_c/kM_R335_M_h2o_c)*(M_tmrs2eACP_c/kM_R335_M_tmrs2eACP_c))/(1 + M_3hmrsACP_c/kM_R335_M_3hmrsACP_c + (1 + M_h2o_c/kM_R335_M_h2o_c)*(1 + M_tmrs2eACP_c/kM_R335_M_tmrs2eACP_c) - 1);
    u_R335 = NaN; kC_R335 = 4.089; kEQ_R335 = 1.052; kM_R335_M_h2o_c = 0.07976; kM_R335_M_tmrs2eACP_c = 0.07976; kM_R335_M_3hmrsACP_c = 0.1254;
  R_3HAD160: M_3hpalmACP_c => M_tpalm2eACP_c + M_h2o_c; u_R336*(kC_R336*sqrt(kEQ_R336*kM_R336_M_3hpalmACP_c/kM_R336_M_tpalm2eACP_c/kM_R336_M_h2o_c)*(M_3hpalmACP_c/kM_R336_M_3hpalmACP_c) - kC_R336/sqrt(kEQ_R336*kM_R336_M_3hpalmACP_c/kM_R336_M_tpalm2eACP_c/kM_R336_M_h2o_c)*(M_tpalm2eACP_c/kM_R336_M_tpalm2eACP_c)*(M_h2o_c/kM_R336_M_h2o_c))/(1 + M_3hpalmACP_c/kM_R336_M_3hpalmACP_c + (1 + M_tpalm2eACP_c/kM_R336_M_tpalm2eACP_c)*(1 + M_h2o_c/kM_R336_M_h2o_c) - 1);
    u_R336 = NaN; kC_R336 = 4.114; kEQ_R336 = 1.106; kM_R336_M_tpalm2eACP_c = 0.08071; kM_R336_M_3hpalmACP_c = 0.1239; kM_R336_M_h2o_c = 0.08071;
  R_EAR40x: M_h_c + M_but2eACP_c + M_nadh_c => M_nad_c + M_butACP_c; u_R337*(kC_R337*sqrt(kEQ_R337*kM_R337_M_h_c*kM_R337_M_but2eACP_c*kM_R337_M_nadh_c/kM_R337_M_nad_c/kM_R337_M_butACP_c)*(M_h_c/kM_R337_M_h_c)*(M_but2eACP_c/kM_R337_M_but2eACP_c)*(M_nadh_c/kM_R337_M_nadh_c) - kC_R337/sqrt(kEQ_R337*kM_R337_M_h_c*kM_R337_M_but2eACP_c*kM_R337_M_nadh_c/kM_R337_M_nad_c/kM_R337_M_butACP_c)*(M_nad_c/kM_R337_M_nad_c)*(M_butACP_c/kM_R337_M_butACP_c))/((1 + M_h_c/kM_R337_M_h_c)*(1 + M_but2eACP_c/kM_R337_M_but2eACP_c)*(1 + M_nadh_c/kM_R337_M_nadh_c) + (1 + M_nad_c/kM_R337_M_nad_c)*(1 + M_butACP_c/kM_R337_M_butACP_c) - 1);
    u_R337 = NaN; kC_R337 = 10; kEQ_R337 = 1.009; kM_R337_M_h_c = 0.1314; kM_R337_M_nad_c = 0.0761; kM_R337_M_butACP_c = 0.0761; kM_R337_M_but2eACP_c = 0.1314; kM_R337_M_nadh_c = 0.1314;
  R_EAR60y: M_h_c + M_the2eACP_c + M_nadph_c => M_hexACP_c + M_nadp_c; u_R338*(kC_R338*sqrt(kEQ_R338*kM_R338_M_h_c*kM_R338_M_the2eACP_c*kM_R338_M_nadph_c/kM_R338_M_hexACP_c/kM_R338_M_nadp_c)*(M_h_c/kM_R338_M_h_c)*(M_the2eACP_c/kM_R338_M_the2eACP_c)*(M_nadph_c/kM_R338_M_nadph_c) - kC_R338/sqrt(kEQ_R338*kM_R338_M_h_c*kM_R338_M_the2eACP_c*kM_R338_M_nadph_c/kM_R338_M_hexACP_c/kM_R338_M_nadp_c)*(M_hexACP_c/kM_R338_M_hexACP_c)*(M_nadp_c/kM_R338_M_nadp_c))/((1 + M_h_c/kM_R338_M_h_c)*(1 + M_the2eACP_c/kM_R338_M_the2eACP_c)*(1 + M_nadph_c/kM_R338_M_nadph_c) + (1 + M_hexACP_c/kM_R338_M_hexACP_c)*(1 + M_nadp_c/kM_R338_M_nadp_c) - 1);
    u_R338 = NaN; kC_R338 = 10; kEQ_R338 = 1.102; kM_R338_M_h_c = 0.13; kM_R338_M_the2eACP_c = 0.13; kM_R338_M_hexACP_c = 0.07691; kM_R338_M_nadp_c = 0.07691; kM_R338_M_nadph_c = 0.13;
  R_EAR60x: M_h_c + M_the2eACP_c + M_nadh_c => M_hexACP_c + M_nad_c; u_R339*(kC_R339*sqrt(kEQ_R339*kM_R339_M_h_c*kM_R339_M_the2eACP_c*kM_R339_M_nadh_c/kM_R339_M_hexACP_c/kM_R339_M_nad_c)*(M_h_c/kM_R339_M_h_c)*(M_the2eACP_c/kM_R339_M_the2eACP_c)*(M_nadh_c/kM_R339_M_nadh_c) - kC_R339/sqrt(kEQ_R339*kM_R339_M_h_c*kM_R339_M_the2eACP_c*kM_R339_M_nadh_c/kM_R339_M_hexACP_c/kM_R339_M_nad_c)*(M_hexACP_c/kM_R339_M_hexACP_c)*(M_nad_c/kM_R339_M_nad_c))/((1 + M_h_c/kM_R339_M_h_c)*(1 + M_the2eACP_c/kM_R339_M_the2eACP_c)*(1 + M_nadh_c/kM_R339_M_nadh_c) + (1 + M_hexACP_c/kM_R339_M_hexACP_c)*(1 + M_nad_c/kM_R339_M_nad_c) - 1);
    u_R339 = NaN; kC_R339 = 10; kEQ_R339 = 1.091; kM_R339_M_h_c = 0.1302; kM_R339_M_the2eACP_c = 0.1302; kM_R339_M_hexACP_c = 0.07681; kM_R339_M_nad_c = 0.07681; kM_R339_M_nadh_c = 0.1302;
  R_EAR80x: M_h_c + M_toct2eACP_c + M_nadh_c => M_nad_c + M_ocACP_c; u_R340*(kC_R340*sqrt(kEQ_R340*kM_R340_M_h_c*kM_R340_M_toct2eACP_c*kM_R340_M_nadh_c/kM_R340_M_nad_c/kM_R340_M_ocACP_c)*(M_h_c/kM_R340_M_h_c)*(M_toct2eACP_c/kM_R340_M_toct2eACP_c)*(M_nadh_c/kM_R340_M_nadh_c) - kC_R340/sqrt(kEQ_R340*kM_R340_M_h_c*kM_R340_M_toct2eACP_c*kM_R340_M_nadh_c/kM_R340_M_nad_c/kM_R340_M_ocACP_c)*(M_nad_c/kM_R340_M_nad_c)*(M_ocACP_c/kM_R340_M_ocACP_c))/((1 + M_h_c/kM_R340_M_h_c)*(1 + M_toct2eACP_c/kM_R340_M_toct2eACP_c)*(1 + M_nadh_c/kM_R340_M_nadh_c) + (1 + M_nad_c/kM_R340_M_nad_c)*(1 + M_ocACP_c/kM_R340_M_ocACP_c) - 1);
    u_R340 = NaN; kC_R340 = 10; kEQ_R340 = 1.088; kM_R340_M_h_c = 0.1302; kM_R340_M_toct2eACP_c = 0.1302; kM_R340_M_nad_c = 0.07679; kM_R340_M_ocACP_c = 0.07679; kM_R340_M_nadh_c = 0.1302;
  R_3OAR180: M_h_c + M_nadph_c + M_3ooctdACP_c -> M_3hoctaACP_c + M_nadp_c; u_R341*(kC_R341*sqrt(kEQ_R341*kM_R341_M_h_c*kM_R341_M_nadph_c*kM_R341_M_3ooctdACP_c/kM_R341_M_3hoctaACP_c/kM_R341_M_nadp_c)*(M_h_c/kM_R341_M_h_c)*(M_nadph_c/kM_R341_M_nadph_c)*(M_3ooctdACP_c/kM_R341_M_3ooctdACP_c) - kC_R341/sqrt(kEQ_R341*kM_R341_M_h_c*kM_R341_M_nadph_c*kM_R341_M_3ooctdACP_c/kM_R341_M_3hoctaACP_c/kM_R341_M_nadp_c)*(M_3hoctaACP_c/kM_R341_M_3hoctaACP_c)*(M_nadp_c/kM_R341_M_nadp_c))/((1 + M_h_c/kM_R341_M_h_c)*(1 + M_nadph_c/kM_R341_M_nadph_c)*(1 + M_3ooctdACP_c/kM_R341_M_3ooctdACP_c) + (1 + M_3hoctaACP_c/kM_R341_M_3hoctaACP_c)*(1 + M_nadp_c/kM_R341_M_nadp_c) - 1);
    u_R341 = NaN; kC_R341 = 10; kEQ_R341 = 1.084; kM_R341_M_h_c = 0.1303; kM_R341_M_3hoctaACP_c = 0.07676; kM_R341_M_nadp_c = 0.07676; kM_R341_M_nadph_c = 0.1303; kM_R341_M_3ooctdACP_c = 0.1303;
  R_3OAS180: M_h_c + M_malACP_c + M_palmACP_c => M_3ooctdACP_c + M_co2_c + M_ACP_c; u_R342*(kC_R342*sqrt(kEQ_R342*kM_R342_M_h_c*kM_R342_M_malACP_c*kM_R342_M_palmACP_c/kM_R342_M_3ooctdACP_c/kM_R342_M_co2_c/kM_R342_M_ACP_c)*(M_h_c/kM_R342_M_h_c)*(M_malACP_c/kM_R342_M_malACP_c)*(M_palmACP_c/kM_R342_M_palmACP_c) - kC_R342/sqrt(kEQ_R342*kM_R342_M_h_c*kM_R342_M_malACP_c*kM_R342_M_palmACP_c/kM_R342_M_3ooctdACP_c/kM_R342_M_co2_c/kM_R342_M_ACP_c)*(M_3ooctdACP_c/kM_R342_M_3ooctdACP_c)*(M_co2_c/kM_R342_M_co2_c)*(M_ACP_c/kM_R342_M_ACP_c))/((1 + M_h_c/kM_R342_M_h_c)*(1 + M_malACP_c/kM_R342_M_malACP_c)*(1 + M_palmACP_c/kM_R342_M_palmACP_c) + (1 + M_3ooctdACP_c/kM_R342_M_3ooctdACP_c)*(1 + M_co2_c/kM_R342_M_co2_c)*(1 + M_ACP_c/kM_R342_M_ACP_c) - 1);
    u_R342 = NaN; kC_R342 = 10; kEQ_R342 = 0.885; kM_R342_M_h_c = 0.1013; kM_R342_M_malACP_c = 0.1013; kM_R342_M_3ooctdACP_c = 0.09871; kM_R342_M_co2_c = 0.09871; kM_R342_M_ACP_c = 0.09871; kM_R342_M_palmACP_c = 0.1013;
  R_3HAD180: M_3hoctaACP_c => M_toctd2eACP_c + M_h2o_c; u_R343*(kC_R343*sqrt(kEQ_R343*kM_R343_M_3hoctaACP_c/kM_R343_M_toctd2eACP_c/kM_R343_M_h2o_c)*(M_3hoctaACP_c/kM_R343_M_3hoctaACP_c) - kC_R343/sqrt(kEQ_R343*kM_R343_M_3hoctaACP_c/kM_R343_M_toctd2eACP_c/kM_R343_M_h2o_c)*(M_toctd2eACP_c/kM_R343_M_toctd2eACP_c)*(M_h2o_c/kM_R343_M_h2o_c))/(1 + M_3hoctaACP_c/kM_R343_M_3hoctaACP_c + (1 + M_toctd2eACP_c/kM_R343_M_toctd2eACP_c)*(1 + M_h2o_c/kM_R343_M_h2o_c) - 1);
    u_R343 = NaN; kC_R343 = 3.71; kEQ_R343 = 1.114; kM_R343_M_3hoctaACP_c = 0.1326; kM_R343_M_toctd2eACP_c = 0.07544; kM_R343_M_h2o_c = 0.07544;
  R_NADH16pp: 4 M_h_c + M_q8_c + M_nadh_c => 3 M_h_p + M_nad_c + M_q8h2_c; u_R344*(kC_R344*sqrt(kEQ_R344*kM_R344_M_h_c^4*kM_R344_M_q8_c*kM_R344_M_nadh_c/kM_R344_M_h_p^3/kM_R344_M_nad_c/kM_R344_M_q8h2_c)*(M_h_c/kM_R344_M_h_c)^4*(M_q8_c/kM_R344_M_q8_c)*(M_nadh_c/kM_R344_M_nadh_c) - kC_R344/sqrt(kEQ_R344*kM_R344_M_h_c^4*kM_R344_M_q8_c*kM_R344_M_nadh_c/kM_R344_M_h_p^3/kM_R344_M_nad_c/kM_R344_M_q8h2_c)*(M_h_p/kM_R344_M_h_p)^3*(M_nad_c/kM_R344_M_nad_c)*(M_q8h2_c/kM_R344_M_q8h2_c))/((1 + M_h_c/kM_R344_M_h_c)^4*(1 + M_q8_c/kM_R344_M_q8_c)*(1 + M_nadh_c/kM_R344_M_nadh_c) + (1 + M_h_p/kM_R344_M_h_p)^3*(1 + M_nad_c/kM_R344_M_nad_c)*(1 + M_q8h2_c/kM_R344_M_q8h2_c) - 1);
    u_R344 = NaN; kC_R344 = 10; kEQ_R344 = 6.084; kM_R344_M_h_c = 0.08252; kM_R344_M_h_p = 0.1212; kM_R344_M_nad_c = 0.1212; kM_R344_M_q8h2_c = 0.1212; kM_R344_M_q8_c = 0.08252; kM_R344_M_nadh_c = 0.08252;
  R_FA160ACPHi: M_h2o_c + M_palmACP_c => M_h_c + M_hdca_c + M_ACP_c; u_R345*(kC_R345*sqrt(kEQ_R345*kM_R345_M_h2o_c*kM_R345_M_palmACP_c/kM_R345_M_h_c/kM_R345_M_hdca_c/kM_R345_M_ACP_c)*(M_h2o_c/kM_R345_M_h2o_c)*(M_palmACP_c/kM_R345_M_palmACP_c) - kC_R345/sqrt(kEQ_R345*kM_R345_M_h2o_c*kM_R345_M_palmACP_c/kM_R345_M_h_c/kM_R345_M_hdca_c/kM_R345_M_ACP_c)*(M_h_c/kM_R345_M_h_c)*(M_hdca_c/kM_R345_M_hdca_c)*(M_ACP_c/kM_R345_M_ACP_c))/((1 + M_h2o_c/kM_R345_M_h2o_c)*(1 + M_palmACP_c/kM_R345_M_palmACP_c) + (1 + M_h_c/kM_R345_M_h_c)*(1 + M_hdca_c/kM_R345_M_hdca_c)*(1 + M_ACP_c/kM_R345_M_ACP_c) - 1);
    u_R345 = NaN; kC_R345 = 10; kEQ_R345 = 4174; kM_R345_M_h_c = 0.3549; kM_R345_M_h2o_c = 0.02818; kM_R345_M_hdca_c = 0.3549; kM_R345_M_ACP_c = 0.3549; kM_R345_M_palmACP_c = 0.02818;
  R_FA120ACPHi: M_h2o_c + M_ddcaACP_c => M_h_c + M_ddca_c + M_ACP_c; u_R346*(kC_R346*sqrt(kEQ_R346*kM_R346_M_h2o_c*kM_R346_M_ddcaACP_c/kM_R346_M_h_c/kM_R346_M_ddca_c/kM_R346_M_ACP_c)*(M_h2o_c/kM_R346_M_h2o_c)*(M_ddcaACP_c/kM_R346_M_ddcaACP_c) - kC_R346/sqrt(kEQ_R346*kM_R346_M_h2o_c*kM_R346_M_ddcaACP_c/kM_R346_M_h_c/kM_R346_M_ddca_c/kM_R346_M_ACP_c)*(M_h_c/kM_R346_M_h_c)*(M_ddca_c/kM_R346_M_ddca_c)*(M_ACP_c/kM_R346_M_ACP_c))/((1 + M_h2o_c/kM_R346_M_h2o_c)*(1 + M_ddcaACP_c/kM_R346_M_ddcaACP_c) + (1 + M_h_c/kM_R346_M_h_c)*(1 + M_ddca_c/kM_R346_M_ddca_c)*(1 + M_ACP_c/kM_R346_M_ACP_c) - 1);
    u_R346 = NaN; kC_R346 = 10; kEQ_R346 = 4186; kM_R346_M_h_c = 0.355; kM_R346_M_h2o_c = 0.02817; kM_R346_M_ddcaACP_c = 0.02817; kM_R346_M_ddca_c = 0.355; kM_R346_M_ACP_c = 0.355;
  R_FA80ACPHi: M_ocACP_c + M_h2o_c => M_h_c + M_octa_c + M_ACP_c; u_R347*(kC_R347*sqrt(kEQ_R347*kM_R347_M_ocACP_c*kM_R347_M_h2o_c/kM_R347_M_h_c/kM_R347_M_octa_c/kM_R347_M_ACP_c)*(M_ocACP_c/kM_R347_M_ocACP_c)*(M_h2o_c/kM_R347_M_h2o_c) - kC_R347/sqrt(kEQ_R347*kM_R347_M_ocACP_c*kM_R347_M_h2o_c/kM_R347_M_h_c/kM_R347_M_octa_c/kM_R347_M_ACP_c)*(M_h_c/kM_R347_M_h_c)*(M_octa_c/kM_R347_M_octa_c)*(M_ACP_c/kM_R347_M_ACP_c))/((1 + M_ocACP_c/kM_R347_M_ocACP_c)*(1 + M_h2o_c/kM_R347_M_h2o_c) + (1 + M_h_c/kM_R347_M_h_c)*(1 + M_octa_c/kM_R347_M_octa_c)*(1 + M_ACP_c/kM_R347_M_ACP_c) - 1);
    u_R347 = NaN; kC_R347 = 10; kEQ_R347 = 4197; kM_R347_M_h_c = 0.3551; kM_R347_M_octa_c = 0.3551; kM_R347_M_ocACP_c = 0.02816; kM_R347_M_h2o_c = 0.02816; kM_R347_M_ACP_c = 0.3551;
  R_FA140ACPHi: M_h2o_c + M_myrsACP_c => M_h_c + M_ttdca_c + M_ACP_c; u_R348*(kC_R348*sqrt(kEQ_R348*kM_R348_M_h2o_c*kM_R348_M_myrsACP_c/kM_R348_M_h_c/kM_R348_M_ttdca_c/kM_R348_M_ACP_c)*(M_h2o_c/kM_R348_M_h2o_c)*(M_myrsACP_c/kM_R348_M_myrsACP_c) - kC_R348/sqrt(kEQ_R348*kM_R348_M_h2o_c*kM_R348_M_myrsACP_c/kM_R348_M_h_c/kM_R348_M_ttdca_c/kM_R348_M_ACP_c)*(M_h_c/kM_R348_M_h_c)*(M_ttdca_c/kM_R348_M_ttdca_c)*(M_ACP_c/kM_R348_M_ACP_c))/((1 + M_h2o_c/kM_R348_M_h2o_c)*(1 + M_myrsACP_c/kM_R348_M_myrsACP_c) + (1 + M_h_c/kM_R348_M_h_c)*(1 + M_ttdca_c/kM_R348_M_ttdca_c)*(1 + M_ACP_c/kM_R348_M_ACP_c) - 1);
    u_R348 = NaN; kC_R348 = 10; kEQ_R348 = 4180; kM_R348_M_h_c = 0.3549; kM_R348_M_ttdca_c = 0.3549; kM_R348_M_h2o_c = 0.02817; kM_R348_M_myrsACP_c = 0.02817; kM_R348_M_ACP_c = 0.3549;
  R_FA100ACPHi: M_h2o_c + M_dcaACP_c => M_dca_c + M_h_c + M_ACP_c; u_R349*(kC_R349*sqrt(kEQ_R349*kM_R349_M_h2o_c*kM_R349_M_dcaACP_c/kM_R349_M_dca_c/kM_R349_M_h_c/kM_R349_M_ACP_c)*(M_h2o_c/kM_R349_M_h2o_c)*(M_dcaACP_c/kM_R349_M_dcaACP_c) - kC_R349/sqrt(kEQ_R349*kM_R349_M_h2o_c*kM_R349_M_dcaACP_c/kM_R349_M_dca_c/kM_R349_M_h_c/kM_R349_M_ACP_c)*(M_dca_c/kM_R349_M_dca_c)*(M_h_c/kM_R349_M_h_c)*(M_ACP_c/kM_R349_M_ACP_c))/((1 + M_h2o_c/kM_R349_M_h2o_c)*(1 + M_dcaACP_c/kM_R349_M_dcaACP_c) + (1 + M_dca_c/kM_R349_M_dca_c)*(1 + M_h_c/kM_R349_M_h_c)*(1 + M_ACP_c/kM_R349_M_ACP_c) - 1);
    u_R349 = NaN; kC_R349 = 10; kEQ_R349 = 4192; kM_R349_M_dca_c = 0.3551; kM_R349_M_h_c = 0.3551; kM_R349_M_h2o_c = 0.02816; kM_R349_M_dcaACP_c = 0.02816; kM_R349_M_ACP_c = 0.3551;
  R_ETOHtrpp: M_etoh_p -> M_etoh_c; u_R350*(kC_R350*sqrt(kEQ_R350*kM_R350_M_etoh_p/kM_R350_M_etoh_c)*(M_etoh_p/kM_R350_M_etoh_p) - kC_R350/sqrt(kEQ_R350*kM_R350_M_etoh_p/kM_R350_M_etoh_c)*(M_etoh_c/kM_R350_M_etoh_c))/(1 + M_etoh_p/kM_R350_M_etoh_p + 1 + M_etoh_c/kM_R350_M_etoh_c - 1);
    u_R350 = NaN; kC_R350 = 10; kEQ_R350 = 99.25; kM_R350_M_etoh_c = 0.2343; kM_R350_M_etoh_p = 0.04268;
  R_ACPPAT161: M_h_c + M_hdeACP_c + M_pi_c => M_hdceap_c + M_ACP_c; u_R351*(kC_R351*sqrt(kEQ_R351*kM_R351_M_h_c*kM_R351_M_hdeACP_c*kM_R351_M_pi_c/kM_R351_M_hdceap_c/kM_R351_M_ACP_c)*(M_h_c/kM_R351_M_h_c)*(M_hdeACP_c/kM_R351_M_hdeACP_c)*(M_pi_c/kM_R351_M_pi_c) - kC_R351/sqrt(kEQ_R351*kM_R351_M_h_c*kM_R351_M_hdeACP_c*kM_R351_M_pi_c/kM_R351_M_hdceap_c/kM_R351_M_ACP_c)*(M_hdceap_c/kM_R351_M_hdceap_c)*(M_ACP_c/kM_R351_M_ACP_c))/((1 + M_h_c/kM_R351_M_h_c)*(1 + M_hdeACP_c/kM_R351_M_hdeACP_c)*(1 + M_pi_c/kM_R351_M_pi_c) + (1 + M_hdceap_c/kM_R351_M_hdceap_c)*(1 + M_ACP_c/kM_R351_M_ACP_c) - 1);
    u_R351 = NaN; kC_R351 = 10; kEQ_R351 = 1.151; kM_R351_M_h_c = 0.1294; kM_R351_M_hdceap_c = 0.07731; kM_R351_M_hdeACP_c = 0.1294; kM_R351_M_pi_c = 0.1294; kM_R351_M_ACP_c = 0.07731;
  R_ACPPAT180: M_h_c + M_pi_c + M_ocdcaACP_c => M_ocdcap_c + M_ACP_c; u_R352*(kC_R352*sqrt(kEQ_R352*kM_R352_M_h_c*kM_R352_M_pi_c*kM_R352_M_ocdcaACP_c/kM_R352_M_ocdcap_c/kM_R352_M_ACP_c)*(M_h_c/kM_R352_M_h_c)*(M_pi_c/kM_R352_M_pi_c)*(M_ocdcaACP_c/kM_R352_M_ocdcaACP_c) - kC_R352/sqrt(kEQ_R352*kM_R352_M_h_c*kM_R352_M_pi_c*kM_R352_M_ocdcaACP_c/kM_R352_M_ocdcap_c/kM_R352_M_ACP_c)*(M_ocdcap_c/kM_R352_M_ocdcap_c)*(M_ACP_c/kM_R352_M_ACP_c))/((1 + M_h_c/kM_R352_M_h_c)*(1 + M_pi_c/kM_R352_M_pi_c)*(1 + M_ocdcaACP_c/kM_R352_M_ocdcaACP_c) + (1 + M_ocdcap_c/kM_R352_M_ocdcap_c)*(1 + M_ACP_c/kM_R352_M_ACP_c) - 1);
    u_R352 = NaN; kC_R352 = 10; kEQ_R352 = 323.8; kM_R352_M_h_c = 0.0661; kM_R352_M_pi_c = 0.0661; kM_R352_M_ocdcaACP_c = 0.0661; kM_R352_M_ocdcap_c = 0.1513; kM_R352_M_ACP_c = 0.1513;
  R_RNTR1c2: 2 M_flxr_c + 2 M_h_c + M_atp_c => M_datp_c + M_h2o_c + 2 M_flxso_c; u_R353*(kC_R353*sqrt(kEQ_R353*kM_R353_M_flxr_c^2*kM_R353_M_h_c^2*kM_R353_M_atp_c/kM_R353_M_datp_c/kM_R353_M_h2o_c/kM_R353_M_flxso_c^2)*(M_flxr_c/kM_R353_M_flxr_c)^2*(M_h_c/kM_R353_M_h_c)^2*(M_atp_c/kM_R353_M_atp_c) - kC_R353/sqrt(kEQ_R353*kM_R353_M_flxr_c^2*kM_R353_M_h_c^2*kM_R353_M_atp_c/kM_R353_M_datp_c/kM_R353_M_h2o_c/kM_R353_M_flxso_c^2)*(M_datp_c/kM_R353_M_datp_c)*(M_h2o_c/kM_R353_M_h2o_c)*(M_flxso_c/kM_R353_M_flxso_c)^2)/((1 + M_flxr_c/kM_R353_M_flxr_c)^2*(1 + M_h_c/kM_R353_M_h_c)^2*(1 + M_atp_c/kM_R353_M_atp_c) + (1 + M_datp_c/kM_R353_M_datp_c)*(1 + M_h2o_c/kM_R353_M_h2o_c)*(1 + M_flxso_c/kM_R353_M_flxso_c)^2 - 1);
    u_R353 = NaN; kC_R353 = 10; kEQ_R353 = 530.7; kM_R353_M_flxr_c = 0.06494; kM_R353_M_h_c = 0.06494; kM_R353_M_atp_c = 0.08059; kM_R353_M_datp_c = 0.1241; kM_R353_M_h2o_c = 0.1241; kM_R353_M_flxso_c = 0.154;
  R_RNTR2c2: 2 M_flxr_c + 2 M_h_c + M_gtp_c => M_h2o_c + 2 M_flxso_c + M_dgtp_c; u_R354*(kC_R354*sqrt(kEQ_R354*kM_R354_M_flxr_c^2*kM_R354_M_h_c^2*kM_R354_M_gtp_c/kM_R354_M_h2o_c/kM_R354_M_flxso_c^2/kM_R354_M_dgtp_c)*(M_flxr_c/kM_R354_M_flxr_c)^2*(M_h_c/kM_R354_M_h_c)^2*(M_gtp_c/kM_R354_M_gtp_c) - kC_R354/sqrt(kEQ_R354*kM_R354_M_flxr_c^2*kM_R354_M_h_c^2*kM_R354_M_gtp_c/kM_R354_M_h2o_c/kM_R354_M_flxso_c^2/kM_R354_M_dgtp_c)*(M_h2o_c/kM_R354_M_h2o_c)*(M_flxso_c/kM_R354_M_flxso_c)^2*(M_dgtp_c/kM_R354_M_dgtp_c))/((1 + M_flxr_c/kM_R354_M_flxr_c)^2*(1 + M_h_c/kM_R354_M_h_c)^2*(1 + M_gtp_c/kM_R354_M_gtp_c) + (1 + M_h2o_c/kM_R354_M_h2o_c)*(1 + M_flxso_c/kM_R354_M_flxso_c)^2*(1 + M_dgtp_c/kM_R354_M_dgtp_c) - 1);
    u_R354 = NaN; kC_R354 = 10; kEQ_R354 = 84.75; kM_R354_M_flxr_c = 0.07927; kM_R354_M_h_c = 0.07927; kM_R354_M_h2o_c = 0.1123; kM_R354_M_flxso_c = 0.1261; kM_R354_M_gtp_c = 0.08903; kM_R354_M_dgtp_c = 0.1123;
  R_FLDR2: 2 M_flxso_c + M_nadph_c => 2 M_flxr_c + M_h_c + M_nadp_c; u_R355*(kC_R355*sqrt(kEQ_R355*kM_R355_M_flxso_c^2*kM_R355_M_nadph_c/kM_R355_M_flxr_c^2/kM_R355_M_h_c/kM_R355_M_nadp_c)*(M_flxso_c/kM_R355_M_flxso_c)^2*(M_nadph_c/kM_R355_M_nadph_c) - kC_R355/sqrt(kEQ_R355*kM_R355_M_flxso_c^2*kM_R355_M_nadph_c/kM_R355_M_flxr_c^2/kM_R355_M_h_c/kM_R355_M_nadp_c)*(M_flxr_c/kM_R355_M_flxr_c)^2*(M_h_c/kM_R355_M_h_c)*(M_nadp_c/kM_R355_M_nadp_c))/((1 + M_flxso_c/kM_R355_M_flxso_c)^2*(1 + M_nadph_c/kM_R355_M_nadph_c) + (1 + M_flxr_c/kM_R355_M_flxr_c)^2*(1 + M_h_c/kM_R355_M_h_c)*(1 + M_nadp_c/kM_R355_M_nadp_c) - 1);
    u_R355 = NaN; kC_R355 = 10; kEQ_R355 = 29860; kM_R355_M_flxr_c = 0.576; kM_R355_M_h_c = 0.24; kM_R355_M_nadp_c = 0.24; kM_R355_M_flxso_c = 0.01736; kM_R355_M_nadph_c = 0.04167;
  R_VPAMTr: M_3mob_c + M_ala__L_c -> M_val__L_c + M_pyr_c; u_R356*(kC_R356*sqrt(kEQ_R356*kM_R356_M_3mob_c*kM_R356_M_ala__L_c/kM_R356_M_val__L_c/kM_R356_M_pyr_c)*(M_3mob_c/kM_R356_M_3mob_c)*(M_ala__L_c/kM_R356_M_ala__L_c) - kC_R356/sqrt(kEQ_R356*kM_R356_M_3mob_c*kM_R356_M_ala__L_c/kM_R356_M_val__L_c/kM_R356_M_pyr_c)*(M_val__L_c/kM_R356_M_val__L_c)*(M_pyr_c/kM_R356_M_pyr_c))/((1 + M_3mob_c/kM_R356_M_3mob_c)*(1 + M_ala__L_c/kM_R356_M_ala__L_c) + (1 + M_val__L_c/kM_R356_M_val__L_c)*(1 + M_pyr_c/kM_R356_M_pyr_c) - 1);
    u_R356 = NaN; kC_R356 = 9.753; kEQ_R356 = 1.752; kM_R356_M_3mob_c = 0.1932; kM_R356_M_ala__L_c = 0.1932; kM_R356_M_val__L_c = 0.05177; kM_R356_M_pyr_c = 0.05177;
  R_ACPPAT181: M_h_c + M_pi_c + M_octeACP_c => M_ocdceap_c + M_ACP_c; u_R357*(kC_R357*sqrt(kEQ_R357*kM_R357_M_h_c*kM_R357_M_pi_c*kM_R357_M_octeACP_c/kM_R357_M_ocdceap_c/kM_R357_M_ACP_c)*(M_h_c/kM_R357_M_h_c)*(M_pi_c/kM_R357_M_pi_c)*(M_octeACP_c/kM_R357_M_octeACP_c) - kC_R357/sqrt(kEQ_R357*kM_R357_M_h_c*kM_R357_M_pi_c*kM_R357_M_octeACP_c/kM_R357_M_ocdceap_c/kM_R357_M_ACP_c)*(M_ocdceap_c/kM_R357_M_ocdceap_c)*(M_ACP_c/kM_R357_M_ACP_c))/((1 + M_h_c/kM_R357_M_h_c)*(1 + M_pi_c/kM_R357_M_pi_c)*(1 + M_octeACP_c/kM_R357_M_octeACP_c) + (1 + M_ocdceap_c/kM_R357_M_ocdceap_c)*(1 + M_ACP_c/kM_R357_M_ACP_c) - 1);
    u_R357 = NaN; kC_R357 = 10; kEQ_R357 = 1.145; kM_R357_M_h_c = 0.1294; kM_R357_M_pi_c = 0.1294; kM_R357_M_octeACP_c = 0.1294; kM_R357_M_ocdceap_c = 0.07726; kM_R357_M_ACP_c = 0.07726;
  R_APH161: M_hdceap_c + M_h2o_c => 2 M_h_c + M_hdcea_c + M_pi_c; u_R358*(kC_R358*sqrt(kEQ_R358*kM_R358_M_hdceap_c*kM_R358_M_h2o_c/kM_R358_M_h_c^2/kM_R358_M_hdcea_c/kM_R358_M_pi_c)*(M_hdceap_c/kM_R358_M_hdceap_c)*(M_h2o_c/kM_R358_M_h2o_c) - kC_R358/sqrt(kEQ_R358*kM_R358_M_hdceap_c*kM_R358_M_h2o_c/kM_R358_M_h_c^2/kM_R358_M_hdcea_c/kM_R358_M_pi_c)*(M_h_c/kM_R358_M_h_c)^2*(M_hdcea_c/kM_R358_M_hdcea_c)*(M_pi_c/kM_R358_M_pi_c))/((1 + M_hdceap_c/kM_R358_M_hdceap_c)*(1 + M_h2o_c/kM_R358_M_h2o_c) + (1 + M_h_c/kM_R358_M_h_c)^2*(1 + M_hdcea_c/kM_R358_M_hdcea_c)*(1 + M_pi_c/kM_R358_M_pi_c) - 1);
    u_R358 = NaN; kC_R358 = 10; kEQ_R358 = 0.7405; kM_R358_M_h_c = 0.2128; kM_R358_M_hdcea_c = 0.1459; kM_R358_M_hdceap_c = 0.06855; kM_R358_M_pi_c = 0.1459; kM_R358_M_h2o_c = 0.06855;
  R_APH180: M_h2o_c + M_ocdcap_c => 2 M_h_c + M_ocdca_c + M_pi_c; u_R359*(kC_R359*sqrt(kEQ_R359*kM_R359_M_h2o_c*kM_R359_M_ocdcap_c/kM_R359_M_h_c^2/kM_R359_M_ocdca_c/kM_R359_M_pi_c)*(M_h2o_c/kM_R359_M_h2o_c)*(M_ocdcap_c/kM_R359_M_ocdcap_c) - kC_R359/sqrt(kEQ_R359*kM_R359_M_h2o_c*kM_R359_M_ocdcap_c/kM_R359_M_h_c^2/kM_R359_M_ocdca_c/kM_R359_M_pi_c)*(M_h_c/kM_R359_M_h_c)^2*(M_ocdca_c/kM_R359_M_ocdca_c)*(M_pi_c/kM_R359_M_pi_c))/((1 + M_h2o_c/kM_R359_M_h2o_c)*(1 + M_ocdcap_c/kM_R359_M_ocdcap_c) + (1 + M_h_c/kM_R359_M_h_c)^2*(1 + M_ocdca_c/kM_R359_M_ocdca_c)*(1 + M_pi_c/kM_R359_M_pi_c) - 1);
    u_R359 = NaN; kC_R359 = 10; kEQ_R359 = 237.8; kM_R359_M_h_c = 0.5859; kM_R359_M_ocdca_c = 0.242; kM_R359_M_pi_c = 0.242; kM_R359_M_h2o_c = 0.04131; kM_R359_M_ocdcap_c = 0.04131;
  R_APH181: M_h2o_c + M_ocdceap_c => 2 M_h_c + M_ocdcea_c + M_pi_c; u_R360*(kC_R360*sqrt(kEQ_R360*kM_R360_M_h2o_c*kM_R360_M_ocdceap_c/kM_R360_M_h_c^2/kM_R360_M_ocdcea_c/kM_R360_M_pi_c)*(M_h2o_c/kM_R360_M_h2o_c)*(M_ocdceap_c/kM_R360_M_ocdceap_c) - kC_R360/sqrt(kEQ_R360*kM_R360_M_h2o_c*kM_R360_M_ocdceap_c/kM_R360_M_h_c^2/kM_R360_M_ocdcea_c/kM_R360_M_pi_c)*(M_h_c/kM_R360_M_h_c)^2*(M_ocdcea_c/kM_R360_M_ocdcea_c)*(M_pi_c/kM_R360_M_pi_c))/((1 + M_h2o_c/kM_R360_M_h2o_c)*(1 + M_ocdceap_c/kM_R360_M_ocdceap_c) + (1 + M_h_c/kM_R360_M_h_c)^2*(1 + M_ocdcea_c/kM_R360_M_ocdcea_c)*(1 + M_pi_c/kM_R360_M_pi_c) - 1);
    u_R360 = NaN; kC_R360 = 10; kEQ_R360 = 0.7386; kM_R360_M_h_c = 0.2127; kM_R360_M_ocdcea_c = 0.1458; kM_R360_M_pi_c = 0.1458; kM_R360_M_h2o_c = 0.06856; kM_R360_M_ocdceap_c = 0.06856;
  R_PIt2rpp: M_h_p + M_pi_p => M_h_c + M_pi_c; u_R361*(kC_R361*sqrt(kEQ_R361*kM_R361_M_h_p*kM_R361_M_pi_p/kM_R361_M_h_c/kM_R361_M_pi_c)*(M_h_p/kM_R361_M_h_p)*(M_pi_p/kM_R361_M_pi_p) - kC_R361/sqrt(kEQ_R361*kM_R361_M_h_p*kM_R361_M_pi_p/kM_R361_M_h_c/kM_R361_M_pi_c)*(M_h_c/kM_R361_M_h_c)*(M_pi_c/kM_R361_M_pi_c))/((1 + M_h_p/kM_R361_M_h_p)*(1 + M_pi_p/kM_R361_M_pi_p) + (1 + M_h_c/kM_R361_M_h_c)*(1 + M_pi_c/kM_R361_M_pi_c) - 1);
    u_R361 = NaN; kC_R361 = 10; kEQ_R361 = 22.89; kM_R361_M_h_c = 0.1527; kM_R361_M_h_p = 0.0655; kM_R361_M_pi_c = 0.1527; kM_R361_M_pi_p = 0.0655;
  R_PItpp: M_pi_c => M_pi_p; u_R362*(kC_R362*sqrt(kEQ_R362*kM_R362_M_pi_c/kM_R362_M_pi_p)*(M_pi_c/kM_R362_M_pi_c) - kC_R362/sqrt(kEQ_R362*kM_R362_M_pi_c/kM_R362_M_pi_p)*(M_pi_p/kM_R362_M_pi_p))/(1 + M_pi_c/kM_R362_M_pi_c + 1 + M_pi_p/kM_R362_M_pi_p - 1);
    u_R362 = NaN; kC_R362 = 10; kEQ_R362 = 0.1324; kM_R362_M_pi_c = 0.1454; kM_R362_M_pi_p = 0.06876;
  R_SUCCt1pp: M_succ_p -> M_succ_c; u_R363*(kC_R363*sqrt(kEQ_R363*kM_R363_M_succ_p/kM_R363_M_succ_c)*(M_succ_p/kM_R363_M_succ_p) - kC_R363/sqrt(kEQ_R363*kM_R363_M_succ_p/kM_R363_M_succ_c)*(M_succ_c/kM_R363_M_succ_c))/(1 + M_succ_p/kM_R363_M_succ_p + 1 + M_succ_c/kM_R363_M_succ_c - 1);
    u_R363 = NaN; kC_R363 = 10; kEQ_R363 = 0.2708; kM_R363_M_succ_p = 0.1274; kM_R363_M_succ_c = 0.07851;
  R_RBIO: 0.002278 M_dhap_c + 0.253687 M_thr__L_c + 0.0667 M_pep_c + 0.139028 M_glyc3p_c + 0.35482 M_ser__L_c + 0.160525 M_ctp_c + 0.094488 M_accoa_c + 0.295792 M_arg__L_c + 0.243909 M_asp__L_c + 0.191737 M_h_p + 0.153686 M_met__L_c + 0.015068 M_nh4_c + 0.150428 M_hdeACP_c + 0.137896 M_tyr__L_c + 0.092156 M_cys__L_c + 0.056843 M_trp__L_c + 0.343161 M_lys__L_c + 76.234149 M_atp_c + 0.027788 M_26dap__M_c + 0.026166 M_dttp_c + 0.027017 M_dctp_c + 0.039358 M_ru5p__D_c + 0.238592 M_utp_c + 0.026166 M_datp_c + 0.19646 M_glu__L_c + 0.002278 M_fum_c + 0.290529 M_ile__L_c + 0.000576 M_3mob_c + 0.357648 M_gln__L_c + 0.583159 M_ala__L_c + 0.185265 M_phe__L_c + 0.000576 M_mlthf_c + 70.374734 M_h2o_c + 0.612638 M_gly_c + 0.094488 M_f6p_c + 0.002278 M_prpp_c + 0.094738 M_his__L_c + 0.004338 M_so4_c + 0.215319 M_gtp_c + 0.028587 M_nadph_c + 0.423162 M_val__L_c + 0.221055 M_pro__L_c + 0.241055 M_asn__L_c + 0.450531 M_leu__L_c + 0.077824 M_3hmrsACP_c + 0.027017 M_dgtp_c + 0.127628 M_palmACP_c => 0.038912 M_ac_c + 75.96447 M_h_c + 0.047244 M_ump_c + 76.053218 M_adp_c + 75.834272 M_pi_c + 0.000576 M_thf_c + 1.055339 M_ppi_c + 0.028587 M_nadp_c + 0.002278 M_succ_c + 0.027017 M_cdp_c + 0.002854 M_amp_c + 0.000669 M_for_c + 0.094488 M_coa_c + 0.047244 M_udp_c + 0.142458 M_co2_c + 0.35588 M_ACP_c; u_R364*(kC_R364*sqrt(kEQ_R364*kM_R364_M_dhap_c^2.278e-3*kM_R364_M_thr__L_c^2.53687e-1*kM_R364_M_pep_c^6.67e-2*kM_R364_M_glyc3p_c^1.39028e-1*kM_R364_M_ser__L_c^3.5482e-1*kM_R364_M_ctp_c^1.60525e-1*kM_R364_M_accoa_c^9.4488e-2*kM_R364_M_arg__L_c^2.95792e-1*kM_R364_M_asp__L_c^2.43909e-1*kM_R364_M_h_p^1.91737e-1*kM_R364_M_met__L_c^1.53686e-1*kM_R364_M_nh4_c^1.5068e-2*kM_R364_M_hdeACP_c^1.50428e-1*kM_R364_M_tyr__L_c^1.37896e-1*kM_R364_M_cys__L_c^9.2156e-2*kM_R364_M_trp__L_c^5.6843e-2*kM_R364_M_lys__L_c^3.43161e-1*kM_R364_M_atp_c^7.623415e1*kM_R364_M_26dap__M_c^2.7788e-2*kM_R364_M_dttp_c^2.6166e-2*kM_R364_M_dctp_c^2.7017e-2*kM_R364_M_ru5p__D_c^3.9358e-2*kM_R364_M_utp_c^2.38592e-1*kM_R364_M_datp_c^2.6166e-2*kM_R364_M_glu__L_c^1.9646e-1*kM_R364_M_fum_c^2.278e-3*kM_R364_M_ile__L_c^2.90529e-1*kM_R364_M_3mob_c^5.76e-4*kM_R364_M_gln__L_c^3.57648e-1*kM_R364_M_ala__L_c^5.83159e-1*kM_R364_M_phe__L_c^1.85265e-1*kM_R364_M_mlthf_c^5.76e-4*kM_R364_M_h2o_c^7.037473e1*kM_R364_M_gly_c^6.12638e-1*kM_R364_M_f6p_c^9.4488e-2*kM_R364_M_prpp_c^2.278e-3*kM_R364_M_his__L_c^9.4738e-2*kM_R364_M_so4_c^4.338e-3*kM_R364_M_gtp_c^2.15319e-1*kM_R364_M_nadph_c^2.8587e-2*kM_R364_M_val__L_c^4.23162e-1*kM_R364_M_pro__L_c^2.21055e-1*kM_R364_M_asn__L_c^2.41055e-1*kM_R364_M_leu__L_c^4.50531e-1*kM_R364_M_3hmrsACP_c^7.7824e-2*kM_R364_M_dgtp_c^2.7017e-2*kM_R364_M_palmACP_c^1.27628e-1/kM_R364_M_ac_c^3.8912e-2/kM_R364_M_h_c^7.596447e1/kM_R364_M_ump_c^4.7244e-2/kM_R364_M_adp_c^7.605322e1/kM_R364_M_pi_c^7.583427e1/kM_R364_M_thf_c^5.76e-4/kM_R364_M_ppi_c^1.055339/kM_R364_M_nadp_c^2.8587e-2/kM_R364_M_succ_c^2.278e-3/kM_R364_M_cdp_c^2.7017e-2/kM_R364_M_amp_c^2.854e-3/kM_R364_M_for_c^6.69e-4/kM_R364_M_coa_c^9.4488e-2/kM_R364_M_udp_c^4.7244e-2/kM_R364_M_co2_c^1.42458e-1/kM_R364_M_ACP_c^3.5588e-1)*(M_dhap_c/kM_R364_M_dhap_c)^2.278e-3*(M_thr__L_c/kM_R364_M_thr__L_c)^2.53687e-1*(M_pep_c/kM_R364_M_pep_c)^6.67e-2*(M_glyc3p_c/kM_R364_M_glyc3p_c)^1.39028e-1*(M_ser__L_c/kM_R364_M_ser__L_c)^3.5482e-1*(M_ctp_c/kM_R364_M_ctp_c)^1.60525e-1*(M_accoa_c/kM_R364_M_accoa_c)^9.4488e-2*(M_arg__L_c/kM_R364_M_arg__L_c)^2.95792e-1*(M_asp__L_c/kM_R364_M_asp__L_c)^2.43909e-1*(M_h_p/kM_R364_M_h_p)^1.91737e-1*(M_met__L_c/kM_R364_M_met__L_c)^1.53686e-1*(M_nh4_c/kM_R364_M_nh4_c)^1.5068e-2*(M_hdeACP_c/kM_R364_M_hdeACP_c)^1.50428e-1*(M_tyr__L_c/kM_R364_M_tyr__L_c)^1.37896e-1*(M_cys__L_c/kM_R364_M_cys__L_c)^9.2156e-2*(M_trp__L_c/kM_R364_M_trp__L_c)^5.6843e-2*(M_lys__L_c/kM_R364_M_lys__L_c)^3.43161e-1*(M_atp_c/kM_R364_M_atp_c)^7.623415e1*(M_26dap__M_c/kM_R364_M_26dap__M_c)^2.7788e-2*(M_dttp_c/kM_R364_M_dttp_c)^2.6166e-2*(M_dctp_c/kM_R364_M_dctp_c)^2.7017e-2*(M_ru5p__D_c/kM_R364_M_ru5p__D_c)^3.9358e-2*(M_utp_c/kM_R364_M_utp_c)^2.38592e-1*(M_datp_c/kM_R364_M_datp_c)^2.6166e-2*(M_glu__L_c/kM_R364_M_glu__L_c)^1.9646e-1*(M_fum_c/kM_R364_M_fum_c)^2.278e-3*(M_ile__L_c/kM_R364_M_ile__L_c)^2.90529e-1*(M_3mob_c/kM_R364_M_3mob_c)^5.76e-4*(M_gln__L_c/kM_R364_M_gln__L_c)^3.57648e-1*(M_ala__L_c/kM_R364_M_ala__L_c)^5.83159e-1*(M_phe__L_c/kM_R364_M_phe__L_c)^1.85265e-1*(M_mlthf_c/kM_R364_M_mlthf_c)^5.76e-4*(M_h2o_c/kM_R364_M_h2o_c)^7.037473e1*(M_gly_c/kM_R364_M_gly_c)^6.12638e-1*(M_f6p_c/kM_R364_M_f6p_c)^9.4488e-2*(M_prpp_c/kM_R364_M_prpp_c)^2.278e-3*(M_his__L_c/kM_R364_M_his__L_c)^9.4738e-2*(M_so4_c/kM_R364_M_so4_c)^4.338e-3*(M_gtp_c/kM_R364_M_gtp_c)^2.15319e-1*(M_nadph_c/kM_R364_M_nadph_c)^2.8587e-2*(M_val__L_c/kM_R364_M_val__L_c)^4.23162e-1*(M_pro__L_c/kM_R364_M_pro__L_c)^2.21055e-1*(M_asn__L_c/kM_R364_M_asn__L_c)^2.41055e-1*(M_leu__L_c/kM_R364_M_leu__L_c)^4.50531e-1*(M_3hmrsACP_c/kM_R364_M_3hmrsACP_c)^7.7824e-2*(M_dgtp_c/kM_R364_M_dgtp_c)^2.7017e-2*(M_palmACP_c/kM_R364_M_palmACP_c)^1.27628e-1 - kC_R364/sqrt(kEQ_R364*kM_R364_M_dhap_c^2.278e-3*kM_R364_M_thr__L_c^2.53687e-1*kM_R364_M_pep_c^6.67e-2*kM_R364_M_glyc3p_c^1.39028e-1*kM_R364_M_ser__L_c^3.5482e-1*kM_R364_M_ctp_c^1.60525e-1*kM_R364_M_accoa_c^9.4488e-2*kM_R364_M_arg__L_c^2.95792e-1*kM_R364_M_asp__L_c^2.43909e-1*kM_R364_M_h_p^1.91737e-1*kM_R364_M_met__L_c^1.53686e-1*kM_R364_M_nh4_c^1.5068e-2*kM_R364_M_hdeACP_c^1.50428e-1*kM_R364_M_tyr__L_c^1.37896e-1*kM_R364_M_cys__L_c^9.2156e-2*kM_R364_M_trp__L_c^5.6843e-2*kM_R364_M_lys__L_c^3.43161e-1*kM_R364_M_atp_c^7.623415e1*kM_R364_M_26dap__M_c^2.7788e-2*kM_R364_M_dttp_c^2.6166e-2*kM_R364_M_dctp_c^2.7017e-2*kM_R364_M_ru5p__D_c^3.9358e-2*kM_R364_M_utp_c^2.38592e-1*kM_R364_M_datp_c^2.6166e-2*kM_R364_M_glu__L_c^1.9646e-1*kM_R364_M_fum_c^2.278e-3*kM_R364_M_ile__L_c^2.90529e-1*kM_R364_M_3mob_c^5.76e-4*kM_R364_M_gln__L_c^3.57648e-1*kM_R364_M_ala__L_c^5.83159e-1*kM_R364_M_phe__L_c^1.85265e-1*kM_R364_M_mlthf_c^5.76e-4*kM_R364_M_h2o_c^7.037473e1*kM_R364_M_gly_c^6.12638e-1*kM_R364_M_f6p_c^9.4488e-2*kM_R364_M_prpp_c^2.278e-3*kM_R364_M_his__L_c^9.4738e-2*kM_R364_M_so4_c^4.338e-3*kM_R364_M_gtp_c^2.15319e-1*kM_R364_M_nadph_c^2.8587e-2*kM_R364_M_val__L_c^4.23162e-1*kM_R364_M_pro__L_c^2.21055e-1*kM_R364_M_asn__L_c^2.41055e-1*kM_R364_M_leu__L_c^4.50531e-1*kM_R364_M_3hmrsACP_c^7.7824e-2*kM_R364_M_dgtp_c^2.7017e-2*kM_R364_M_palmACP_c^1.27628e-1/kM_R364_M_ac_c^3.8912e-2/kM_R364_M_h_c^7.596447e1/kM_R364_M_ump_c^4.7244e-2/kM_R364_M_adp_c^7.605322e1/kM_R364_M_pi_c^7.583427e1/kM_R364_M_thf_c^5.76e-4/kM_R364_M_ppi_c^1.055339/kM_R364_M_nadp_c^2.8587e-2/kM_R364_M_succ_c^2.278e-3/kM_R364_M_cdp_c^2.7017e-2/kM_R364_M_amp_c^2.854e-3/kM_R364_M_for_c^6.69e-4/kM_R364_M_coa_c^9.4488e-2/kM_R364_M_udp_c^4.7244e-2/kM_R364_M_co2_c^1.42458e-1/kM_R364_M_ACP_c^3.5588e-1)*(M_ac_c/kM_R364_M_ac_c)^3.8912e-2*(M_h_c/kM_R364_M_h_c)^7.596447e1*(M_ump_c/kM_R364_M_ump_c)^4.7244e-2*(M_adp_c/kM_R364_M_adp_c)^7.605322e1*(M_pi_c/kM_R364_M_pi_c)^7.583427e1*(M_thf_c/kM_R364_M_thf_c)^5.76e-4*(M_ppi_c/kM_R364_M_ppi_c)^1.055339*(M_nadp_c/kM_R364_M_nadp_c)^2.8587e-2*(M_succ_c/kM_R364_M_succ_c)^2.278e-3*(M_cdp_c/kM_R364_M_cdp_c)^2.7017e-2*(M_amp_c/kM_R364_M_amp_c)^2.854e-3*(M_for_c/kM_R364_M_for_c)^6.69e-4*(M_coa_c/kM_R364_M_coa_c)^9.4488e-2*(M_udp_c/kM_R364_M_udp_c)^4.7244e-2*(M_co2_c/kM_R364_M_co2_c)^1.42458e-1*(M_ACP_c/kM_R364_M_ACP_c)^3.5588e-1)/((1 + M_dhap_c/kM_R364_M_dhap_c)^2.278e-3*(1 + M_thr__L_c/kM_R364_M_thr__L_c)^2.53687e-1*(1 + M_pep_c/kM_R364_M_pep_c)^6.67e-2*(1 + M_glyc3p_c/kM_R364_M_glyc3p_c)^1.39028e-1*(1 + M_ser__L_c/kM_R364_M_ser__L_c)^3.5482e-1*(1 + M_ctp_c/kM_R364_M_ctp_c)^1.60525e-1*(1 + M_accoa_c/kM_R364_M_accoa_c)^9.4488e-2*(1 + M_arg__L_c/kM_R364_M_arg__L_c)^2.95792e-1*(1 + M_asp__L_c/kM_R364_M_asp__L_c)^2.43909e-1*(1 + M_h_p/kM_R364_M_h_p)^1.91737e-1*(1 + M_met__L_c/kM_R364_M_met__L_c)^1.53686e-1*(1 + M_nh4_c/kM_R364_M_nh4_c)^1.5068e-2*(1 + M_hdeACP_c/kM_R364_M_hdeACP_c)^1.50428e-1*(1 + M_tyr__L_c/kM_R364_M_tyr__L_c)^1.37896e-1*(1 + M_cys__L_c/kM_R364_M_cys__L_c)^9.2156e-2*(1 + M_trp__L_c/kM_R364_M_trp__L_c)^5.6843e-2*(1 + M_lys__L_c/kM_R364_M_lys__L_c)^3.43161e-1*(1 + M_atp_c/kM_R364_M_atp_c)^7.623415e1*(1 + M_26dap__M_c/kM_R364_M_26dap__M_c)^2.7788e-2*(1 + M_dttp_c/kM_R364_M_dttp_c)^2.6166e-2*(1 + M_dctp_c/kM_R364_M_dctp_c)^2.7017e-2*(1 + M_ru5p__D_c/kM_R364_M_ru5p__D_c)^3.9358e-2*(1 + M_utp_c/kM_R364_M_utp_c)^2.38592e-1*(1 + M_datp_c/kM_R364_M_datp_c)^2.6166e-2*(1 + M_glu__L_c/kM_R364_M_glu__L_c)^1.9646e-1*(1 + M_fum_c/kM_R364_M_fum_c)^2.278e-3*(1 + M_ile__L_c/kM_R364_M_ile__L_c)^2.90529e-1*(1 + M_3mob_c/kM_R364_M_3mob_c)^5.76e-4*(1 + M_gln__L_c/kM_R364_M_gln__L_c)^3.57648e-1*(1 + M_ala__L_c/kM_R364_M_ala__L_c)^5.83159e-1*(1 + M_phe__L_c/kM_R364_M_phe__L_c)^1.85265e-1*(1 + M_mlthf_c/kM_R364_M_mlthf_c)^5.76e-4*(1 + M_h2o_c/kM_R364_M_h2o_c)^7.037473e1*(1 + M_gly_c/kM_R364_M_gly_c)^6.12638e-1*(1 + M_f6p_c/kM_R364_M_f6p_c)^9.4488e-2*(1 + M_prpp_c/kM_R364_M_prpp_c)^2.278e-3*(1 + M_his__L_c/kM_R364_M_his__L_c)^9.4738e-2*(1 + M_so4_c/kM_R364_M_so4_c)^4.338e-3*(1 + M_gtp_c/kM_R364_M_gtp_c)^2.15319e-1*(1 + M_nadph_c/kM_R364_M_nadph_c)^2.8587e-2*(1 + M_val__L_c/kM_R364_M_val__L_c)^4.23162e-1*(1 + M_pro__L_c/kM_R364_M_pro__L_c)^2.21055e-1*(1 + M_asn__L_c/kM_R364_M_asn__L_c)^2.41055e-1*(1 + M_leu__L_c/kM_R364_M_leu__L_c)^4.50531e-1*(1 + M_3hmrsACP_c/kM_R364_M_3hmrsACP_c)^7.7824e-2*(1 + M_dgtp_c/kM_R364_M_dgtp_c)^2.7017e-2*(1 + M_palmACP_c/kM_R364_M_palmACP_c)^1.27628e-1 + (1 + M_ac_c/kM_R364_M_ac_c)^3.8912e-2*(1 + M_h_c/kM_R364_M_h_c)^7.596447e1*(1 + M_ump_c/kM_R364_M_ump_c)^4.7244e-2*(1 + M_adp_c/kM_R364_M_adp_c)^7.605322e1*(1 + M_pi_c/kM_R364_M_pi_c)^7.583427e1*(1 + M_thf_c/kM_R364_M_thf_c)^5.76e-4*(1 + M_ppi_c/kM_R364_M_ppi_c)^1.055339*(1 + M_nadp_c/kM_R364_M_nadp_c)^2.8587e-2*(1 + M_succ_c/kM_R364_M_succ_c)^2.278e-3*(1 + M_cdp_c/kM_R364_M_cdp_c)^2.7017e-2*(1 + M_amp_c/kM_R364_M_amp_c)^2.854e-3*(1 + M_for_c/kM_R364_M_for_c)^6.69e-4*(1 + M_coa_c/kM_R364_M_coa_c)^9.4488e-2*(1 + M_udp_c/kM_R364_M_udp_c)^4.7244e-2*(1 + M_co2_c/kM_R364_M_co2_c)^1.42458e-1*(1 + M_ACP_c/kM_R364_M_ACP_c)^3.5588e-1 - 1);
    u_R364 = NaN; kC_R364 = 10; kEQ_R364 = 2.511; kM_R364_M_dhap_c = 0.289; kM_R364_M_thr__L_c = 0.289; kM_R364_M_ac_c = 0.03461; kM_R364_M_pep_c = 0.289; kM_R364_M_h_c = 0.03461; kM_R364_M_glyc3p_c = 0.289; kM_R364_M_ser__L_c = 0.289; kM_R364_M_ump_c = 0.03461; kM_R364_M_ctp_c = 0.289; kM_R364_M_accoa_c = 0.289; kM_R364_M_arg__L_c = 0.289; kM_R364_M_asp__L_c = 0.289; kM_R364_M_h_p = 0.289; kM_R364_M_adp_c = 0.03461; kM_R364_M_met__L_c = 0.289; kM_R364_M_nh4_c = 0.289; kM_R364_M_hdeACP_c = 0.289; kM_R364_M_pi_c = 0.03461; kM_R364_M_tyr__L_c = 0.289; kM_R364_M_cys__L_c = 0.289; kM_R364_M_trp__L_c = 0.289; kM_R364_M_lys__L_c = 0.289; kM_R364_M_atp_c = 0.289; kM_R364_M_26dap__M_c = 0.289; kM_R364_M_thf_c = 0.03461; kM_R364_M_dttp_c = 0.289; kM_R364_M_dctp_c = 0.289; kM_R364_M_ru5p__D_c = 0.289; kM_R364_M_utp_c = 0.289; kM_R364_M_datp_c = 0.289; kM_R364_M_ppi_c = 0.03461; kM_R364_M_nadp_c = 0.03461; kM_R364_M_glu__L_c = 0.289; kM_R364_M_fum_c = 0.289; kM_R364_M_ile__L_c = 0.289; kM_R364_M_3mob_c = 0.289; kM_R364_M_gln__L_c = 0.289; kM_R364_M_ala__L_c = 0.289; kM_R364_M_phe__L_c = 0.289; kM_R364_M_mlthf_c = 0.289; kM_R364_M_h2o_c = 0.289; kM_R364_M_gly_c = 0.289; kM_R364_M_f6p_c = 0.289; kM_R364_M_prpp_c = 0.289; kM_R364_M_his__L_c = 0.289; kM_R364_M_so4_c = 0.289; kM_R364_M_gtp_c = 0.289; kM_R364_M_succ_c = 0.03461; kM_R364_M_cdp_c = 0.03461; kM_R364_M_nadph_c = 0.289; kM_R364_M_val__L_c = 0.289; kM_R364_M_pro__L_c = 0.289; kM_R364_M_amp_c = 0.03461; kM_R364_M_for_c = 0.03461; kM_R364_M_coa_c = 0.03461; kM_R364_M_asn__L_c = 0.289; kM_R364_M_udp_c = 0.03461; kM_R364_M_leu__L_c = 0.289; kM_R364_M_3hmrsACP_c = 0.289; kM_R364_M_co2_c = 0.03461; kM_R364_M_dgtp_c = 0.289; kM_R364_M_ACP_c = 0.03461; kM_R364_M_palmACP_c = 0.289;
end
